Simulations: Version=204
  Experiment (disabled)
    Factors
      Permutation
        Factor: Specification=[Weather].FileName = Te Puke.met, Kerikeri.met
    Simulation sensibility test
      Weather: FileName=Kerikeri.met
      Clock: Start=2007-01-01; End=2024-06-30
      Summary
      SoilArbitrator Soil Arbitrator
      Zone Block: Area=1; Slope=0; AspectAngle=0; Altitude=50
        Report: EventNames=[Clock].DoReport
          VariableNames:
            [KiwiFruit].Leaf.Wt
            [KiwiFruit].Leaf.Canopy.Height
            [KiwiFruit].Leaf.NodeNumber
            [Clock].Today
            [KiwiFruit].Phenology.Stage
            [KiwiFruit].Phenology.CurrentStageName
            [KiwiFruit].Phenology.ProportionBB
            [KiwiFruit].Phenology.BrokenBuds
            [KiwiFruit].Phenology.BudBurstDOY
            [KiwiFruit].Phenology.BrokenBuds.Vegetative.BrokenBuds.Max_buds
            [KiwiFruit].Phenology.EndoDormancy.ProgressThroughPhase
            [KiwiFruit].Phenology.EcoDormancy.ProgressThroughPhase
            [KiwiFruit].Phenology.ProportionCU
            [KiwiFruit].Phenology.MaxBBP
            [KiwiFruit].Phenology.AccumulatedChillingPreEndo
        Report Stages
          VariableNames:
            [KiwiFruit].Phenology.MaxBBP
            [KiwiFruit].Phenology.FloweringDOY
        Plant KiwiFruit
        Fertiliser
        SurfaceOrganicMatter: InitialResidueName=wheat_stubble; InitialResidueType=wheat; InitialResidueMass=500; InitialStandingFraction=0; InitialCPR=0; InitialCNR=100
        Irrigation
        MicroClimate: a_interception=0; b_interception=1; c_interception=0; d_interception=0; SoilHeatFluxFraction=0.4; MinimumHeightDiffForNewLayer=0; NightInterceptionFraction=0.5; ReferenceHeight=2
        Manager ReportOnEvents
```csharp
using Models.Core;
using System;
using Models.PMF.Phen;

namespace Models
{
    [Serializable]
    public class Script : Model
    {
        //> Links to other Apsim models
        [Link(ByName = true)] Report stages; 
        
        public string StageName {get; set;}
        
        private void setAndOutput(PhaseChangedType change)
        {
           StageName = change.StageName;
    	   stages.DoOutput();
        }
        
        [EventSubscribe("PhaseChanged")]
        private void OnPhaseChanged(object sender, PhaseChangedType change)
        {
        	if (change.StageName == "StartFlowering") {setAndOutput(change);}

        }

	}
}
```
        Manager Reset on date
          ResetWater = True
          ResetNutrients = True
          ResetSOM = True
```csharp
using Models.Soils.Nutrients;
using APSIM.Shared.Utilities;
using Models.Surface;
using Models.Utilities;
using Models.Soils.Nutrients;
using Models.Soils;
using Models.PMF;
using Models.Core;
using System;
using System.Linq;
using Models.Interfaces;
using Models.PMF.Phen;
using System.Diagnostics;

namespace Models
{
    [Serializable]
    public class Script : Model
    {
        [Link] private Clock Clock;
        [Link] private Plant Wheat;
        [Link] private ISoilWater SoilWater;
        [Link] private Nutrient nutrient;
        [Link] private SurfaceOrganicMatter SOM;
        [Link] private Summary Summary;

        [Description("Reset Water? (Yes or No)")]
        public bool ResetWater {get;set;}

        [Description("Reset Soil Nutrients ? (Yes or No)")]
        public bool ResetNutrients {get;set;}

        [Description("Reset Surface Organic Matter? (Yes or No)")]
        public bool ResetSOM {get;set;}

        [EventSubscribe("PhaseChanged")]
        private void OnDoManagement(object sender, PhaseChangedType pct)
        {
            if (pct.StageName == "StartGrowth")
            {
                if (ResetWater == true)
                {
                    Summary.WriteMessage(this, "Reset Water", MessageType.Diagnostic);
                    SoilWater.Reset();
                }
                if (ResetNutrients == true)
                {
                    Summary.WriteMessage(this, "Reset Nitrogen", MessageType.Diagnostic);
                    nutrient.Reset();
                }
                if (ResetSOM == true)
                {
                    Summary.WriteMessage(this, "Reset Surface OM", MessageType.Diagnostic);
                    SOM.Reset();
                }
            }
        }
    }
}
```
        Soil: Latitude=0; Longitude=0
          LayerStructure: Thickness=[200, 200, 200, 200, 200, 200, 300, 300, 400, 800]
          Chemical: Thickness=[100, 200, 300, 300, 300, 300]; PH=[6.6, 6.2, 5.7, 5.5, 5.5, 5.5]; PHUnits=Water
          Water: Thickness=[300, 300, 300, 300, 300, 300, 1200]; InitialValues=[0.3, 0.21, 0.18, 0.17, 0.17, 0.17, 0.17]; FilledFromTop=false
          WaterBalance SoilWater: SummerDate=1-Nov; SummerU=9; SummerCona=4.4; WinterDate=1-Apr; WinterU=9; WinterCona=4.4; DiffusConst=88; DiffusSlope=35.4; Salb=0.3; CN2Bare=68; CNRed=20; CNCov=0.8; DischargeWidth=0; CatchmentArea=0; PSIDul=-100
            Thickness  SWCON  KLAT
            300        0.55   0
            300        0.55   0
            300        0.55   0
            300        0.55   0
            300        0.1    0
            300        0.02   0
            400        0.02   0
            800        0      0
          Organic: FOMCNRatio=30; CarbonUnits=Total
            Thickness  Carbon  SoilCNRatio  FBiom  FInert  FOM
            100        1.82    11.5         0.025  0.3     1243.931
            200        1.47    11.5         0.025  0.4     833.832
            300        1.2     11.5         0.015  0.75    457.617
            300        1.03    11.5         0.01   0.9     251.145
            300        0.47    11.5         0.01   0.96    137.831
            300        0.47    11.5         0.01   0.96    75.644
          OutputLayers: Thickness=[300, 300, 300, 300, 300, 300]
          Solute NO3: Thickness=[100, 200, 300, 300, 300, 300]; InitialValues=[217, 15, 1.66667, 1.66667, 0, 0]; InitialValuesUnits=ppm; WaterTableConcentration=0; D0=0; DepthConstant=0; MaxDepthSoluteAccessible=0; RunoffEffectivenessAtMovingSolute=0; MaxEffectiveRunoff=0
          Solute NH4: Thickness=[100, 200, 300, 300, 300, 300]; InitialValues=[0, 0, 0, 0, 0, 0]; InitialValuesUnits=ppm; WaterTableConcentration=0; D0=0; DepthConstant=0; MaxDepthSoluteAccessible=0; RunoffEffectivenessAtMovingSolute=0; MaxEffectiveRunoff=0
          Solute Urea: Thickness=[100, 200, 300, 300, 300, 300]; InitialValues=[0, 0, 0, 0, 0, 0]; InitialValuesUnits=kg/ha; WaterTableConcentration=0; D0=0; DepthConstant=0; MaxDepthSoluteAccessible=0; RunoffEffectivenessAtMovingSolute=0; MaxEffectiveRunoff=0
          Physical
            Thickness  ParticleSizeSand  ParticleSizeSilt  ParticleSizeClay  Rocks     BD  AirDry  LL15  DUL  SAT  KS
            300        5                 65                30                0.309221  1   0.15    0.15  0.3  0.4  100
            300        5                 65                30                0.309221  1   0.15    0.15  0.3  0.4  100
            300        5                 65                30                0.309221  1   0.15    0.15  0.3  0.4  50
            300        5                 65                30                0.309221  1   0.15    0.15  0.3  0.4  40
            300        5                 65                30                0.309221  1   0.15    0.15  0.3  0.4  40
            300        5                 65                30                0.309221  1   0.15    0.15  0.3  0.4  40
            1200       5                 65                30                0.309221  1   0.15    0.15  0.3  0.4  40
            Rocks, ParticleSizeSand, ParticleSizeSilt, ParticleSizeClay source: Calculated
            SoilCrop KiwiFruitSoil: LL=[0.15, 0.15, 0.15, 0.15, 0.15, 0.15, 0.15]; KL=[1, 1, 1, 1, 1, 1, 1]; XF=[1, 1, 1, 1, 1, 1, 1]
          Nutrient
          SoilTemperature Temperature
        Manager AutomaticIrrigation
          allowIrrigation = True
          seasonStart = 1-Aug
          seasonEnd = 30-May
          seasonsAllocation = 1000
          triggerDeficit = 70
          targetDeficit = 95
          returndays = 3
          maximumAmount = 30
          depthPAWC = 650
```csharp
using Newtonsoft.Json;
using APSIM.Shared.Utilities;
using System.Xml.Serialization;
using Models.Soils;
using Models.PMF;
using Models.Core;
using System;
using System.Linq;
using Models.Interfaces;



        
namespace Models
{
    [Serializable] 
    [System.Xml.Serialization.XmlInclude(typeof(Model))]
    public class Script : Model
    {
        [Link] private ISummary summary;
        [Link] private Irrigation Irrigation;
        [Link] private Clock Clock;
        [Link] private Soil Soil;
        [Link(IsOptional = true)] private IPlant existingCrop;
        private DateTime StartDate;
        private DateTime EndDate;
        private double TopDUL;
        private double TopLL;
        private int nLayers;
        [Link]
        private IPhysical soilPhysical;
        [Link]
        private ISoilWater waterBalance;
        //Communication to other modules
       
        //User inputs from properties tab
        [Description("Turn irrigation on?")]
        public bool allowIrrigation { get; set; }
        [Description("Start of irrigation season (dd-MMM)")]
        public string seasonStart { get; set; }
        [Description("End of irrigation season (dd-MMM)")]
        public string seasonEnd { get; set; }
        [Description("Season allocation (mm)")]
        public double seasonsAllocation { get; set; }
        [Description("Deficit to trigger irrigation (% PAWC)")]
        public double triggerDeficit { get; set; }
        [Description("Deficit to stop irrigaton (% PAWC)")]
        public double targetDeficit { get; set; }
        [Description("Minimum days for irrigation to return")]
        public double returndays { get; set; }
        [Description("Maximum irrigation application (mm/day)")]
        public double maximumAmount { get; set; }
        [Description("Depth to calculate PAWC (mm)")]
        public double depthPAWC { get; set; }

        //Class members
        [JsonIgnore] public double TopSWdeficit { get; set; }
        [JsonIgnore] public double TopSWC { get; set; }
        [JsonIgnore] public double DaysSinceIrrigation { get; set; }
        [JsonIgnore] public double AmountToApply { get; set; }
        [JsonIgnore] public double SeasonAppliedAmount { get; set; }
        
        private bool IrrigationIsAllowed { get; set; }
        private bool SeasonIsOpen { get; set; }
        private bool CropIsActive { get; set; }
        private bool IrrigatorIsAvailable { get; set; }
        private bool SoilIsDry { get; set; }

    
        //Calculate static soil variables
        [EventSubscribe("StartOfSimulation")]
        private void OnStartOfSimulation(object sender, EventArgs e)
        {   
            //Set the season dates
            StartDate = DateTime.Parse(seasonStart + "-" + Clock.Today.Year.ToString());
            EndDate = DateTime.Parse(seasonEnd + "-" + Clock.Today.Year.ToString());
            
            //Can we irrigate at all?
            IrrigationIsAllowed = false; 
            if (allowIrrigation)
                IrrigationIsAllowed = true; 

            //Calculate soil water variables
            double depthFromSurface = 0.0;
            double fracLayer = 0.0;
            nLayers = soilPhysical.Thickness.Length;
            for (int layer = 0; layer < nLayers; layer++)
            {
                fracLayer = Math.Min(1.0, (depthPAWC - depthFromSurface) / soilPhysical.Thickness[layer]);
                TopLL += soilPhysical.LL15mm[layer] * fracLayer;
                TopDUL += soilPhysical.DULmm[layer] * fracLayer;
                depthFromSurface += soilPhysical.Thickness[layer];
                if (depthFromSurface >= depthPAWC)
                    layer = nLayers;
            }
        }
             
        //Determine daily requirement for irrigation
        [EventSubscribe("StartOfDay")]
        private void OnStartOfDay(object sender, EventArgs e)
        {
            //Can we irrigate today?          
            SeasonIsOpen = isBetween(Clock.Today, StartDate, EndDate);
            if (!SeasonIsOpen)
                SeasonAppliedAmount = 0;

            //Is there a crop in the ground that needs irrigation?
            CropIsActive = false;
            if ((existingCrop != null) && (existingCrop.IsAlive))
                CropIsActive = true;
            //if ((existingCrop.Phenology.Stage >= 3.0) && (existingCrop.Phenology.Stage < 6.0))
          
            //Is the irrigator available?
            IrrigatorIsAvailable = false;
            DaysSinceIrrigation += 1;
            if (DaysSinceIrrigation >= returndays)
                IrrigatorIsAvailable = true;
          
            //Is the soil dry enough to require irrigation?
            SoilIsDry = false;
            double depthFromSurface = 0.0;
            double fracLayer = 0.0;
            TopSWC = 0.0;
            for (int layer = 0; layer < nLayers; layer++)
            //for (int layer = 0; depthFromSurface < depthPAWC + soilPhysical.Thickness[layer]; layer++)
            {
                fracLayer = Math.Min(1.0, (depthPAWC - depthFromSurface) / soilPhysical.Thickness[layer]);
                TopSWC += waterBalance.SWmm[layer] * fracLayer;
                depthFromSurface += soilPhysical.Thickness[layer];
                if (depthFromSurface >= depthPAWC)
                    layer = nLayers;
            }
            
            TopSWdeficit = TopSWC - TopDUL;
            if (Math.Max(0.0, -TopSWdeficit) >= (TopDUL - TopLL) * (100 - triggerDeficit) / 100)
                SoilIsDry = true;
                
            //Are all the conditions ratifying irrigation
            if (IrrigationIsAllowed && SeasonIsOpen && CropIsActive && IrrigatorIsAvailable && SoilIsDry)
            {
                //Lets bloody well irrigate then!!!!
                AmountToApply = TopDUL * targetDeficit / 100 - TopSWC;
                AmountToApply = Math.Max(0.0, Math.Min(AmountToApply, seasonsAllocation - SeasonAppliedAmount));
                AmountToApply = Math.Min(AmountToApply,maximumAmount);
                Irrigation.Apply(AmountToApply);
                DaysSinceIrrigation = 0;
                SeasonAppliedAmount += AmountToApply;
            }
        }
        
        ///Checks whether theDate is between iniDate and endDate (non-year specific)
        private bool isBetween(DateTime theDay, DateTime iniDate, DateTime endDate)
        {
            bool result = false;
            if (iniDate.DayOfYear < endDate.DayOfYear)
            {
                // period is within one year, ex: summer in the northern hemisphere
                if ((theDay.DayOfYear >= iniDate.DayOfYear) && (theDay.DayOfYear <= endDate.DayOfYear))
                    result = true;
            }
            else
            {
                // period goes over the end of the year, ex: summer in the southern hemisphere
                if ((theDay.DayOfYear >= iniDate.DayOfYear) || (theDay.DayOfYear <= endDate.DayOfYear))
                    result = true;
            }
            
            return result;
        }
    }
}
```
        Manager FactorLabels
          AGENT_NO = 999
          Lat = 999
          Lon = 999
          SoilStamp = SiltLoam
          GCM = ERA
          RCP = ERA
          TS = BaseLine
```csharp
using Models.Soils;
using Models.Core;
using System;

namespace Models
{
    [Serializable]
    public class Script : Model
    {
        //> Links to other Apsim models
        [Link] Clock Clock;
        [Link] ISummary mySummary;

        //> User inputs from properties tab
        [Separator("Tags used to defined simulation factors")]
        [Description("Agent number: ")]
        public string AGENT_NO { get; set; }
        [Description("Latitude: ")]
        public string Lat { get; set; }
        [Description("Longitude: ")]
        public string Lon { get; set; }
        [Description("SoilStamp: ")]
        public string SoilStamp { get; set; }
        [Description("GCM: ")]
        public string GCM { get; set; }
        [Description("RCP: ")]
        public string RCP { get; set; }
        [Description("Time slice: ")]
        public string TS { get; set; }

        //> Internal variables
        private string someVar;
        
        [EventSubscribe("DoManagementCalculations")]
        private void OnDoManagementCalculations(object sender, EventArgs e)
        {
            // Sort out time slice classification
            if ((Clock.Today.Date.Year <= 2005))
            {
                TS = "Baseline";
            }
            else
            {
                TS = "Future";
            }
        }
    }
}
```
        Manager AutomaticFertiliser
          EachYear = True
          Dates = 30-nov, 15-apr
          UseCritNThreshold = False
          CritNThreshold = 50
          CritNDepth = 75
          Depth = 50
          Amount = 25
          FertiliserType = UreaN
```csharp
using APSIM.Core;
using Models.Soils.Nutrients;
using System;
using Models.Core;
using Models.Soils;
using Models.PMF;
using APSIM.Shared.Utilities;
using System.Linq;
using Models.Interfaces;

namespace Models
{
    [Serializable]
    public class Script : Model, IStructureDependency
    {
        [Link] private Clock clock;
        [Link] private Fertiliser fertiliser;
        [Link] private ISummary summary;
        [Link] private Soil soil;
        private Nutrient nutrient;
        [Link]
        private IPhysical soilPhysical;
        public IStructure Structure { private get; set; }
        
        


        [Separator("Fertiliser will be applied on the date(s) below")]
        [Description("Apply fertiliser on the same day(s) each year? If no, then must include the year of appliaction below")]
        public bool EachYear { get; set; }

        [Description("Dates for one or more fertiliser applications (dd-mmm or dd-mmm-yyyy) as a list with a comma between dates")]
        public string[] Dates { get; set; }

        [Separator("Test for the mineral N in the soil and don't apply the fertiliser if greater than X kgN/ha is stored in the soil above a depth of Y mm")]
        [Description("Use a critical soil mineral N to prevent application above a threshold?")]
        public bool UseCritNThreshold { get; set; }

        [Description("Don't add fertiliser if N in the soil to the depth below exceeds (kg/ha)")]
        public double CritNThreshold { get; set; }

        [Description("Depth to which the amount of N in the soil should be calculated (mm)")]
        public double CritNDepth { get; set; }

        [Separator("Fertiliser application details")]
        [Description("Depth at which to apply the fertiliser (mm)")]
        public double Depth { get; set; }

        [Description("Amount of fertiliser to apply (kg N /ha) per application")]
        public double Amount { get; set; }

        [Description("Fertiliser type - select from the list")]
        [Display(Type = DisplayType.FertiliserType)]public string FertiliserType { get; set; }


        [EventSubscribe("StartOfSimulation")]
        private void FindSoilNOrNutrient(object sender, EventArgs e)
        {
            nutrient =  Structure.Find<Nutrient>() as Nutrient;

            if (nutrient == null)
                throw new Exception(string.Format("Error in script {0}: Unable to find nutrient.", Name));
        }

        [EventSubscribe("DoManagement")]
        private void OnDoManagement(object sender, EventArgs e)
        {
            if (OnApplicationDate())
            {
                if (NContentBelowThreshold())
                    fertiliser.Apply(Amount, FertiliserType, Depth);
                else
                    summary.WriteMessage(this, "Skipping fertiliser application due to soil mineral N content being above critical threshold.", MessageType.Diagnostic);
            }
        }

        /// <summary>Checks if today's date is one of the specified fertiliser application dates.</summary>
        private bool OnApplicationDate()
        {
            if (EachYear)
                return Dates.Any(d => DateUtilities.DatesEqual(d, clock.Today));
            
            DateTime[] dates = Dates.Select(d => DateTime.ParseExact(d, "d-MMM-yyyy", null)).ToArray();
            return dates.Any(d => SameDate(d, clock.Today));
        }

        /// <summary>Checks if N content in soil is below critical threshold.</summary>
        private bool NContentBelowThreshold()
        {
            if (!UseCritNThreshold)
                return true;
            
            double[] weights = GetLayerWeights();
            double cumSoilN = 0;

            for (int i = 0; i < soilPhysical.Thickness.Length; i++)
            {
                cumSoilN += weights[i] * nutrient.MineralN[i];
            }

            return cumSoilN <= CritNThreshold;
        }

        private double[] GetLayerWeights()
        {
            double[] weights = new double[soilPhysical.Thickness.Length];
            double cumDepth = 0;

            for (int i = 0; i < soilPhysical.Thickness.Length; i++)
            {
                cumDepth += soilPhysical.Thickness[i];
                if (cumDepth < CritNDepth)
                    weights[i] = 1;
                else if (cumDepth - soilPhysical.Thickness[i] <= CritNDepth)
                    weights[i] = (CritNDepth - (cumDepth - soilPhysical.Thickness[i])) / soilPhysical.Thickness[i];
                else
                    weights[i] = 0;
            }

            return weights;
        }

        private bool SameDate(DateTime d1, DateTime d2)
        {
            return d1.Year == d2.Year && d1.DayOfYear == d2.DayOfYear;
        }
    }
}
```
        Manager WaterStatus
          DepthToMonitorFollowRoots = False
          MinimumDepth = 0
          DepthToMonitor = 600
```csharp
using APSIM.Core;
using Models.Interfaces;
using Models.PMF.Organs;
using APSIM.Shared.Utilities;
using System.Xml.Serialization;
using Models.Soils;
using Models.PMF;
using Models.Core;
using System;
using System.Linq;
using Models.Soils.Nutrients;
using Models.PMF.Phen;
using Newtonsoft.Json;

        
namespace Models
{
    [Serializable] 
    [System.Xml.Serialization.XmlInclude(typeof(Model))]
    public class Script : Model, IStructureDependency
    {      
        [Link] private Zone myZone;
        [Link] private Clock Clock;
        [Link] private ISummary summary;
        [Link] private IPhysical soilPhysical;
        [Link] private ISoilWater waterBalance;
        private int indexBottomOfMonitoredLayer;
        private double fractionBottomOfMonitoredLayer;
        private double lowerLimitOfMonitoredLayer;
        private double upperLimitOfMonitoredLayer;
        private double depthOfMonitoredLayer;
        
        public IStructure Structure { private get; set; }


        //User inputs from properties tab
        [Description("Depth to monitor soil moisture is based on root depth?")]
        public bool DepthToMonitorFollowRoots { get; set; }
        [Description("Minimum depth to monitor soil moisture (mm):")]
        [Display(VisibleCallback = "usingRootDepth")]
        public double MinimumDepth { get; set; }
        [Description("Depth to monitor soil moisture (mm):")]
        [Display(VisibleCallback = "usingGivenDepth")]
        public double DepthToMonitor { get; set; }

        //Class members
        [JsonIgnore][Units("mm")] public double SoilWaterContentOfMonitoredLayer { get; set; }
        [JsonIgnore][Units("mm")] public double SoilAvailableWaterOfMonitoredLayer { get; set; }
        [JsonIgnore][Units("mm")] public double RelativeSoilMoistureOfMonitoredLayer { get; set; }
        [JsonIgnore][Units("mm")] public double SoilWaterDeficitOfMonitoredLayer { get; set; }
        //[JsonIgnore][Units("dry/moist/wet")] public string SoilStatusOfMonitoredLayer { get; set; }
        [JsonIgnore][Units("0 or 1")] public double SoilStatusOfMonitoredLayer { get; set; }


        
        private bool usingRootDepth  { get { return DepthToMonitorFollowRoots; } }
        private bool usingGivenDepth { get { return !DepthToMonitorFollowRoots; } }



        

        [EventSubscribe("StartOfSimulation")]
        private void OnStartOfSimulation(object sender, EventArgs e)
        {
            // check the depth to monitor
            depthOfMonitoredLayer = DepthToMonitor;
            if (DepthToMonitorFollowRoots)
            {
                depthOfMonitoredLayer = MinimumDepth;
            }

            // get some soil water variables
            getMonitoredLayerParams(depthOfMonitoredLayer);
       }

       //[EventSubscribe("StartOfDay")]
        [EventSubscribe("EndOfDay")]
        private void OnStartOfDay(object sender, EventArgs e)
        {
            // check whether depth to monitor varies
            if (DepthToMonitorFollowRoots)
            {
                // check root depth
                double currentRootDepth = 0.0;
                foreach (Plant species in   Structure.FindChildren<Plant>(recurse: true, relativeTo: (INodeModel)myZone).OfType<IModel>().ToList())
                {
                    if (species.IsAlive)
                    {
                        double thisRootDepth = (double)Structure.Get("[" + species.Name + "].Root.Depth", relativeTo: myZone);
                        currentRootDepth = Math.Max(currentRootDepth, thisRootDepth);
                    }
                }
                currentRootDepth = Math.Min(MinimumDepth, currentRootDepth);
                
                if (Math.Abs(currentRootDepth - depthOfMonitoredLayer) > 0.001)
                { // update some soil water variables
                    depthOfMonitoredLayer = currentRootDepth;
                    getMonitoredLayerParams(depthOfMonitoredLayer);
                }
            }

            // get current soil moisture
            SoilWaterContentOfMonitoredLayer = 0.0;
            for (int layer = 0; layer < indexBottomOfMonitoredLayer; layer++)
            {
                SoilWaterContentOfMonitoredLayer += waterBalance.SWmm[layer];
            }

            SoilWaterContentOfMonitoredLayer += waterBalance.SWmm[indexBottomOfMonitoredLayer] * fractionBottomOfMonitoredLayer;

            // compute soil water deficit and available water
            SoilWaterDeficitOfMonitoredLayer = SoilWaterContentOfMonitoredLayer - upperLimitOfMonitoredLayer;
            SoilAvailableWaterOfMonitoredLayer = SoilWaterContentOfMonitoredLayer - lowerLimitOfMonitoredLayer;
            RelativeSoilMoistureOfMonitoredLayer = SoilAvailableWaterOfMonitoredLayer/(upperLimitOfMonitoredLayer - lowerLimitOfMonitoredLayer);

            // check the water status
            if (RelativeSoilMoistureOfMonitoredLayer >= 1.0)
            {
                //SoilStatusOfMonitoredLayer = "wet";
                SoilStatusOfMonitoredLayer = 1.0;
            }
            else if (RelativeSoilMoistureOfMonitoredLayer >= 0.5)
            {
                //SoilStatusOfMonitoredLayer = "moist";
                SoilStatusOfMonitoredLayer = 0.0;
            }
            else
            {
                //SoilStatusOfMonitoredLayer = "dry";
                SoilStatusOfMonitoredLayer = 0.0;
            }
        }
              
        
        ///<summary>Computes a selection of soil params over the given depth.</summary>
        private void getMonitoredLayerParams(double depthToCompute)
        {
            // Calculate some soil water variables
            double depthFromSurface = 0.0;
            lowerLimitOfMonitoredLayer = 0.0;
            upperLimitOfMonitoredLayer = 0.0;
            for (int layer = 0; layer < soilPhysical.Thickness.Length; layer++)
            {
                fractionBottomOfMonitoredLayer = Math.Min(1.0, (depthToCompute - depthFromSurface) / soilPhysical.Thickness[layer]);
                lowerLimitOfMonitoredLayer += soilPhysical.LL15mm[layer] * fractionBottomOfMonitoredLayer;
                upperLimitOfMonitoredLayer += soilPhysical.DULmm[layer] * fractionBottomOfMonitoredLayer;
                depthFromSurface += soilPhysical.Thickness[layer];
                if (depthFromSurface >= depthToCompute)
                {
                    indexBottomOfMonitoredLayer = layer;
                    layer = soilPhysical.Thickness.Length;
                }
            }
        }
       
    }
}
```
        Manager SowDateCv
          InitialRootDepth = 5
          CropToSow = Heyward_KK
          SowingDate = 05/25/2007 00:00:00
```csharp
using Models.Soils;
using System;
using Models.Core;
using System.Collections.Generic;
using System.Text;
using Models.PMF;
using Models;
using System.Xml.Serialization;
using APSIM.Shared.Utilities;
using System.Data;
using Models.PMF.Interfaces;
using Models.Surface;

namespace Models
{
    [Serializable] 
    //[System.Xml.Serialization.XmlInclude(typeof(Model))]
    public class Script : Model
    {
        [Link] Plant KiwiFruit;
        [Link] Clock Clock;
        [Link] Zone zone;
        [Link] Simulation Simulation;
        [Link] SurfaceOrganicMatter SurfOM;
        
                
        [Description("Initial Root Depth")]
        public double InitialRootDepth { get; set; }
        [Description("Sown Crop")]
        public string CropToSow { get; set; }
        [Description("Sowing Date")]
        public DateTime SowingDate { get; set; }
        
        
        [EventSubscribe("DoManagement")]
        private void OnDoManagement(object sender, EventArgs e)
        {
            if (Clock.Today.Date == SowingDate)
            {
                KiwiFruit.Sow(cultivar: CropToSow, population: 9, depth: InitialRootDepth, rowSpacing: 500);}            
            
            
        }
    }
}
```
        Manager BudNumber
          MaxBudNum = 12.5
```csharp
using APSIM.Core;
using Newtonsoft.Json;
using System;
using Models.Core;
using System.Collections.Generic;
using System.Text;
using Models.PMF;
using Models;
using System.Xml.Serialization;
using APSIM.Shared.Utilities;
using System.Data;
using Models.PMF.Interfaces;
using Models.Surface;
using Models.Soils;

namespace Models
{
    [Serializable] 
    //[System.Xml.Serialization.XmlInclude(typeof(Model))]
    public class Script : Model, IStructureDependency
    {
        [Link] private Plant KiwiFruit;
        [Link] private Clock Clock;
        [Link] private Zone zone;
        public IStructure Structure { private get; set; }

        
        [Description("MaximumBudNum")]
        public double MaxBudNum { get; set; }
        
        bool FirstDay {get; set;}


        

        [EventSubscribe("StartOfSimulation")]
        private void OnSimulationCommencing(object sender, EventArgs e)
        {
        FirstDay = false;
        }
        
        [EventSubscribe("DoManagement")]
        private void OnDoManagement(object sender, EventArgs e)
        {
            if (FirstDay == false)
            {
                FirstDay = true;

                object ResetValue = MaxBudNum;
                Structure.Set("[KiwiFruit].Phenology.BrokenBuds.Vegetative.BrokenBuds.Max_buds.FixedValue", ResetValue, relativeTo: zone); 
            }          
        }
    }
}
```
        AgriChemical
        Operations
          2020-08-30  [AgriChemical].Apply()
        BiomassRemovalEvents OnPrune: NameOfPlantToRemoveFrom=KiwiFruit; RemovalType=3
          BiomassRemovalFractions:
            PlantName  OrganName  TypeString  LiveToRemove  DeadToRemove  LiveToResidue  DeadToResidue
            KiwiFruit  Trunk      Pruning     0             0             0              0
            KiwiFruit  Leaf       Pruning     0             0             0              0
            KiwiFruit  Stem       Pruning     0             0             0              0
            KiwiFruit  Root       Pruning     0             0             0              0
            KiwiFruit  Fruit      Pruning     0             0             0              0
        Girdling
  Experiment CropLoadSensibilityTest
    Factors
      Permutation
        Factor CropLoad
          Specification=[KiwiFruit].Fruit.FruitNumberPerM2.FruitingPhase.PerM2.FruitsPerVine.RetainedAfterThinning.FixedValue = 0.1, 0.2, 0.5, 1
        Factor GirdlingDisabled (disabled)
          CompositeFactor Girdled: Specifications=[Operations]
            Operations
              2010-03-01  [Girdling].Apply()
          CompositeFactor NotGirdled: Specifications=[Operations]
            Operations
        Factor Girdling: Specification=[KiwiFruit].Leaf.Photosynthesis.RUE.FixedValue = 0.55, 1.1
    Simulation CropLoadSensibility
      Weather: FileName=Kerikeri.met
      Clock: Start=2007-01-01; End=2024-06-30
      Summary
      SoilArbitrator Soil Arbitrator
      Zone Block: Area=1; Slope=0; AspectAngle=0; Altitude=50
        Report: EventNames=[Clock].DoReport
          VariableNames:
            [KiwiFruit].Leaf.Wt
            [KiwiFruit].Leaf.Canopy.Height
            [KiwiFruit].Leaf.NodeNumber
            [Clock].Today
            [KiwiFruit].Phenology.Stage
            [KiwiFruit].Phenology.CurrentStageName
            [KiwiFruit].Phenology.ProportionBB
            [KiwiFruit].Phenology.BrokenBuds
            [KiwiFruit].Phenology.BudBurstDOY
            [KiwiFruit].Phenology.BrokenBuds.Vegetative.BrokenBuds.Max_buds
            [KiwiFruit].Phenology.EndoDormancy.ProgressThroughPhase
            [KiwiFruit].Phenology.EcoDormancy.ProgressThroughPhase
            [KiwiFruit].Phenology.ProportionCU
            [KiwiFruit].Phenology.MaxBBP
            [KiwiFruit].Phenology.AccumulatedChillingPreEndo
        Report Stages
          VariableNames:
            [KiwiFruit].Phenology.MaxBBP
            [KiwiFruit].Phenology.FloweringDOY
        Plant KiwiFruit
        Fertiliser
        SurfaceOrganicMatter: InitialResidueName=wheat_stubble; InitialResidueType=wheat; InitialResidueMass=500; InitialStandingFraction=0; InitialCPR=0; InitialCNR=100
        Irrigation
        MicroClimate: a_interception=0; b_interception=1; c_interception=0; d_interception=0; SoilHeatFluxFraction=0.4; MinimumHeightDiffForNewLayer=0; NightInterceptionFraction=0.5; ReferenceHeight=2
        Manager ReportOnEvents
          script: same as in Experiment.sensibility test.Block.ReportOnEvents
        Manager Reset on date
          ResetWater = True
          ResetNutrients = True
          ResetSOM = True
          script: same as in Experiment.sensibility test.Block.Reset on date
        Soil: Latitude=0; Longitude=0
          LayerStructure: Thickness=[200, 200, 200, 200, 200, 200, 300, 300, 400, 800]
          Chemical: Thickness=[100, 200, 300, 300, 300, 300]; PH=[6.6, 6.2, 5.7, 5.5, 5.5, 5.5]; PHUnits=Water
          Water: Thickness=[300, 300, 300, 300, 300, 300, 1200]; InitialValues=[0.3, 0.21, 0.18, 0.17, 0.17, 0.17, 0.17]; FilledFromTop=false
          WaterBalance SoilWater: SummerDate=1-Nov; SummerU=9; SummerCona=4.4; WinterDate=1-Apr; WinterU=9; WinterCona=4.4; DiffusConst=88; DiffusSlope=35.4; Salb=0.3; CN2Bare=68; CNRed=20; CNCov=0.8; DischargeWidth=0; CatchmentArea=0; PSIDul=-100
            Thickness  SWCON  KLAT
            300        0.55   0
            300        0.55   0
            300        0.55   0
            300        0.55   0
            300        0.1    0
            300        0.02   0
            400        0.02   0
            800        0      0
          Organic: FOMCNRatio=30; CarbonUnits=Total
            Thickness  Carbon  SoilCNRatio  FBiom  FInert  FOM
            100        1.82    11.5         0.025  0.3     1243.931
            200        1.47    11.5         0.025  0.4     833.832
            300        1.2     11.5         0.015  0.75    457.617
            300        1.03    11.5         0.01   0.9     251.145
            300        0.47    11.5         0.01   0.96    137.831
            300        0.47    11.5         0.01   0.96    75.644
          OutputLayers: Thickness=[300, 300, 300, 300, 300, 300]
          Solute NO3: Thickness=[100, 200, 300, 300, 300, 300]; InitialValues=[217, 15, 1.66667, 1.66667, 0, 0]; InitialValuesUnits=ppm; WaterTableConcentration=0; D0=0; DepthConstant=0; MaxDepthSoluteAccessible=0; RunoffEffectivenessAtMovingSolute=0; MaxEffectiveRunoff=0
          Solute NH4: Thickness=[100, 200, 300, 300, 300, 300]; InitialValues=[0, 0, 0, 0, 0, 0]; InitialValuesUnits=ppm; WaterTableConcentration=0; D0=0; DepthConstant=0; MaxDepthSoluteAccessible=0; RunoffEffectivenessAtMovingSolute=0; MaxEffectiveRunoff=0
          Solute Urea: Thickness=[100, 200, 300, 300, 300, 300]; InitialValues=[0, 0, 0, 0, 0, 0]; InitialValuesUnits=kg/ha; WaterTableConcentration=0; D0=0; DepthConstant=0; MaxDepthSoluteAccessible=0; RunoffEffectivenessAtMovingSolute=0; MaxEffectiveRunoff=0
          Physical
            Thickness  ParticleSizeSand  ParticleSizeSilt  ParticleSizeClay  Rocks     BD  AirDry  LL15  DUL  SAT  KS
            300        5                 65                30                0.309221  1   0.15    0.15  0.3  0.4  100
            300        5                 65                30                0.309221  1   0.15    0.15  0.3  0.4  100
            300        5                 65                30                0.309221  1   0.15    0.15  0.3  0.4  50
            300        5                 65                30                0.309221  1   0.15    0.15  0.3  0.4  40
            300        5                 65                30                0.309221  1   0.15    0.15  0.3  0.4  40
            300        5                 65                30                0.309221  1   0.15    0.15  0.3  0.4  40
            1200       5                 65                30                0.309221  1   0.15    0.15  0.3  0.4  40
            Rocks, ParticleSizeSand, ParticleSizeSilt, ParticleSizeClay source: Calculated
            SoilCrop KiwiFruitSoil: LL=[0.15, 0.15, 0.15, 0.15, 0.15, 0.15, 0.15]; KL=[1, 1, 1, 1, 1, 1, 1]; XF=[1, 1, 1, 1, 1, 1, 1]
          Nutrient
          SoilTemperature Temperature
        Manager AutomaticIrrigation
          allowIrrigation = True
          seasonStart = 1-Aug
          seasonEnd = 30-May
          seasonsAllocation = 1000
          triggerDeficit = 70
          targetDeficit = 95
          returndays = 3
          maximumAmount = 30
          depthPAWC = 650
          script: same as in Experiment.sensibility test.Block.AutomaticIrrigation
        Manager FactorLabels
          AGENT_NO = 999
          Lat = 999
          Lon = 999
          SoilStamp = SiltLoam
          GCM = ERA
          RCP = ERA
          TS = BaseLine
          script: same as in Experiment.sensibility test.Block.FactorLabels
        Manager AutomaticFertiliser
          EachYear = True
          Dates = 30-nov, 15-apr
          UseCritNThreshold = False
          CritNThreshold = 50
          CritNDepth = 75
          Depth = 50
          Amount = 25
          FertiliserType = UreaN
          script: same as in Experiment.sensibility test.Block.AutomaticFertiliser
        Manager WaterStatus
          DepthToMonitorFollowRoots = False
          MinimumDepth = 0
          DepthToMonitor = 600
          script: same as in Experiment.sensibility test.Block.WaterStatus
        Manager SowDateCv
          InitialRootDepth = 5
          CropToSow = Heyward_KK
          SowingDate = 05/25/2007 00:00:00
          script: same as in Experiment.sensibility test.Block.SowDateCv
        AgriChemical
        Operations
          2006-03-01  [Girdling].Apply()
        BiomassRemovalEvents OnPrune: NameOfPlantToRemoveFrom=KiwiFruit; RemovalType=3
          BiomassRemovalFractions:
            PlantName  OrganName  TypeString  LiveToRemove  DeadToRemove  LiveToResidue  DeadToResidue
            KiwiFruit  Trunk      Pruning     0             0             0              0
            KiwiFruit  Leaf       Pruning     0             0             0              0
            KiwiFruit  Stem       Pruning     0             0             0              0
            KiwiFruit  Root       Pruning     0             0             0              0
            KiwiFruit  Fruit      Pruning     0             0             0              0
        Girdling
        Manager SetBudNumber
          BudSetDate = 01-Jul
          BudNumber = 85
          RUE = 1.1
```csharp
using System.Diagnostics;
using APSIM.Core;
using APSIM.Shared.Utilities;
using Models.Core;
using Newtonsoft.Json;
using System;
using System.Collections.Generic;
using System.Linq;
using System;
using Models.Utilities;


namespace Models
{
    [Serializable]
    public class Script : Model, IStructureDependency
    {
        [Link] Clock clock;
        
        /// <summary>Structure instance supplied by APSIM.core.</summary>
        [field: NonSerialized]
        public IStructure Structure { private get; set; }
        
        [Description("Bud Set Date (dd-mmm)")]
        public string BudSetDate { get; set;} 
        [Description("Bud Number")]
        public double BudNumber { get; set;} 
        
        [Description("RUE")]
        public double RUE { get; set;} 
       
        
        
        [EventSubscribe("StartOfDay")]
        private void OnStartOfDay(object sender, EventArgs data)
        {
            if (!String.IsNullOrEmpty(BudSetDate))
            {
            //Debugger.Break();
            if (DateUtilities.DatesEqual(BudSetDate,clock.Today))
               {
               Structure.Set("[KiwiFruit].Phenology.BrokenBuds.Vegetative.MultiplyFunction.AllBuds.FixedValue", (object)BudNumber);
               //Structure.Set("[KiwiFruit].Leaf.Photosynthesis.RUE.FixedValue", (object)RUE);
               }
 
            }
            
        }
    }
}
```
        Manager SetPhaseCompletionDates
          FruitMatureDate = 27-Apr
```csharp
using Models.Soils.Nutrients;
using System;
using Models.Core;
using Models.PMF;
using Models.Soils;
using Models.Soils.Nutrients;
using Models.Utilities;
using APSIM.Shared.Utilities;

namespace Models
{
    [Serializable]
    public class Script : Model
    {
        [Link] Plant KiwiFruit;
        [Link] Clock clock;
        
        [Description("FruitMature Date (dd-mmm)")]
        public string FruitMatureDate { get; set;} 
        
        
        [EventSubscribe("StartOfDay")]
        private void OnStartOfDay(object sender, EventArgs data)
        {
            if (!String.IsNullOrEmpty(FruitMatureDate))
            {
            if (DateUtilities.DatesEqual("01-Jan",clock.Today))
               KiwiFruit.Phenology.SetPhaseCompletionDate(FruitMatureDate,"FruitMaturity");
            }
            
        }
    }
}
```
  DataStore
    ExcelInput ObsAllData: FileNames=[ObservAll.xlsx]; SheetNames=[BB, FlwrDOY, Flwrs]
    PredictedObserved PredictedObservedBB: PredictedTableName=Report; ObservedTableName=BB; FieldNameUsedForMatch=SimulationName; FieldName2UsedForMatch=Clock.Today.Year; FieldName3UsedForMatch=KiwiFruit.Phenology.CurrentStageName; AllColumns=false
    PredictedObserved PredictedObservedMaxBB: PredictedTableName=Stages; ObservedTableName=BB; FieldNameUsedForMatch=SimulationName; FieldName2UsedForMatch=Clock.Today.Year; FieldName3UsedForMatch=KiwiFruit.Phenology.CurrentStageName; AllColumns=false
    PredictedObserved PredictedObservedFloweringDOY: PredictedTableName=Stages; ObservedTableName=FlwrDOY; FieldNameUsedForMatch=SimulationName; FieldName2UsedForMatch=Clock.Today.Year; FieldName3UsedForMatch=KiwiFruit.Phenology.CurrentStageName; AllColumns=false
    PredictedObserved PredictedObservedFlowers: PredictedTableName=Report; ObservedTableName=Flwrs; FieldNameUsedForMatch=SimulationName; FieldName2UsedForMatch=Clock.Today.Year; FieldName3UsedForMatch=KiwiFruit.Phenology.CurrentStageName; AllColumns=false
    PredictedObserved PredictedObservedMaxFlowers: PredictedTableName=Stages; ObservedTableName=Flwrs; FieldNameUsedForMatch=SimulationName; FieldName2UsedForMatch=Clock.Today.Year; FieldName3UsedForMatch=KiwiFruit.Phenology.CurrentStageName; AllColumns=false
    ExcelInput HC_BB_Flwr: FileNames=[HC_Observations.xlsx]; SheetNames=[BB-HC, Flwr-HC, FlwrDOY-HC]
    PredictedObserved PredictedObservedBB-HC: PredictedTableName=Report; ObservedTableName=BB-HC; FieldNameUsedForMatch=SimulationName; FieldName2UsedForMatch=Clock.Today.Year; FieldName3UsedForMatch=KiwiFruit.Phenology.CurrentStageName; AllColumns=false
    PredictedObserved PredictedObservedMaxBBHC: PredictedTableName=Stages; ObservedTableName=BB-HC; FieldNameUsedForMatch=SimulationName; FieldName2UsedForMatch=Clock.Today.Year; FieldName3UsedForMatch=KiwiFruit.Phenology.CurrentStageName; AllColumns=false
    PredictedObserved PredictedObservedFloweringDOY-HC: PredictedTableName=Stages; ObservedTableName=FlwrDOY-HC; FieldNameUsedForMatch=SimulationName; FieldName2UsedForMatch=Clock.Today.Year; FieldName3UsedForMatch=KiwiFruit.Phenology.CurrentStageName; AllColumns=false
    PredictedObserved PredictedObservedMaxFlowers-HC: PredictedTableName=Stages; ObservedTableName=Flwr-HC; FieldNameUsedForMatch=SimulationName; FieldName2UsedForMatch=Clock.Today.Year; FieldName3UsedForMatch=KiwiFruit.Phenology.CurrentStageName; AllColumns=false
    ExcelInput Yield: FileNames=[Yield.xlsx]; SheetNames=[SingleBerryFW, SingleBerryDW, SingleBerryDMC, FullBloom]
    PredictedObserved PredictedObservedSingleBerryFW: PredictedTableName=Report; ObservedTableName=SingleBerryFW; FieldNameUsedForMatch=SimulationName; FieldName2UsedForMatch=Clock.Today.Year; FieldName3UsedForMatch=KiwiFruit.Phenology.CurrentStageName; AllColumns=false
    PredictedObserved PredictedObservedSingleBerryDW: PredictedTableName=Report; ObservedTableName=SingleBerryDW; FieldNameUsedForMatch=SimulationName; FieldName2UsedForMatch=Clock.Today.Year; FieldName3UsedForMatch=KiwiFruit.Phenology.CurrentStageName; AllColumns=false
    PredictedObserved PredictedObservedSingleBerryDMC: PredictedTableName=Stages; ObservedTableName=SingleBerryDMC; FieldNameUsedForMatch=SimulationName; FieldName2UsedForMatch=Clock.Today.Year; FieldName3UsedForMatch=KiwiFruit.Phenology.CurrentStageName; AllColumns=false
    PredictedObserved PredictedObservedFullBloom: PredictedTableName=Stages; ObservedTableName=FullBloom; FieldNameUsedForMatch=SimulationName; FieldName2UsedForMatch=Clock.Today.Year; FieldName3UsedForMatch=KiwiFruit.Phenology.CurrentStageName; AllColumns=false
  Simulation HWTP2025HC (disabled)
    Weather: FileName=Te Puke.met
    Clock: Start=2023-01-01; End=2025-06-30
    Summary
    SoilArbitrator Soil Arbitrator
    Zone Block: Area=1; Slope=0; AspectAngle=0; Altitude=50
      Report: EventNames=[Clock].DoReport
        VariableNames:
          [KiwiFruit].Leaf.NodeNumber
          [Clock].Today
          [KiwiFruit].Phenology.Stage
          [KiwiFruit].Phenology.CurrentStageName
          [KiwiFruit].Phenology.ProportionBB
          [KiwiFruit].Phenology.BrokenBuds
          [KiwiFruit].Phenology.BudBurstDOY
          [KiwiFruit].Phenology.BrokenBuds.Vegetative.BrokenBuds.Max_buds
          [KiwiFruit].Phenology.EndoDormancy.ProgressThroughPhase
          [KiwiFruit].Phenology.EcoDormancy.ProgressThroughPhase
          [KiwiFruit].Phenology.ProportionCU
          [KiwiFruit].Phenology.MaxBBP
          [KiwiFruit].Phenology.Flowering.ProgressThroughPhase
          [KiwiFruit].Phenology.FloweringDOY
          [KiwiFruit].Phenology.AccumulatedChillingPreEndo
      Report Stages
        VariableNames:
          [KiwiFruit].Phenology.MaxBBP
          [KiwiFruit].Phenology.FloweringDOY
      Plant KiwiFruit
      Fertiliser
      SurfaceOrganicMatter: InitialResidueName=wheat_stubble; InitialResidueType=wheat; InitialResidueMass=500; InitialStandingFraction=0; InitialCPR=0; InitialCNR=100
      Irrigation
      MicroClimate: a_interception=0; b_interception=1; c_interception=0; d_interception=0; SoilHeatFluxFraction=0.4; MinimumHeightDiffForNewLayer=0; NightInterceptionFraction=0.5; ReferenceHeight=2
      Manager ReportOnEvents: same as Experiment.sensibility test.Block.ReportOnEvents
      Manager Reset on date: same as Experiment.sensibility test.Block.Reset on date
      Soil: same as Experiment.sensibility test.Block.Soil
      Manager AutomaticIrrigation: same as Experiment.sensibility test.Block.AutomaticIrrigation
      Manager FactorLabels: same as Experiment.sensibility test.Block.FactorLabels
      Manager AutomaticFertiliser: same as Experiment.sensibility test.Block.AutomaticFertiliser
      Manager WaterStatus: same as Experiment.sensibility test.Block.WaterStatus
      Manager SowDateCv
        InitialRootDepth = 5
        CropToSow = Heyward_TP
        SowingDate = 05/25/2023 00:00:00
        BudNum = 25
```csharp
using Models.Soils;
using System;
using Models.Core;
using System.Collections.Generic;
using System.Text;
using Models.PMF;
using Models;
using System.Xml.Serialization;
using APSIM.Shared.Utilities;
using System.Data;
using Models.PMF.Interfaces;
using Models.Surface;

namespace Models
{
    [Serializable] 
    //[System.Xml.Serialization.XmlInclude(typeof(Model))]
    public class Script : Model
    {
        [Link] Plant KiwiFruit;
        [Link] Clock Clock;
        [Link] Zone zone;
        [Link] Simulation Simulation;
        [Link] SurfaceOrganicMatter SurfOM;
        
                
        [Description("Initial Root Depth")]
        public double InitialRootDepth { get; set; }
        [Description("Sown Crop")]
        public string CropToSow { get; set; }
        [Description("Sowing Date")]
        public DateTime SowingDate { get; set; }
        [Description("Number of Buds")]
        public double BudNum { get; set; }
        
        
        [EventSubscribe("DoManagement")]
        private void OnDoManagement(object sender, EventArgs e)
        {
            if (Clock.Today.Date == SowingDate)
            {
                KiwiFruit.Sow(cultivar: CropToSow, population: 9, depth: InitialRootDepth, rowSpacing: 500);}            
            
            
        }
    }
}
```
      AgriChemical
      Girdling
      Operations
        2024-07-25  [AgriChemical].Apply()
      BiomassRemovalEvents OnPrune: NameOfPlantToRemoveFrom=KiwiFruit; RemovalType=3
        BiomassRemovalFractions:
          PlantName  OrganName  TypeString  LiveToRemove  DeadToRemove  LiveToResidue  DeadToResidue
          KiwiFruit  Trunk      Pruning     0             0             0              0
          KiwiFruit  Leaf       Pruning     0             0             1              1
          KiwiFruit  Stem       Pruning     0             0             0              0
          KiwiFruit  Root       Pruning     0             0             0              0
          KiwiFruit  Fruit      Pruning     0             0             0              0
    Memo
      Steve Green's report : @@ZesIR-Avg Fruit growth (2025).xlsx
    Memo
      Steve Green's report : @@ZesIR-Avg Fruit growth (2025).xlsx
    Memo
      Steve Green's report : @@ZesIR-Avg Fruit growth (2025).xlsx
  Simulation HWKK2025HC (disabled)
    Weather: FileName=Kerikeri.met
    Clock: Start=2023-01-01; End=2025-06-30
    Summary
    SoilArbitrator Soil Arbitrator
    Zone Block: Area=1; Slope=0; AspectAngle=0; Altitude=50
      Report: same as HWTP2025HC.Block.Report
      Report Stages
        VariableNames:
          [KiwiFruit].Phenology.MaxBBP
          [KiwiFruit].Phenology.FloweringDOY
      Plant KiwiFruit
      Fertiliser
      SurfaceOrganicMatter: InitialResidueName=wheat_stubble; InitialResidueType=wheat; InitialResidueMass=500; InitialStandingFraction=0; InitialCPR=0; InitialCNR=100
      Irrigation
      MicroClimate: a_interception=0; b_interception=1; c_interception=0; d_interception=0; SoilHeatFluxFraction=0.4; MinimumHeightDiffForNewLayer=0; NightInterceptionFraction=0.5; ReferenceHeight=2
      Manager ReportOnEvents: same as Experiment.sensibility test.Block.ReportOnEvents
      Manager Reset on date: same as Experiment.sensibility test.Block.Reset on date
      Soil: same as Experiment.sensibility test.Block.Soil
      Manager AutomaticIrrigation: same as Experiment.sensibility test.Block.AutomaticIrrigation
      Manager FactorLabels: same as Experiment.sensibility test.Block.FactorLabels
      Manager AutomaticFertiliser: same as Experiment.sensibility test.Block.AutomaticFertiliser
      Manager WaterStatus: same as Experiment.sensibility test.Block.WaterStatus
      Manager SowDateCv
        InitialRootDepth = 5
        CropToSow = Heyward_KK
        SowingDate = 05/25/2023 00:00:00
        BudNum = 25
        script: same as in HWTP2025HC.Block.SowDateCv
      AgriChemical
      Girdling
      Operations
        2024-08-01  [AgriChemical].Apply()
      BiomassRemovalEvents OnPrune: same as HWTP2025HC.Block.OnPrune
    Memo
      Steve Green's report : @@ZesIR-Avg Fruit growth (2025).xlsx
    Memo
      Steve Green's report : @@ZesIR-Avg Fruit growth (2025).xlsx
    Memo
      Steve Green's report : @@ZesIR-Avg Fruit growth (2025).xlsx
  Simulation HW-BudbreakTP2020HiCane223
    Weather: FileName=Te Puke.met
    Clock: Start=2019-01-01; End=2021-06-30
    Summary
    SoilArbitrator Soil Arbitrator
    Zone Block: Area=1; Slope=0; AspectAngle=0; Altitude=50
      Report: EventNames=[Clock].DoReport
        VariableNames:
          [KiwiFruit].Leaf.Wt
          [KiwiFruit].Leaf.Canopy.Height
          [KiwiFruit].Leaf.NodeNumber
          [Clock].Today
          [KiwiFruit].Phenology.Stage
          [KiwiFruit].Phenology.CurrentStageName
          [KiwiFruit].Phenology.ProportionBB
          [KiwiFruit].Phenology.BrokenBuds
          [KiwiFruit].Phenology.BudBurstDOY
          [KiwiFruit].Phenology.BrokenBuds.Vegetative.BrokenBuds.Max_buds
          [KiwiFruit].Phenology.EndoDormancy.ProgressThroughPhase
          [KiwiFruit].Phenology.EcoDormancy.ProgressThroughPhase
          [KiwiFruit].Phenology.ProportionCU
          [KiwiFruit].Phenology.EarlyLeaf.ProgressThroughPhase
          [KiwiFruit].Phenology.Flowering.ProgressThroughPhase
          [KiwiFruit].Phenology.FloweringDOY
          [KiwiFruit].Phenology.AccumulatedChillingPreEndo
      Report Stages
        VariableNames:
          [KiwiFruit].Phenology.MaxBBP
          [KiwiFruit].Phenology.FloweringDOY
      Plant KiwiFruit
      Fertiliser
      SurfaceOrganicMatter: InitialResidueName=wheat_stubble; InitialResidueType=wheat; InitialResidueMass=500; InitialStandingFraction=0; InitialCPR=0; InitialCNR=100
      Irrigation
      MicroClimate: a_interception=0; b_interception=1; c_interception=0; d_interception=0; SoilHeatFluxFraction=0.4; MinimumHeightDiffForNewLayer=0; NightInterceptionFraction=0.5; ReferenceHeight=2
      Manager ReportOnEvents
        script: same as in Experiment.sensibility test.Block.ReportOnEvents
      Manager Reset on date: same as CropLoadSensibilityTest.CropLoadSensibility.Block.Reset on date
      Soil: same as CropLoadSensibilityTest.CropLoadSensibility.Block.Soil
      Manager AutomaticIrrigation: same as CropLoadSensibilityTest.CropLoadSensibility.Block.AutomaticIrrigation
      Manager FactorLabels: same as CropLoadSensibilityTest.CropLoadSensibility.Block.FactorLabels
      Manager AutomaticFertiliser: same as CropLoadSensibilityTest.CropLoadSensibility.Block.AutomaticFertiliser
      Manager WaterStatus: same as CropLoadSensibilityTest.CropLoadSensibility.Block.WaterStatus
      Manager SowDateCv
        InitialRootDepth = 5
        CropToSow = Heyward_TP
        SowingDate = 05/25/2019 00:00:00
        script: same as in Experiment.sensibility test.Block.SowDateCv
      AgriChemical
      Girdling
      Operations
        2020-08-10  [AgriChemical].Apply()
      BiomassRemovalEvents OnPrune: NameOfPlantToRemoveFrom=KiwiFruit; RemovalType=3
        BiomassRemovalFractions:
          PlantName  OrganName  TypeString  LiveToRemove  DeadToRemove  LiveToResidue  DeadToResidue
          KiwiFruit  Trunk      Pruning     0             0             0              0
          KiwiFruit  Leaf       Pruning     0             0             1              1
          KiwiFruit  Stem       Pruning     0             0             0              0
          KiwiFruit  Root       Pruning     0             0             0              0
          KiwiFruit  Fruit      Pruning     0             0             0              0
  Simulation HW-Budbreak-TP2020HiCane226
    Weather: FileName=Te Puke.met
    Clock: Start=2019-01-01; End=2021-06-30
    Summary
    SoilArbitrator Soil Arbitrator
    Zone Block: Area=1; Slope=0; AspectAngle=0; Altitude=50
      Report: same as HW-BudbreakTP2020HiCane223.Block.Report
      Report Stages
        VariableNames:
          [KiwiFruit].Phenology.MaxBBP
          [KiwiFruit].Phenology.FloweringDOY
      Plant KiwiFruit
      Fertiliser
      SurfaceOrganicMatter: InitialResidueName=wheat_stubble; InitialResidueType=wheat; InitialResidueMass=500; InitialStandingFraction=0; InitialCPR=0; InitialCNR=100
      Irrigation
      MicroClimate: a_interception=0; b_interception=1; c_interception=0; d_interception=0; SoilHeatFluxFraction=0.4; MinimumHeightDiffForNewLayer=0; NightInterceptionFraction=0.5; ReferenceHeight=2
      Manager ReportOnEvents: same as HW-BudbreakTP2020HiCane223.Block.ReportOnEvents
      Manager Reset on date: same as CropLoadSensibilityTest.CropLoadSensibility.Block.Reset on date
      Soil: same as CropLoadSensibilityTest.CropLoadSensibility.Block.Soil
      Manager AutomaticIrrigation: same as CropLoadSensibilityTest.CropLoadSensibility.Block.AutomaticIrrigation
      Manager FactorLabels: same as CropLoadSensibilityTest.CropLoadSensibility.Block.FactorLabels
      Manager AutomaticFertiliser: same as CropLoadSensibilityTest.CropLoadSensibility.Block.AutomaticFertiliser
      Manager WaterStatus: same as CropLoadSensibilityTest.CropLoadSensibility.Block.WaterStatus
      Manager SowDateCv: same as HW-BudbreakTP2020HiCane223.Block.SowDateCv
      AgriChemical
      Girdling
      Operations
        2020-08-13  [AgriChemical].Apply()
      BiomassRemovalEvents OnPrune: same as HW-BudbreakTP2020HiCane223.Block.OnPrune
  Simulation HWBBRawTP2021HiCane223
    Weather: FileName=Te Puke.met
    Clock: Start=2019-01-01; End=2023-06-30
    Summary
    SoilArbitrator Soil Arbitrator
    Zone Block: Area=1; Slope=0; AspectAngle=0; Altitude=50
      Report: same as HW-BudbreakTP2020HiCane223.Block.Report
      Report Stages
        VariableNames:
          [KiwiFruit].Phenology.MaxBBP
          [KiwiFruit].Phenology.FloweringDOY
      Plant KiwiFruit
      Fertiliser
      SurfaceOrganicMatter: InitialResidueName=wheat_stubble; InitialResidueType=wheat; InitialResidueMass=500; InitialStandingFraction=0; InitialCPR=0; InitialCNR=100
      Irrigation
      MicroClimate: a_interception=0; b_interception=1; c_interception=0; d_interception=0; SoilHeatFluxFraction=0.4; MinimumHeightDiffForNewLayer=0; NightInterceptionFraction=0.5; ReferenceHeight=2
      Manager ReportOnEvents: same as HW-BudbreakTP2020HiCane223.Block.ReportOnEvents
      Manager Reset on date: same as CropLoadSensibilityTest.CropLoadSensibility.Block.Reset on date
      Soil: same as CropLoadSensibilityTest.CropLoadSensibility.Block.Soil
      Manager AutomaticIrrigation: same as CropLoadSensibilityTest.CropLoadSensibility.Block.AutomaticIrrigation
      Manager FactorLabels: same as CropLoadSensibilityTest.CropLoadSensibility.Block.FactorLabels
      Manager AutomaticFertiliser: same as CropLoadSensibilityTest.CropLoadSensibility.Block.AutomaticFertiliser
      Manager WaterStatus: same as CropLoadSensibilityTest.CropLoadSensibility.Block.WaterStatus
      Manager SowDateCv: same as HW-BudbreakTP2020HiCane223.Block.SowDateCv
      AgriChemical
      Girdling
      Operations
        2021-08-11  [AgriChemical].Apply()
      BiomassRemovalEvents OnPrune: same as HW-BudbreakTP2020HiCane223.Block.OnPrune
  Simulation HWBBRawTP2021HiCane232
    Weather: FileName=Te Puke.met
    Clock: Start=2020-01-01; End=2022-06-30
    Summary
    SoilArbitrator Soil Arbitrator
    Zone Block: Area=1; Slope=0; AspectAngle=0; Altitude=50
      Report: same as HW-BudbreakTP2020HiCane223.Block.Report
      Report Stages
        VariableNames:
          [KiwiFruit].Phenology.MaxBBP
          [KiwiFruit].Phenology.FloweringDOY
      Plant KiwiFruit
      Fertiliser
      SurfaceOrganicMatter: InitialResidueName=wheat_stubble; InitialResidueType=wheat; InitialResidueMass=500; InitialStandingFraction=0; InitialCPR=0; InitialCNR=100
      Irrigation
      MicroClimate: a_interception=0; b_interception=1; c_interception=0; d_interception=0; SoilHeatFluxFraction=0.4; MinimumHeightDiffForNewLayer=0; NightInterceptionFraction=0.5; ReferenceHeight=2
      Manager ReportOnEvents: same as HW-BudbreakTP2020HiCane223.Block.ReportOnEvents
      Manager Reset on date: same as CropLoadSensibilityTest.CropLoadSensibility.Block.Reset on date
      Soil: same as CropLoadSensibilityTest.CropLoadSensibility.Block.Soil
      Manager AutomaticIrrigation: same as CropLoadSensibilityTest.CropLoadSensibility.Block.AutomaticIrrigation
      Manager FactorLabels: same as CropLoadSensibilityTest.CropLoadSensibility.Block.FactorLabels
      Manager AutomaticFertiliser: same as CropLoadSensibilityTest.CropLoadSensibility.Block.AutomaticFertiliser
      Manager WaterStatus: same as CropLoadSensibilityTest.CropLoadSensibility.Block.WaterStatus
      Manager SowDateCv
        InitialRootDepth = 5
        CropToSow = Heyward_TP
        SowingDate = 05/25/2020 00:00:00
        script: same as in Experiment.sensibility test.Block.SowDateCv
      AgriChemical
      Girdling
      Operations
        2021-08-20  [AgriChemical].Apply()
      BiomassRemovalEvents OnPrune: same as HW-BudbreakTP2020HiCane223.Block.OnPrune
  Simulation NBB2010HC236
    Weather: FileName=Kerikeri.met
    Clock: Start=2009-01-01; End=2011-06-30
    Summary
    SoilArbitrator Soil Arbitrator
    Zone Block: Area=1; Slope=0; AspectAngle=0; Altitude=50
      Report: same as HW-BudbreakTP2020HiCane223.Block.Report
      Report Stages
        VariableNames:
          [KiwiFruit].Phenology.MaxBBP
          [KiwiFruit].Phenology.FloweringDOY
      Plant KiwiFruit
      Fertiliser
      SurfaceOrganicMatter: InitialResidueName=wheat_stubble; InitialResidueType=wheat; InitialResidueMass=500; InitialStandingFraction=0; InitialCPR=0; InitialCNR=100
      Irrigation
      MicroClimate: a_interception=0; b_interception=1; c_interception=0; d_interception=0; SoilHeatFluxFraction=0.4; MinimumHeightDiffForNewLayer=0; NightInterceptionFraction=0.5; ReferenceHeight=2
      Manager ReportOnEvents: same as HW-BudbreakTP2020HiCane223.Block.ReportOnEvents
      Manager Reset on date: same as CropLoadSensibilityTest.CropLoadSensibility.Block.Reset on date
      Soil: same as CropLoadSensibilityTest.CropLoadSensibility.Block.Soil
      Manager AutomaticIrrigation: same as CropLoadSensibilityTest.CropLoadSensibility.Block.AutomaticIrrigation
      Manager FactorLabels: same as CropLoadSensibilityTest.CropLoadSensibility.Block.FactorLabels
      Manager AutomaticFertiliser: same as CropLoadSensibilityTest.CropLoadSensibility.Block.AutomaticFertiliser
      Manager WaterStatus: same as CropLoadSensibilityTest.CropLoadSensibility.Block.WaterStatus
      Manager SowDateCv
        InitialRootDepth = 5
        CropToSow = Heyward_KK
        SowingDate = 05/25/2009 00:00:00
        script: same as in Experiment.sensibility test.Block.SowDateCv
      AgriChemical
      Girdling
      Operations
        2010-08-24  [AgriChemical].Apply()
      BiomassRemovalEvents OnPrune: same as HW-BudbreakTP2020HiCane223.Block.OnPrune
  Simulation NBB2011HC248
    Weather: FileName=Kerikeri.met
    Clock: Start=2010-01-01; End=2012-06-30
    Summary
    SoilArbitrator Soil Arbitrator
    Zone Block: Area=1; Slope=0; AspectAngle=0; Altitude=50
      Report: same as HW-BudbreakTP2020HiCane223.Block.Report
      Report Stages
        VariableNames:
          [KiwiFruit].Phenology.MaxBBP
          [KiwiFruit].Phenology.FloweringDOY
      Plant KiwiFruit
      Fertiliser
      SurfaceOrganicMatter: InitialResidueName=wheat_stubble; InitialResidueType=wheat; InitialResidueMass=500; InitialStandingFraction=0; InitialCPR=0; InitialCNR=100
      Irrigation
      MicroClimate: a_interception=0; b_interception=1; c_interception=0; d_interception=0; SoilHeatFluxFraction=0.4; MinimumHeightDiffForNewLayer=0; NightInterceptionFraction=0.5; ReferenceHeight=2
      Manager ReportOnEvents: same as HW-BudbreakTP2020HiCane223.Block.ReportOnEvents
      Manager Reset on date: same as CropLoadSensibilityTest.CropLoadSensibility.Block.Reset on date
      Soil: same as CropLoadSensibilityTest.CropLoadSensibility.Block.Soil
      Manager AutomaticIrrigation: same as CropLoadSensibilityTest.CropLoadSensibility.Block.AutomaticIrrigation
      Manager FactorLabels: same as CropLoadSensibilityTest.CropLoadSensibility.Block.FactorLabels
      Manager AutomaticFertiliser: same as CropLoadSensibilityTest.CropLoadSensibility.Block.AutomaticFertiliser
      Manager WaterStatus: same as CropLoadSensibilityTest.CropLoadSensibility.Block.WaterStatus
      Manager SowDateCv
        InitialRootDepth = 5
        CropToSow = Heyward_KK
        SowingDate = 05/25/2010 00:00:00
        script: same as in Experiment.sensibility test.Block.SowDateCv
      AgriChemical
      Girdling
      Operations
        2011-09-05  [AgriChemical].Apply()
      BiomassRemovalEvents OnPrune: same as HW-BudbreakTP2020HiCane223.Block.OnPrune
  Simulation KKHaywardBB2013HC239
    Weather: FileName=Kerikeri.met
    Clock: Start=2012-01-01; End=2014-06-30
    Summary
    SoilArbitrator Soil Arbitrator
    Zone Block: Area=1; Slope=0; AspectAngle=0; Altitude=50
      Report: same as HW-BudbreakTP2020HiCane223.Block.Report
      Report Stages
        VariableNames:
          [KiwiFruit].Phenology.MaxBBP
          [KiwiFruit].Phenology.FloweringDOY
      Plant KiwiFruit
      Fertiliser
      SurfaceOrganicMatter: InitialResidueName=wheat_stubble; InitialResidueType=wheat; InitialResidueMass=500; InitialStandingFraction=0; InitialCPR=0; InitialCNR=100
      Irrigation
      MicroClimate: a_interception=0; b_interception=1; c_interception=0; d_interception=0; SoilHeatFluxFraction=0.4; MinimumHeightDiffForNewLayer=0; NightInterceptionFraction=0.5; ReferenceHeight=2
      Manager ReportOnEvents: same as HW-BudbreakTP2020HiCane223.Block.ReportOnEvents
      Manager Reset on date: same as CropLoadSensibilityTest.CropLoadSensibility.Block.Reset on date
      Soil: same as CropLoadSensibilityTest.CropLoadSensibility.Block.Soil
      Manager AutomaticIrrigation: same as CropLoadSensibilityTest.CropLoadSensibility.Block.AutomaticIrrigation
      Manager FactorLabels: same as CropLoadSensibilityTest.CropLoadSensibility.Block.FactorLabels
      Manager AutomaticFertiliser: same as CropLoadSensibilityTest.CropLoadSensibility.Block.AutomaticFertiliser
      Manager WaterStatus: same as CropLoadSensibilityTest.CropLoadSensibility.Block.WaterStatus
      Manager SowDateCv
        InitialRootDepth = 5
        CropToSow = Heyward_KK
        SowingDate = 05/25/2012 00:00:00
        script: same as in Experiment.sensibility test.Block.SowDateCv
      AgriChemical
      Girdling
      Operations
        2013-08-27  [AgriChemical].Apply()
      BiomassRemovalEvents OnPrune: same as HW-BudbreakTP2020HiCane223.Block.OnPrune
  Simulation KKHaywardBB2018HiCaneDriftstop239
    Weather: FileName=Kerikeri.met
    Clock: Start=2017-01-01; End=2019-06-30
    Summary
    SoilArbitrator Soil Arbitrator
    Zone Block: Area=1; Slope=0; AspectAngle=0; Altitude=50
      Report: same as HW-BudbreakTP2020HiCane223.Block.Report
      Report Stages
        VariableNames:
          [KiwiFruit].Phenology.MaxBBP
          [KiwiFruit].Phenology.FloweringDOY
      Plant KiwiFruit
      Fertiliser
      SurfaceOrganicMatter: InitialResidueName=wheat_stubble; InitialResidueType=wheat; InitialResidueMass=500; InitialStandingFraction=0; InitialCPR=0; InitialCNR=100
      Irrigation
      MicroClimate: a_interception=0; b_interception=1; c_interception=0; d_interception=0; SoilHeatFluxFraction=0.4; MinimumHeightDiffForNewLayer=0; NightInterceptionFraction=0.5; ReferenceHeight=2
      Manager ReportOnEvents: same as HW-BudbreakTP2020HiCane223.Block.ReportOnEvents
      Manager Reset on date: same as CropLoadSensibilityTest.CropLoadSensibility.Block.Reset on date
      Soil: same as CropLoadSensibilityTest.CropLoadSensibility.Block.Soil
      Manager AutomaticIrrigation: same as CropLoadSensibilityTest.CropLoadSensibility.Block.AutomaticIrrigation
      Manager FactorLabels: same as CropLoadSensibilityTest.CropLoadSensibility.Block.FactorLabels
      Manager AutomaticFertiliser: same as CropLoadSensibilityTest.CropLoadSensibility.Block.AutomaticFertiliser
      Manager WaterStatus: same as CropLoadSensibilityTest.CropLoadSensibility.Block.WaterStatus
      Manager SowDateCv
        InitialRootDepth = 5
        CropToSow = Heyward_KK
        SowingDate = 05/25/2017 00:00:00
        script: same as in Experiment.sensibility test.Block.SowDateCv
      AgriChemical
      Girdling
      Operations
        2018-08-27  [AgriChemical].Apply()
      BiomassRemovalEvents OnPrune: same as HW-BudbreakTP2020HiCane223.Block.OnPrune
  Simulation KKHaywardBB2018HiCaneDriftstop248
    Weather: FileName=Kerikeri.met
    Clock: Start=2017-01-01; End=2019-06-30
    Summary
    SoilArbitrator Soil Arbitrator
    Zone Block: Area=1; Slope=0; AspectAngle=0; Altitude=50
      Report: same as HW-BudbreakTP2020HiCane223.Block.Report
      Report Stages
        VariableNames:
          [KiwiFruit].Phenology.MaxBBP
          [KiwiFruit].Phenology.FloweringDOY
      Plant KiwiFruit
      Fertiliser
      SurfaceOrganicMatter: InitialResidueName=wheat_stubble; InitialResidueType=wheat; InitialResidueMass=500; InitialStandingFraction=0; InitialCPR=0; InitialCNR=100
      Irrigation
      MicroClimate: a_interception=0; b_interception=1; c_interception=0; d_interception=0; SoilHeatFluxFraction=0.4; MinimumHeightDiffForNewLayer=0; NightInterceptionFraction=0.5; ReferenceHeight=2
      Manager ReportOnEvents: same as HW-BudbreakTP2020HiCane223.Block.ReportOnEvents
      Manager Reset on date: same as CropLoadSensibilityTest.CropLoadSensibility.Block.Reset on date
      Soil: same as CropLoadSensibilityTest.CropLoadSensibility.Block.Soil
      Manager AutomaticIrrigation: same as CropLoadSensibilityTest.CropLoadSensibility.Block.AutomaticIrrigation
      Manager FactorLabels: same as CropLoadSensibilityTest.CropLoadSensibility.Block.FactorLabels
      Manager AutomaticFertiliser: same as CropLoadSensibilityTest.CropLoadSensibility.Block.AutomaticFertiliser
      Manager WaterStatus: same as CropLoadSensibilityTest.CropLoadSensibility.Block.WaterStatus
      Manager SowDateCv: same as KKHaywardBB2018HiCaneDriftstop239.Block.SowDateCv
      AgriChemical
      Girdling
      Operations
        2018-09-05  [AgriChemical].Apply()
      BiomassRemovalEvents OnPrune: same as HW-BudbreakTP2020HiCane223.Block.OnPrune
  Simulation HaywardBB2019HCDS236
    Weather: FileName=Kerikeri.met
    Clock: Start=2018-01-01; End=2020-06-30
    Summary
    SoilArbitrator Soil Arbitrator
    Zone Block: Area=1; Slope=0; AspectAngle=0; Altitude=50
      Report: same as HW-BudbreakTP2020HiCane223.Block.Report
      Report Stages
        VariableNames:
          [KiwiFruit].Phenology.MaxBBP
          [KiwiFruit].Phenology.FloweringDOY
      Plant KiwiFruit
      Fertiliser
      SurfaceOrganicMatter: InitialResidueName=wheat_stubble; InitialResidueType=wheat; InitialResidueMass=500; InitialStandingFraction=0; InitialCPR=0; InitialCNR=100
      Irrigation
      MicroClimate: a_interception=0; b_interception=1; c_interception=0; d_interception=0; SoilHeatFluxFraction=0.4; MinimumHeightDiffForNewLayer=0; NightInterceptionFraction=0.5; ReferenceHeight=2
      Manager ReportOnEvents: same as HW-BudbreakTP2020HiCane223.Block.ReportOnEvents
      Manager Reset on date: same as CropLoadSensibilityTest.CropLoadSensibility.Block.Reset on date
      Soil: same as CropLoadSensibilityTest.CropLoadSensibility.Block.Soil
      Manager AutomaticIrrigation: same as CropLoadSensibilityTest.CropLoadSensibility.Block.AutomaticIrrigation
      Manager FactorLabels: same as CropLoadSensibilityTest.CropLoadSensibility.Block.FactorLabels
      Manager AutomaticFertiliser: same as CropLoadSensibilityTest.CropLoadSensibility.Block.AutomaticFertiliser
      Manager WaterStatus: same as CropLoadSensibilityTest.CropLoadSensibility.Block.WaterStatus
      Manager SowDateCv
        InitialRootDepth = 5
        CropToSow = Heyward_KK
        SowingDate = 05/25/2018 00:00:00
        script: same as in Experiment.sensibility test.Block.SowDateCv
      AgriChemical
      Girdling
      Operations
        2019-08-24  [AgriChemical].Apply()
      BiomassRemovalEvents OnPrune: same as HW-BudbreakTP2020HiCane223.Block.OnPrune
  Simulation HaywardBB2019HCDS243
    Weather: FileName=Kerikeri.met
    Clock: Start=2018-01-01; End=2020-06-30
    Summary
    SoilArbitrator Soil Arbitrator
    Zone Block: Area=1; Slope=0; AspectAngle=0; Altitude=50
      Report: same as HW-BudbreakTP2020HiCane223.Block.Report
      Report Stages
        VariableNames:
          [KiwiFruit].Phenology.MaxBBP
          [KiwiFruit].Phenology.FloweringDOY
      Plant KiwiFruit
      Fertiliser
      SurfaceOrganicMatter: InitialResidueName=wheat_stubble; InitialResidueType=wheat; InitialResidueMass=500; InitialStandingFraction=0; InitialCPR=0; InitialCNR=100
      Irrigation
      MicroClimate: a_interception=0; b_interception=1; c_interception=0; d_interception=0; SoilHeatFluxFraction=0.4; MinimumHeightDiffForNewLayer=0; NightInterceptionFraction=0.5; ReferenceHeight=2
      Manager ReportOnEvents: same as HW-BudbreakTP2020HiCane223.Block.ReportOnEvents
      Manager Reset on date: same as CropLoadSensibilityTest.CropLoadSensibility.Block.Reset on date
      Soil: same as CropLoadSensibilityTest.CropLoadSensibility.Block.Soil
      Manager AutomaticIrrigation: same as CropLoadSensibilityTest.CropLoadSensibility.Block.AutomaticIrrigation
      Manager FactorLabels: same as CropLoadSensibilityTest.CropLoadSensibility.Block.FactorLabels
      Manager AutomaticFertiliser: same as CropLoadSensibilityTest.CropLoadSensibility.Block.AutomaticFertiliser
      Manager WaterStatus: same as CropLoadSensibilityTest.CropLoadSensibility.Block.WaterStatus
      Manager SowDateCv: same as HaywardBB2019HCDS236.Block.SowDateCv
      AgriChemical
      Girdling
      Operations
        2019-08-31  [AgriChemical].Apply()
      BiomassRemovalEvents OnPrune: same as HW-BudbreakTP2020HiCane223.Block.OnPrune
  Simulation HWBBRaw2020HiCaneDriftstop247
    Weather: FileName=Kerikeri.met
    Clock: Start=2019-01-01; End=2021-06-30
    Summary
    SoilArbitrator Soil Arbitrator
    Zone Block: Area=1; Slope=0; AspectAngle=0; Altitude=50
      Report: same as HW-BudbreakTP2020HiCane223.Block.Report
      Report Stages
        VariableNames:
          [KiwiFruit].Phenology.MaxBBP
          [KiwiFruit].Phenology.FloweringDOY
      Plant KiwiFruit
      Fertiliser
      SurfaceOrganicMatter: InitialResidueName=wheat_stubble; InitialResidueType=wheat; InitialResidueMass=500; InitialStandingFraction=0; InitialCPR=0; InitialCNR=100
      Irrigation
      MicroClimate: a_interception=0; b_interception=1; c_interception=0; d_interception=0; SoilHeatFluxFraction=0.4; MinimumHeightDiffForNewLayer=0; NightInterceptionFraction=0.5; ReferenceHeight=2
      Manager ReportOnEvents: same as HW-BudbreakTP2020HiCane223.Block.ReportOnEvents
      Manager Reset on date: same as CropLoadSensibilityTest.CropLoadSensibility.Block.Reset on date
      Soil: same as CropLoadSensibilityTest.CropLoadSensibility.Block.Soil
      Manager AutomaticIrrigation: same as CropLoadSensibilityTest.CropLoadSensibility.Block.AutomaticIrrigation
      Manager FactorLabels: same as CropLoadSensibilityTest.CropLoadSensibility.Block.FactorLabels
      Manager AutomaticFertiliser: same as CropLoadSensibilityTest.CropLoadSensibility.Block.AutomaticFertiliser
      Manager WaterStatus: same as CropLoadSensibilityTest.CropLoadSensibility.Block.WaterStatus
      Manager SowDateCv
        InitialRootDepth = 5
        CropToSow = Heyward_KK
        SowingDate = 05/25/2019 00:00:00
        script: same as in Experiment.sensibility test.Block.SowDateCv
      AgriChemical
      Girdling
      Operations
        2020-09-03  [AgriChemical].Apply()
      BiomassRemovalEvents OnPrune: same as HW-BudbreakTP2020HiCane223.Block.OnPrune
  Simulation HWBBSpray2020HiCaneDriftstop248
    Weather: FileName=Kerikeri.met
    Clock: Start=2019-01-01; End=2021-06-30
    Summary
    SoilArbitrator Soil Arbitrator
    Zone Block: Area=1; Slope=0; AspectAngle=0; Altitude=50
      Report: same as HW-BudbreakTP2020HiCane223.Block.Report
      Report Stages
        VariableNames:
          [KiwiFruit].Phenology.MaxBBP
          [KiwiFruit].Phenology.FloweringDOY
      Plant KiwiFruit
      Fertiliser
      SurfaceOrganicMatter: InitialResidueName=wheat_stubble; InitialResidueType=wheat; InitialResidueMass=500; InitialStandingFraction=0; InitialCPR=0; InitialCNR=100
      Irrigation
      MicroClimate: a_interception=0; b_interception=1; c_interception=0; d_interception=0; SoilHeatFluxFraction=0.4; MinimumHeightDiffForNewLayer=0; NightInterceptionFraction=0.5; ReferenceHeight=2
      Manager ReportOnEvents: same as HW-BudbreakTP2020HiCane223.Block.ReportOnEvents
      Manager Reset on date: same as CropLoadSensibilityTest.CropLoadSensibility.Block.Reset on date
      Soil: same as CropLoadSensibilityTest.CropLoadSensibility.Block.Soil
      Manager AutomaticIrrigation: same as CropLoadSensibilityTest.CropLoadSensibility.Block.AutomaticIrrigation
      Manager FactorLabels: same as CropLoadSensibilityTest.CropLoadSensibility.Block.FactorLabels
      Manager AutomaticFertiliser: same as CropLoadSensibilityTest.CropLoadSensibility.Block.AutomaticFertiliser
      Manager WaterStatus: same as CropLoadSensibilityTest.CropLoadSensibility.Block.WaterStatus
      Manager SowDateCv: same as HWBBRaw2020HiCaneDriftstop247.Block.SowDateCv
      AgriChemical
      Girdling
      Operations
        2020-09-04  [AgriChemical].Apply()
      BiomassRemovalEvents OnPrune: NameOfPlantToRemoveFrom=KiwiFruit; RemovalType=3
        BiomassRemovalFractions:
          PlantName  OrganName  TypeString  LiveToRemove  DeadToRemove  LiveToResidue  DeadToResidue
          KiwiFruit  Trunk      Pruning     0             0             0              0
          KiwiFruit  Leaf       Pruning     0             0             1              1
          KiwiFruit  Stem       Pruning     0             0             0.7            1
          KiwiFruit  Root       Pruning     0             0             0              0
          KiwiFruit  Fruit      Pruning     0.9           0             0.1            0
    Memo
      Steve Green's report : @@ZesIR-Avg Fruit growth (2025).xlsx
    Memo
      Steve Green's report : @@ZesIR-Avg Fruit growth (2025).xlsx
    Memo
      Steve Green's report : @@ZesIR-Avg Fruit growth (2025).xlsx
  Simulation HWBBRaw2020HiCaneDriftstop235
    Weather: FileName=Kerikeri.met
    Clock: Start=2019-01-01; End=2021-06-30
    Summary
    SoilArbitrator Soil Arbitrator
    Zone Block: Area=1; Slope=0; AspectAngle=0; Altitude=50
      Report: same as HW-BudbreakTP2020HiCane223.Block.Report
      Report Stages
        VariableNames:
          [KiwiFruit].Phenology.MaxBBP
          [KiwiFruit].Phenology.FloweringDOY
      Plant KiwiFruit
      Fertiliser
      SurfaceOrganicMatter: InitialResidueName=wheat_stubble; InitialResidueType=wheat; InitialResidueMass=500; InitialStandingFraction=0; InitialCPR=0; InitialCNR=100
      Irrigation
      MicroClimate: a_interception=0; b_interception=1; c_interception=0; d_interception=0; SoilHeatFluxFraction=0.4; MinimumHeightDiffForNewLayer=0; NightInterceptionFraction=0.5; ReferenceHeight=2
      Manager ReportOnEvents: same as HW-BudbreakTP2020HiCane223.Block.ReportOnEvents
      Manager Reset on date: same as CropLoadSensibilityTest.CropLoadSensibility.Block.Reset on date
      Soil: same as CropLoadSensibilityTest.CropLoadSensibility.Block.Soil
      Manager AutomaticIrrigation: same as CropLoadSensibilityTest.CropLoadSensibility.Block.AutomaticIrrigation
      Manager FactorLabels: same as CropLoadSensibilityTest.CropLoadSensibility.Block.FactorLabels
      Manager AutomaticFertiliser: same as CropLoadSensibilityTest.CropLoadSensibility.Block.AutomaticFertiliser
      Manager WaterStatus: same as CropLoadSensibilityTest.CropLoadSensibility.Block.WaterStatus
      Manager SowDateCv: same as HWBBRaw2020HiCaneDriftstop247.Block.SowDateCv
      AgriChemical
      Girdling
      Operations
        2020-08-22  [AgriChemical].Apply()
      BiomassRemovalEvents OnPrune: same as HW-BudbreakTP2020HiCane223.Block.OnPrune
  Simulation HWBBRaw2020HiCaneDriftstop240
    Weather: FileName=Kerikeri.met
    Clock: Start=2019-01-01; End=2021-06-30
    Summary
    SoilArbitrator Soil Arbitrator
    Zone Block: Area=1; Slope=0; AspectAngle=0; Altitude=50
      Report: same as HW-BudbreakTP2020HiCane223.Block.Report
      Report Stages
        VariableNames:
          [KiwiFruit].Phenology.MaxBBP
          [KiwiFruit].Phenology.FloweringDOY
      Plant KiwiFruit
      Fertiliser
      SurfaceOrganicMatter: InitialResidueName=wheat_stubble; InitialResidueType=wheat; InitialResidueMass=500; InitialStandingFraction=0; InitialCPR=0; InitialCNR=100
      Irrigation
      MicroClimate: a_interception=0; b_interception=1; c_interception=0; d_interception=0; SoilHeatFluxFraction=0.4; MinimumHeightDiffForNewLayer=0; NightInterceptionFraction=0.5; ReferenceHeight=2
      Manager ReportOnEvents: same as HW-BudbreakTP2020HiCane223.Block.ReportOnEvents
      Manager Reset on date: same as CropLoadSensibilityTest.CropLoadSensibility.Block.Reset on date
      Soil: same as CropLoadSensibilityTest.CropLoadSensibility.Block.Soil
      Manager AutomaticIrrigation: same as CropLoadSensibilityTest.CropLoadSensibility.Block.AutomaticIrrigation
      Manager FactorLabels: same as CropLoadSensibilityTest.CropLoadSensibility.Block.FactorLabels
      Manager AutomaticFertiliser: same as CropLoadSensibilityTest.CropLoadSensibility.Block.AutomaticFertiliser
      Manager WaterStatus: same as CropLoadSensibilityTest.CropLoadSensibility.Block.WaterStatus
      Manager SowDateCv: same as HWBBRaw2020HiCaneDriftstop247.Block.SowDateCv
      AgriChemical
      Girdling
      Operations
        2020-08-27  [AgriChemical].Apply()
      BiomassRemovalEvents OnPrune: same as HW-BudbreakTP2020HiCane223.Block.OnPrune
  Simulation HWBBSpray2020HiCaneDriftstop243
    Weather: FileName=Kerikeri.met
    Clock: Start=2018-01-01; End=2021-06-30
    Summary
    SoilArbitrator Soil Arbitrator
    Zone Block: Area=1; Slope=0; AspectAngle=0; Altitude=50
      Report: same as HW-BudbreakTP2020HiCane223.Block.Report
      Report Stages
        VariableNames:
          [KiwiFruit].Phenology.MaxBBP
          [KiwiFruit].Phenology.FloweringDOY
      Plant KiwiFruit
      Fertiliser
      SurfaceOrganicMatter: InitialResidueName=wheat_stubble; InitialResidueType=wheat; InitialResidueMass=500; InitialStandingFraction=0; InitialCPR=0; InitialCNR=100
      Irrigation
      MicroClimate: a_interception=0; b_interception=1; c_interception=0; d_interception=0; SoilHeatFluxFraction=0.4; MinimumHeightDiffForNewLayer=0; NightInterceptionFraction=0.5; ReferenceHeight=2
      Manager ReportOnEvents: same as HW-BudbreakTP2020HiCane223.Block.ReportOnEvents
      Manager Reset on date: same as CropLoadSensibilityTest.CropLoadSensibility.Block.Reset on date
      Soil: Latitude=0; Longitude=0
        LayerStructure: Thickness=[200, 200, 200, 200, 200, 200, 300, 300, 400, 800]
        Chemical: PHUnits=Water
          Thickness  PH   CEC
          100        6.6  12.44
          200        6.2  11.6525
          300        5.7  11.045
          300        5.5  10.6625
          300        5.5  9.4025
          300        5.5  9.4025
          CEC source: Calculated
        Water: Thickness=[300, 300, 300, 300, 300, 300, 1200]; InitialValues=[0.3, 0.21, 0.18, 0.17, 0.17, 0.17, 0.17]; FilledFromTop=false
        WaterBalance SoilWater: same as CropLoadSensibilityTest.CropLoadSensibility.Block.Soil.SoilWater
        Organic: same as CropLoadSensibilityTest.CropLoadSensibility.Block.Soil.Organic
        OutputLayers: Thickness=[300, 300, 300, 300, 300, 300]
        Solute NO3: same as CropLoadSensibilityTest.CropLoadSensibility.Block.Soil.NO3
        Solute NH4: same as CropLoadSensibilityTest.CropLoadSensibility.Block.Soil.NH4
        Solute Urea: same as CropLoadSensibilityTest.CropLoadSensibility.Block.Soil.Urea
        Physical: same as CropLoadSensibilityTest.CropLoadSensibility.Block.Soil.Physical
        Nutrient
        SoilTemperature Temperature
      Manager AutomaticIrrigation: same as CropLoadSensibilityTest.CropLoadSensibility.Block.AutomaticIrrigation
      Manager FactorLabels: same as CropLoadSensibilityTest.CropLoadSensibility.Block.FactorLabels
      Manager AutomaticFertiliser: same as CropLoadSensibilityTest.CropLoadSensibility.Block.AutomaticFertiliser
      Manager WaterStatus: same as CropLoadSensibilityTest.CropLoadSensibility.Block.WaterStatus
      Manager SowDateCv
        InitialRootDepth = 5
        CropToSow = Heyward_KK
        SowingDate = 05/25/2018 00:00:00
```csharp
using Models.Soils;
using System;
using Models.Core;
using System.Collections.Generic;
using System.Text;
using Models.PMF;
using Models;
using System.Xml.Serialization;
using APSIM.Shared.Utilities;
using System.Data;
using Models.PMF.Interfaces;
using Models.Surface;

namespace Models
{
    [Serializable] 
    //[System.Xml.Serialization.XmlInclude(typeof(Model))]
    public class Script : Model
    {
        [Link] Plant KiwiFruit;
        [Link] Clock Clock;
        [Link] Zone zone;
        [Link] Simulation Simulation;
        [Link] SurfaceOrganicMatter SurfOM;
        
                
        [Description("Initial Root Depth")]
        public double InitialRootDepth { get; set; }
        [Description("Sown Crop")]
        public string CropToSow { get; set; }
        [Description("Sowing Date")]
        public DateTime SowingDate { get; set; }
        
        
        [EventSubscribe("DoManagement")]
        private void OnDoManagement(object sender, EventArgs e)
        {
            if (Clock.Today.Date == SowingDate)
            {
                KiwiFruit.Sow(cultivar: CropToSow, population: 0.041, depth: InitialRootDepth, rowSpacing: 4);}            
            
            
        }
    }
}
```
      AgriChemical
      Girdling
      Operations
        2020-08-30  [AgriChemical].Apply()
      BiomassRemovalEvents OnPrune: NameOfPlantToRemoveFrom=KiwiFruit; RemovalType=3
        BiomassRemovalFractions:
          PlantName  OrganName  TypeString  LiveToRemove  DeadToRemove  LiveToResidue  DeadToResidue
          KiwiFruit  Trunk      Pruning     0             0             0              0
          KiwiFruit  Leaf       Pruning     0             0             1              1
          KiwiFruit  Stem       Pruning     0             0             1              1
          KiwiFruit  Root       Pruning     0             0             0              0
          KiwiFruit  Fruit      Pruning     0.9           0             0.1            0
    Memo
      Relationship between canopy density and fruit quality of kiwifruit

      Abstract: mean leaf area index (LAI) values ranging from 3.0 to 5.5 m2 (Hayward)
    Memo
      Relationship between canopy density and fruit quality of kiwifruit

      Abstract: mean leaf area index (LAI) values ranging from 3.0 to 5.5 m2 (Hayward)
    Memo
      Annette Richardson's thesis: Fig 3.10.A

      Carbon acquisition of single shoots on daily basis (~photosynthesis?)
    Memo
      Annette Richardson's thesis: Fig 3.10.A

      Carbon acquisition of single shoots on daily basis (~photosynthesis?)
  Simulation Gold_Kiwifruit_LAI_Test
    Weather: FileName=Kerikeri.met
    Clock: Start=2007-01-01; End=2015-06-30
    Summary
    SoilArbitrator Soil Arbitrator
    Zone Block: Area=1; Slope=0; AspectAngle=0; Altitude=50
      Report: EventNames=[Clock].DoReport
      Report Stages
        VariableNames:
          [KiwiFruit].Phenology.MaxBBP
          [KiwiFruit].Phenology.FloweringDOY
      Plant KiwiFruit
      Fertiliser
      SurfaceOrganicMatter: InitialResidueName=wheat_stubble; InitialResidueType=wheat; InitialResidueMass=500; InitialStandingFraction=0; InitialCPR=0; InitialCNR=100
      Irrigation
      MicroClimate: a_interception=0; b_interception=1; c_interception=0; d_interception=0; SoilHeatFluxFraction=0.4; MinimumHeightDiffForNewLayer=0; NightInterceptionFraction=0.5; ReferenceHeight=2
      Manager ReportOnEvents: same as HW-BudbreakTP2020HiCane223.Block.ReportOnEvents
      Manager Reset on date: same as CropLoadSensibilityTest.CropLoadSensibility.Block.Reset on date
      Soil: same as HWBBSpray2020HiCaneDriftstop243.Block.Soil
      Manager AutomaticIrrigation: same as CropLoadSensibilityTest.CropLoadSensibility.Block.AutomaticIrrigation
      Manager FactorLabels: same as CropLoadSensibilityTest.CropLoadSensibility.Block.FactorLabels
      Manager AutomaticFertiliser: same as CropLoadSensibilityTest.CropLoadSensibility.Block.AutomaticFertiliser
      Manager WaterStatus: same as CropLoadSensibilityTest.CropLoadSensibility.Block.WaterStatus
      Manager SowDateCv
        InitialRootDepth = 5
        CropToSow = Gold
        SowingDate = 05/25/2007 00:00:00
```csharp
using Models.Soils;
using System;
using Models.Core;
using System.Collections.Generic;
using System.Text;
using Models.PMF;
using Models;
using System.Xml.Serialization;
using APSIM.Shared.Utilities;
using System.Data;
using Models.PMF.Interfaces;
using Models.Surface;

namespace Models
{
    [Serializable] 
    //[System.Xml.Serialization.XmlInclude(typeof(Model))]
    public class Script : Model
    {
        [Link] Plant KiwiFruit;
        [Link] Clock Clock;
        [Link] Zone zone;
        [Link] Simulation Simulation;
        [Link] SurfaceOrganicMatter SurfOM;
        
                
        [Description("Initial Root Depth")]
        public double InitialRootDepth { get; set; }
        [Description("Sown Crop")]
        public string CropToSow { get; set; }
        [Description("Sowing Date")]
        public DateTime SowingDate { get; set; }
        
        
        [EventSubscribe("DoManagement")]
        private void OnDoManagement(object sender, EventArgs e)
        {
            if (Clock.Today.Date == SowingDate)
            {
                KiwiFruit.Sow(cultivar: CropToSow, population: 1, depth: InitialRootDepth, rowSpacing: 500);}            
            
            
        }
    }
}
```
      AgriChemical
      Girdling
      Operations
      BiomassRemovalEvents OnPrune: same as CropLoadSensibilityTest.CropLoadSensibility.Block.OnPrune
    Memo
      Vigor-controlling rootstocks affect early shoot growth and leaf area development of kiwifruit

      Fig.1, typical LAI of 2-5 m2 (Gold)

      To check the single shoot areas, remove the factor of "[Leaf].DeltaLAI.Vegetative.Delta.VineShoots.ShootNumber" to just calculate lai for 1 shoot. Compare with the following:

      Table 5, single shoot leaf area (short/medium/long shoots) ranges from 0.06 to 0.25 m2.
    Memo: same as Gold_Kiwifruit_LAI_Test.Memo
  Folder BBControl
    Simulation TPROB4BB2016control
      Weather: FileName=Te Puke.met
      Clock: Start=2015-01-01; End=2017-06-30
      Summary
      SoilArbitrator Soil Arbitrator
      Zone Block: Area=1; Slope=0; AspectAngle=0; Altitude=50
        Report: EventNames=[Clock].DoReport
          VariableNames:
            [KiwiFruit].Leaf.NodeNumber
            [Clock].Today
            [KiwiFruit].Phenology.Stage
            [KiwiFruit].Phenology.CurrentStageName
            [KiwiFruit].Phenology.ProportionBB
            [KiwiFruit].Phenology.BrokenBuds
            [KiwiFruit].Phenology.BudBurstDOY
            [KiwiFruit].Phenology.BrokenBuds.Vegetative.BrokenBuds.Max_buds
            [KiwiFruit].Phenology.EndoDormancy.ProgressThroughPhase
            [KiwiFruit].Phenology.EcoDormancy.ProgressThroughPhase
            [KiwiFruit].Phenology.ProportionCU
            [KiwiFruit].Phenology.MaxBBP
            [KiwiFruit].Phenology.Flowering.ProgressThroughPhase
            [KiwiFruit].Phenology.FloweringDOY
            [KiwiFruit].Phenology.AccumulatedChillingPreEndo
        Report Stages
          VariableNames:
            [KiwiFruit].Phenology.MaxBBP
            [KiwiFruit].Phenology.FloweringDOY
        Plant KiwiFruit
        Fertiliser
        SurfaceOrganicMatter: InitialResidueName=wheat_stubble; InitialResidueType=wheat; InitialResidueMass=500; InitialStandingFraction=0; InitialCPR=0; InitialCNR=100
        Irrigation
        MicroClimate: a_interception=0; b_interception=1; c_interception=0; d_interception=0; SoilHeatFluxFraction=0.4; MinimumHeightDiffForNewLayer=0; NightInterceptionFraction=0.5; ReferenceHeight=2
        Manager ReportOnEvents: same as CropLoadSensibilityTest.CropLoadSensibility.Block.ReportOnEvents
        Manager Reset on date: same as CropLoadSensibilityTest.CropLoadSensibility.Block.Reset on date
        Soil: same as CropLoadSensibilityTest.CropLoadSensibility.Block.Soil
        Manager AutomaticIrrigation: same as CropLoadSensibilityTest.CropLoadSensibility.Block.AutomaticIrrigation
        Manager FactorLabels: same as CropLoadSensibilityTest.CropLoadSensibility.Block.FactorLabels
        Manager AutomaticFertiliser: same as CropLoadSensibilityTest.CropLoadSensibility.Block.AutomaticFertiliser
        Manager WaterStatus: same as CropLoadSensibilityTest.CropLoadSensibility.Block.WaterStatus
        Manager SowDateCv
          InitialRootDepth = 5
          CropToSow = Heyward_TP
          SowingDate = 05/25/2015 00:00:00
          script: same as in Experiment.sensibility test.Block.SowDateCv
        AgriChemical
        Girdling
        BiomassRemovalEvents OnPrune: same as HW-BudbreakTP2020HiCane223.Block.OnPrune
    Simulation HaywardTPBBCon1
      Weather: FileName=Te Puke.met
      Clock: Start=2014-01-01; End=2016-06-30
      Summary
      SoilArbitrator Soil Arbitrator
      Zone Block: Area=1; Slope=0; AspectAngle=0; Altitude=50
        Report: EventNames=[Clock].DoReport
          VariableNames:
            [KiwiFruit].Leaf.Wt
            [KiwiFruit].Leaf.Canopy.Height
            [KiwiFruit].Leaf.NodeNumber
            [Clock].Today
            [KiwiFruit].Phenology.Stage
            [KiwiFruit].Phenology.CurrentStageName
            [KiwiFruit].Stem.Wt
            [KiwiFruit].Trunk.Wt
            [KiwiFruit].Root.Wt
            [KiwiFruit].Fruit.Wt
            [KiwiFruit].Leaf.Photosynthesis
            [KiwiFruit].Leaf.Canopy.RadiationIntercepted
            [KiwiFruit].Leaf.Canopy.LAI
            [KiwiFruit].Leaf.AreaLargestLeaf
            [KiwiFruit].Phenology.ThermalTime
            [KiwiFruit].Phenology.ProportionBB
            [KiwiFruit].Phenology.BrokenBuds
            [KiwiFruit].Phenology.BudBurstDOY
            [KiwiFruit].Phenology.ProportionCU
            [KiwiFruit].Phenology.MaxBBP
            [KiwiFruit].Phenology.Flowering.ProgressThroughPhase
            [KiwiFruit].Phenology.FloweringDOY
        Report Stages
          VariableNames:
            [KiwiFruit].Phenology.MaxBBP
            [KiwiFruit].Phenology.FloweringDOY
        Plant KiwiFruit
        Fertiliser
        SurfaceOrganicMatter: InitialResidueName=wheat_stubble; InitialResidueType=wheat; InitialResidueMass=500; InitialStandingFraction=0; InitialCPR=0; InitialCNR=100
        Irrigation
        MicroClimate: a_interception=0; b_interception=1; c_interception=0; d_interception=0; SoilHeatFluxFraction=0.4; MinimumHeightDiffForNewLayer=0; NightInterceptionFraction=0.5; ReferenceHeight=2
        Manager ReportOnEvents: same as CropLoadSensibilityTest.CropLoadSensibility.Block.ReportOnEvents
        Manager Reset on date: same as CropLoadSensibilityTest.CropLoadSensibility.Block.Reset on date
        Soil: same as CropLoadSensibilityTest.CropLoadSensibility.Block.Soil
        Manager AutomaticIrrigation: same as CropLoadSensibilityTest.CropLoadSensibility.Block.AutomaticIrrigation
        Manager FactorLabels: same as CropLoadSensibilityTest.CropLoadSensibility.Block.FactorLabels
        Manager AutomaticFertiliser: same as CropLoadSensibilityTest.CropLoadSensibility.Block.AutomaticFertiliser
        Manager WaterStatus: same as CropLoadSensibilityTest.CropLoadSensibility.Block.WaterStatus
        Manager SowDateCv
          InitialRootDepth = 5
          CropToSow = Heyward_TP
          SowingDate = 05/25/2014 00:00:00
          script: same as in Experiment.sensibility test.Block.SowDateCv
        AgriChemical
        Girdling
        BiomassRemovalEvents OnPrune: same as HW-BudbreakTP2020HiCane223.Block.OnPrune
    Simulation HaywardTPBBCon2
      Weather: FileName=Te Puke.met
      Clock: Start=2014-01-01; End=2016-06-30
      Summary
      SoilArbitrator Soil Arbitrator
      Zone Block: Area=1; Slope=0; AspectAngle=0; Altitude=50
        Report: same as BBControl.HaywardTPBBCon1.Block.Report
        Report Stages
          VariableNames:
            [KiwiFruit].Phenology.MaxBBP
            [KiwiFruit].Phenology.FloweringDOY
        Plant KiwiFruit
        Fertiliser
        SurfaceOrganicMatter: InitialResidueName=wheat_stubble; InitialResidueType=wheat; InitialResidueMass=500; InitialStandingFraction=0; InitialCPR=0; InitialCNR=100
        Irrigation
        MicroClimate: a_interception=0; b_interception=1; c_interception=0; d_interception=0; SoilHeatFluxFraction=0.4; MinimumHeightDiffForNewLayer=0; NightInterceptionFraction=0.5; ReferenceHeight=2
        Manager ReportOnEvents
          script: same as in Experiment.sensibility test.Block.ReportOnEvents
        Manager Reset on date: same as CropLoadSensibilityTest.CropLoadSensibility.Block.Reset on date
        Soil: same as CropLoadSensibilityTest.CropLoadSensibility.Block.Soil
        Manager AutomaticIrrigation: same as CropLoadSensibilityTest.CropLoadSensibility.Block.AutomaticIrrigation
        Manager FactorLabels: same as CropLoadSensibilityTest.CropLoadSensibility.Block.FactorLabels
        Manager AutomaticFertiliser: same as CropLoadSensibilityTest.CropLoadSensibility.Block.AutomaticFertiliser
        Manager WaterStatus: same as CropLoadSensibilityTest.CropLoadSensibility.Block.WaterStatus
        Manager SowDateCv: same as BBControl.HaywardTPBBCon1.Block.SowDateCv
        AgriChemical
        Girdling
        BiomassRemovalEvents OnPrune: same as HW-BudbreakTP2020HiCane223.Block.OnPrune
    Simulation HaywardKKBBControl
      Weather: FileName=Kerikeri.met
      Clock: Start=2014-01-01; End=2016-06-30
      Summary
      SoilArbitrator Soil Arbitrator
      Zone Block: Area=1; Slope=0; AspectAngle=0; Altitude=50
        Report: same as BBControl.HaywardTPBBCon1.Block.Report
        Report Stages
          VariableNames:
            [KiwiFruit].Phenology.MaxBBP
            [KiwiFruit].Phenology.FloweringDOY
            [Clock].Today.Year
        Plant KiwiFruit
        Fertiliser
        SurfaceOrganicMatter: InitialResidueName=wheat_stubble; InitialResidueType=wheat; InitialResidueMass=500; InitialStandingFraction=0; InitialCPR=0; InitialCNR=100
        Irrigation
        MicroClimate: a_interception=0; b_interception=1; c_interception=0; d_interception=0; SoilHeatFluxFraction=0.4; MinimumHeightDiffForNewLayer=0; NightInterceptionFraction=0.5; ReferenceHeight=2
        Manager ReportOnEvents
          script: same as in Experiment.sensibility test.Block.ReportOnEvents
        Manager Reset on date: same as CropLoadSensibilityTest.CropLoadSensibility.Block.Reset on date
        Soil: same as CropLoadSensibilityTest.CropLoadSensibility.Block.Soil
        Manager AutomaticIrrigation: same as CropLoadSensibilityTest.CropLoadSensibility.Block.AutomaticIrrigation
        Manager FactorLabels: same as CropLoadSensibilityTest.CropLoadSensibility.Block.FactorLabels
        Manager AutomaticFertiliser: same as CropLoadSensibilityTest.CropLoadSensibility.Block.AutomaticFertiliser
        Manager WaterStatus: same as CropLoadSensibilityTest.CropLoadSensibility.Block.WaterStatus
        Manager SowDateCv
          InitialRootDepth = 5
          CropToSow = Heyward_KK
          SowingDate = 05/25/2014 00:00:00
          script: same as in Experiment.sensibility test.Block.SowDateCv
        AgriChemical
        Girdling
        BiomassRemovalEvents OnPrune: same as HW-BudbreakTP2020HiCane223.Block.OnPrune
    Simulation KatoaBB2008control
      Weather: FileName=Te Puke.met
      Clock: Start=2007-01-01; End=2009-06-30
      Summary
      SoilArbitrator Soil Arbitrator
      Zone Block: Area=1; Slope=0; AspectAngle=0; Altitude=50
        Report: same as BBControl.HaywardTPBBCon1.Block.Report
        Report Stages
          VariableNames:
            [KiwiFruit].Phenology.MaxBBP
            [KiwiFruit].Phenology.FloweringDOY
        Plant KiwiFruit
        Fertiliser
        SurfaceOrganicMatter: InitialResidueName=wheat_stubble; InitialResidueType=wheat; InitialResidueMass=500; InitialStandingFraction=0; InitialCPR=0; InitialCNR=100
        Irrigation
        MicroClimate: a_interception=0; b_interception=1; c_interception=0; d_interception=0; SoilHeatFluxFraction=0.4; MinimumHeightDiffForNewLayer=0; NightInterceptionFraction=0.5; ReferenceHeight=2
        Manager ReportOnEvents: same as CropLoadSensibilityTest.CropLoadSensibility.Block.ReportOnEvents
        Manager Reset on date: same as CropLoadSensibilityTest.CropLoadSensibility.Block.Reset on date
        Soil: same as CropLoadSensibilityTest.CropLoadSensibility.Block.Soil
        Manager AutomaticIrrigation: same as CropLoadSensibilityTest.CropLoadSensibility.Block.AutomaticIrrigation
        Manager FactorLabels: same as CropLoadSensibilityTest.CropLoadSensibility.Block.FactorLabels
        Manager AutomaticFertiliser: same as CropLoadSensibilityTest.CropLoadSensibility.Block.AutomaticFertiliser
        Manager WaterStatus: same as CropLoadSensibilityTest.CropLoadSensibility.Block.WaterStatus
        Manager SowDateCv
          InitialRootDepth = 5
          CropToSow = Heyward_TP
          SowingDate = 05/25/2007 00:00:00
          script: same as in Experiment.sensibility test.Block.SowDateCv
        AgriChemical
        Girdling
        BiomassRemovalEvents OnPrune: same as HW-BudbreakTP2020HiCane223.Block.OnPrune
    Simulation MeadBB2008control
      Weather: FileName=Te Puke.met
      Clock: Start=2007-01-01; End=2009-06-30
      Summary
      SoilArbitrator Soil Arbitrator
      Zone Block: same as BBControl.KatoaBB2008control.Block
    Simulation KatoaBB2009control
      Weather: FileName=Te Puke.met
      Clock: Start=2008-01-01; End=2010-06-30
      Summary
      SoilArbitrator Soil Arbitrator
      Zone Block: Area=1; Slope=0; AspectAngle=0; Altitude=50
        Report: same as BBControl.HaywardTPBBCon1.Block.Report
        Report Stages
          VariableNames:
            [KiwiFruit].Phenology.MaxBBP
            [KiwiFruit].Phenology.FloweringDOY
        Plant KiwiFruit
        Fertiliser
        SurfaceOrganicMatter: InitialResidueName=wheat_stubble; InitialResidueType=wheat; InitialResidueMass=500; InitialStandingFraction=0; InitialCPR=0; InitialCNR=100
        Irrigation
        MicroClimate: a_interception=0; b_interception=1; c_interception=0; d_interception=0; SoilHeatFluxFraction=0.4; MinimumHeightDiffForNewLayer=0; NightInterceptionFraction=0.5; ReferenceHeight=2
        Manager ReportOnEvents
```csharp
using Models.Core;
using System;
using Models.PMF.Phen;

namespace Models
{
    [Serializable]
    public class Script : Model
    {
        //> Links to other Apsim models
        [Link(ByName = true)] Report stages; 
        
        public string StageName {get; set;}
        
        private void setAndOutput(PhaseChangedType change)
        {
           StageName = change.StageName;
    	   stages.DoOutput();
        }
        
        [EventSubscribe("PhaseChanged")]
        private void OnPhaseChanged(object sender, PhaseChangedType change)
        {
        	if (change.StageName == "StartFlowering") {setAndOutput(change);}
        	if (change.StageName == "EndFlowering") {setAndOutput(change);}

        }

	}
}
```
        Manager Reset on date: same as CropLoadSensibilityTest.CropLoadSensibility.Block.Reset on date
        Soil: same as CropLoadSensibilityTest.CropLoadSensibility.Block.Soil
        Manager AutomaticIrrigation: same as CropLoadSensibilityTest.CropLoadSensibility.Block.AutomaticIrrigation
        Manager FactorLabels: same as CropLoadSensibilityTest.CropLoadSensibility.Block.FactorLabels
        Manager AutomaticFertiliser: same as CropLoadSensibilityTest.CropLoadSensibility.Block.AutomaticFertiliser
        Manager WaterStatus: same as CropLoadSensibilityTest.CropLoadSensibility.Block.WaterStatus
        Manager SowDateCv
          InitialRootDepth = 5
          CropToSow = Heyward_TP
          SowingDate = 05/25/2008 00:00:00
          script: same as in Experiment.sensibility test.Block.SowDateCv
        AgriChemical
        Girdling
        BiomassRemovalEvents OnPrune: same as HW-BudbreakTP2020HiCane223.Block.OnPrune
    Simulation MeadBB2009control
      Weather: FileName=Te Puke.met
      Clock: Start=2008-01-01; End=2010-06-30
      Summary
      SoilArbitrator Soil Arbitrator
      Zone Block: Area=1; Slope=0; AspectAngle=0; Altitude=50
        Report: same as BBControl.HaywardTPBBCon1.Block.Report
        Report Stages
          VariableNames:
            [KiwiFruit].Phenology.MaxBBP
            [KiwiFruit].Phenology.FloweringDOY
        Plant KiwiFruit
        Fertiliser
        SurfaceOrganicMatter: InitialResidueName=wheat_stubble; InitialResidueType=wheat; InitialResidueMass=500; InitialStandingFraction=0; InitialCPR=0; InitialCNR=100
        Irrigation
        MicroClimate: a_interception=0; b_interception=1; c_interception=0; d_interception=0; SoilHeatFluxFraction=0.4; MinimumHeightDiffForNewLayer=0; NightInterceptionFraction=0.5; ReferenceHeight=2
        Manager ReportOnEvents: same as CropLoadSensibilityTest.CropLoadSensibility.Block.ReportOnEvents
        Manager Reset on date: same as CropLoadSensibilityTest.CropLoadSensibility.Block.Reset on date
        Soil: same as CropLoadSensibilityTest.CropLoadSensibility.Block.Soil
        Manager AutomaticIrrigation: same as CropLoadSensibilityTest.CropLoadSensibility.Block.AutomaticIrrigation
        Manager FactorLabels: same as CropLoadSensibilityTest.CropLoadSensibility.Block.FactorLabels
        Manager AutomaticFertiliser: same as CropLoadSensibilityTest.CropLoadSensibility.Block.AutomaticFertiliser
        Manager WaterStatus: same as CropLoadSensibilityTest.CropLoadSensibility.Block.WaterStatus
        Manager SowDateCv: same as BBControl.KatoaBB2009control.Block.SowDateCv
        AgriChemical
        Girdling
        BiomassRemovalEvents OnPrune: same as HW-BudbreakTP2020HiCane223.Block.OnPrune
    Simulation KatoaBB2010control
      Weather: FileName=Te Puke.met
      Clock: Start=2009-01-01; End=2011-06-30
      Summary
      SoilArbitrator Soil Arbitrator
      Zone Block: Area=1; Slope=0; AspectAngle=0; Altitude=50
        Report: same as BBControl.HaywardTPBBCon1.Block.Report
        Report Stages
          VariableNames:
            [KiwiFruit].Phenology.MaxBBP
            [KiwiFruit].Phenology.FloweringDOY
        Plant KiwiFruit
        Fertiliser
        SurfaceOrganicMatter: InitialResidueName=wheat_stubble; InitialResidueType=wheat; InitialResidueMass=500; InitialStandingFraction=0; InitialCPR=0; InitialCNR=100
        Irrigation
        MicroClimate: a_interception=0; b_interception=1; c_interception=0; d_interception=0; SoilHeatFluxFraction=0.4; MinimumHeightDiffForNewLayer=0; NightInterceptionFraction=0.5; ReferenceHeight=2
        Manager ReportOnEvents: same as CropLoadSensibilityTest.CropLoadSensibility.Block.ReportOnEvents
        Manager Reset on date: same as CropLoadSensibilityTest.CropLoadSensibility.Block.Reset on date
        Soil: same as CropLoadSensibilityTest.CropLoadSensibility.Block.Soil
        Manager AutomaticIrrigation: same as CropLoadSensibilityTest.CropLoadSensibility.Block.AutomaticIrrigation
        Manager FactorLabels: same as CropLoadSensibilityTest.CropLoadSensibility.Block.FactorLabels
        Manager AutomaticFertiliser: same as CropLoadSensibilityTest.CropLoadSensibility.Block.AutomaticFertiliser
        Manager WaterStatus: same as CropLoadSensibilityTest.CropLoadSensibility.Block.WaterStatus
        Manager SowDateCv
          InitialRootDepth = 5
          CropToSow = Heyward_TP
          SowingDate = 05/25/2009 00:00:00
          script: same as in Experiment.sensibility test.Block.SowDateCv
        AgriChemical
        Girdling
        BiomassRemovalEvents OnPrune: same as HW-BudbreakTP2020HiCane223.Block.OnPrune
    Simulation MeadBB2010control: same as BBControl.KatoaBB2010control
    Simulation NBB2010control
      Weather: FileName=Kerikeri.met
      Clock: Start=2009-01-01; End=2011-06-30
      Summary
      SoilArbitrator Soil Arbitrator
      Zone Block: Area=1; Slope=0; AspectAngle=0; Altitude=50
        Report: same as BBControl.HaywardTPBBCon1.Block.Report
        Report Stages
          VariableNames:
            [KiwiFruit].Phenology.MaxBBP
            [KiwiFruit].Phenology.FloweringDOY
        Plant KiwiFruit
        Fertiliser
        SurfaceOrganicMatter: InitialResidueName=wheat_stubble; InitialResidueType=wheat; InitialResidueMass=500; InitialStandingFraction=0; InitialCPR=0; InitialCNR=100
        Irrigation
        MicroClimate: a_interception=0; b_interception=1; c_interception=0; d_interception=0; SoilHeatFluxFraction=0.4; MinimumHeightDiffForNewLayer=0; NightInterceptionFraction=0.5; ReferenceHeight=2
        Manager ReportOnEvents: same as CropLoadSensibilityTest.CropLoadSensibility.Block.ReportOnEvents
        Manager Reset on date: same as CropLoadSensibilityTest.CropLoadSensibility.Block.Reset on date
        Soil: same as CropLoadSensibilityTest.CropLoadSensibility.Block.Soil
        Manager AutomaticIrrigation: same as CropLoadSensibilityTest.CropLoadSensibility.Block.AutomaticIrrigation
        Manager FactorLabels: same as CropLoadSensibilityTest.CropLoadSensibility.Block.FactorLabels
        Manager AutomaticFertiliser: same as CropLoadSensibilityTest.CropLoadSensibility.Block.AutomaticFertiliser
        Manager WaterStatus: same as CropLoadSensibilityTest.CropLoadSensibility.Block.WaterStatus
        Manager SowDateCv: same as NBB2010HC236.Block.SowDateCv
        AgriChemical
        Girdling
        BiomassRemovalEvents OnPrune: same as HW-BudbreakTP2020HiCane223.Block.OnPrune
    Simulation NBB2011control
      Weather: FileName=Kerikeri.met
      Clock: Start=2010-01-01; End=2012-06-30
      Summary
      SoilArbitrator Soil Arbitrator
      Zone Block: Area=1; Slope=0; AspectAngle=0; Altitude=50
        Report: same as BBControl.HaywardTPBBCon1.Block.Report
        Report Stages
          VariableNames:
            [KiwiFruit].Phenology.MaxBBP
            [KiwiFruit].Phenology.FloweringDOY
        Plant KiwiFruit
        Fertiliser
        SurfaceOrganicMatter: InitialResidueName=wheat_stubble; InitialResidueType=wheat; InitialResidueMass=500; InitialStandingFraction=0; InitialCPR=0; InitialCNR=100
        Irrigation
        MicroClimate: a_interception=0; b_interception=1; c_interception=0; d_interception=0; SoilHeatFluxFraction=0.4; MinimumHeightDiffForNewLayer=0; NightInterceptionFraction=0.5; ReferenceHeight=2
        Manager ReportOnEvents: same as CropLoadSensibilityTest.CropLoadSensibility.Block.ReportOnEvents
        Manager Reset on date: same as CropLoadSensibilityTest.CropLoadSensibility.Block.Reset on date
        Soil: same as CropLoadSensibilityTest.CropLoadSensibility.Block.Soil
        Manager AutomaticIrrigation: same as CropLoadSensibilityTest.CropLoadSensibility.Block.AutomaticIrrigation
        Manager FactorLabels: same as CropLoadSensibilityTest.CropLoadSensibility.Block.FactorLabels
        Manager AutomaticFertiliser: same as CropLoadSensibilityTest.CropLoadSensibility.Block.AutomaticFertiliser
        Manager WaterStatus: same as CropLoadSensibilityTest.CropLoadSensibility.Block.WaterStatus
        Manager SowDateCv: same as NBB2011HC248.Block.SowDateCv
        AgriChemical
        Girdling
        BiomassRemovalEvents OnPrune: same as HW-BudbreakTP2020HiCane223.Block.OnPrune
    Simulation TeMaraBB2007Control (disabled)
      Weather: FileName=Te Puke.met
      Clock: Start=2007-01-01; End=2008-06-30
      Summary
      SoilArbitrator Soil Arbitrator
      Zone Block: Area=1; Slope=0; AspectAngle=0; Altitude=50
        Report: EventNames=[Clock].DoReport
          VariableNames:
            [KiwiFruit].Leaf.Wt
            [KiwiFruit].Leaf.Canopy.Height
            [KiwiFruit].Leaf.NodeNumber
            [Clock].Today
            [KiwiFruit].Phenology.Stage
            [KiwiFruit].Phenology.CurrentStageName
            [KiwiFruit].Stem.Wt
            [KiwiFruit].Trunk.Wt
            [KiwiFruit].Root.Wt
            [KiwiFruit].Fruit.Wt
            [KiwiFruit].Leaf.Photosynthesis
            [KiwiFruit].Leaf.Canopy.RadiationIntercepted
            [KiwiFruit].Leaf.Canopy.LAI
            [KiwiFruit].Leaf.AreaLargestLeaf
            [KiwiFruit].Phenology.ThermalTime
            [KiwiFruit].Phenology.ProportionBB
            [KiwiFruit].Phenology.BrokenBuds
            [KiwiFruit].Phenology.BudBurstDOY
            [KiwiFruit].Phenology.ProportionCU
            [KiwiFruit].Phenology.MaxBBP
            [KiwiFruit].Phenology.Flowering.ProgressThroughPhase
            [KiwiFruit].Phenology.FloweringDOY
        Report Stages
          VariableNames:
            [KiwiFruit].Phenology.MaxBBP
            [KiwiFruit].Phenology.FloweringDOY
        Plant KiwiFruit
        Fertiliser
        SurfaceOrganicMatter: InitialResidueName=wheat_stubble; InitialResidueType=wheat; InitialResidueMass=500; InitialStandingFraction=0; InitialCPR=0; InitialCNR=100
        Irrigation
        MicroClimate: a_interception=0; b_interception=1; c_interception=0; d_interception=0; SoilHeatFluxFraction=0.4; MinimumHeightDiffForNewLayer=0; NightInterceptionFraction=0.5; ReferenceHeight=2
        BiomassRemovalEvents OnHarvestAndPrune: NameOfPlantToRemoveFrom=KiwiFruit; RemovalType=2
        Manager ReportOnEvents: same as Experiment.sensibility test.Block.ReportOnEvents
        Manager Reset on date: same as Experiment.sensibility test.Block.Reset on date
        Soil: Latitude=0; Longitude=0
          LayerStructure: Thickness=[200, 200, 200, 200, 200, 200, 300, 300, 400, 800]
          Chemical: Thickness=[100, 200, 300, 300, 300, 300]; PH=[6.6, 6.2, 5.7, 5.5, 5.5, 5.5]; PHUnits=Water
          Water: Thickness=[300, 300, 300, 300, 300, 300, 1200]; InitialValues=[0.3, 0.21, 0.18, 0.17, 0.17, 0.17, 0.17]; FilledFromTop=false
          WaterBalance SoilWater: same as Experiment.sensibility test.Block.Soil.SoilWater
          Organic: same as Experiment.sensibility test.Block.Soil.Organic
          OutputLayers: Thickness=[300, 300, 300, 300, 300, 300]
          Solute NO3: same as Experiment.sensibility test.Block.Soil.NO3
          Solute NH4: same as Experiment.sensibility test.Block.Soil.NH4
          Solute Urea: same as Experiment.sensibility test.Block.Soil.Urea
          Physical: same as Experiment.sensibility test.Block.Soil.Physical
          Nutrient
          SoilTemperature Temperature
        Manager AutomaticIrrigation: same as Experiment.sensibility test.Block.AutomaticIrrigation
        Manager FactorLabels: same as Experiment.sensibility test.Block.FactorLabels
        Manager AutomaticFertiliser: same as Experiment.sensibility test.Block.AutomaticFertiliser
        Manager WaterStatus: same as Experiment.sensibility test.Block.WaterStatus
        Manager SowDateCv
          InitialRootDepth = 5
          CropToSow = Heyward_TP
          SowingDate = 05/25/2007 00:00:00
          script: same as in Experiment.sensibility test.Block.SowDateCv
        Manager BudNumber
          MaxBudNum = 8.3
          script: same as in Experiment.sensibility test.Block.BudNumber
        AgriChemical
        Girdling
    Simulation TPROBB2007Control (disabled)
      Weather: FileName=Te Puke.met
      Clock: Start=2006-01-01; End=2008-06-30
      Summary
      SoilArbitrator Soil Arbitrator
      Zone Block: Area=1; Slope=0; AspectAngle=0; Altitude=50
        Report: same as BBControl.TeMaraBB2007Control.Block.Report
        Report Stages
          VariableNames:
            [KiwiFruit].Phenology.MaxBBP
            [KiwiFruit].Phenology.FloweringDOY
        Plant KiwiFruit
        Fertiliser
        SurfaceOrganicMatter: InitialResidueName=wheat_stubble; InitialResidueType=wheat; InitialResidueMass=500; InitialStandingFraction=0; InitialCPR=0; InitialCNR=100
        Irrigation
        MicroClimate: a_interception=0; b_interception=1; c_interception=0; d_interception=0; SoilHeatFluxFraction=0.4; MinimumHeightDiffForNewLayer=0; NightInterceptionFraction=0.5; ReferenceHeight=2
        BiomassRemovalEvents OnHarvestAndPrune: NameOfPlantToRemoveFrom=KiwiFruit; RemovalType=2
        Manager ReportOnEvents: same as Experiment.sensibility test.Block.ReportOnEvents
        Manager Reset on date: same as Experiment.sensibility test.Block.Reset on date
        Soil: same as BBControl.TeMaraBB2007Control.Block.Soil
        Manager AutomaticIrrigation: same as Experiment.sensibility test.Block.AutomaticIrrigation
        Manager FactorLabels: same as Experiment.sensibility test.Block.FactorLabels
        Manager AutomaticFertiliser: same as Experiment.sensibility test.Block.AutomaticFertiliser
        Manager WaterStatus: same as Experiment.sensibility test.Block.WaterStatus
        Manager SowDateCv
          InitialRootDepth = 5
          CropToSow = Heyward_TP
          SowingDate = 02/01/2007 00:00:00
          script: same as in Experiment.sensibility test.Block.SowDateCv
        Manager BudNumber
          MaxBudNum = 10
          script: same as in Experiment.sensibility test.Block.BudNumber
        AgriChemical
        Girdling
    Simulation TPHaywardBB2013Co
      Weather: FileName=Te Puke.met
      Clock: Start=2012-01-01; End=2014-06-30
      Summary
      SoilArbitrator Soil Arbitrator
      Zone Block: Area=1; Slope=0; AspectAngle=0; Altitude=50
        Report: same as BBControl.HaywardTPBBCon1.Block.Report
        Report Stages
          VariableNames:
            [KiwiFruit].Phenology.MaxBBP
            [KiwiFruit].Phenology.FloweringDOY
        Plant KiwiFruit
        Fertiliser
        SurfaceOrganicMatter: InitialResidueName=wheat_stubble; InitialResidueType=wheat; InitialResidueMass=500; InitialStandingFraction=0; InitialCPR=0; InitialCNR=100
        Irrigation
        MicroClimate: a_interception=0; b_interception=1; c_interception=0; d_interception=0; SoilHeatFluxFraction=0.4; MinimumHeightDiffForNewLayer=0; NightInterceptionFraction=0.5; ReferenceHeight=2
        Manager ReportOnEvents: same as CropLoadSensibilityTest.CropLoadSensibility.Block.ReportOnEvents
        Manager Reset on date: same as CropLoadSensibilityTest.CropLoadSensibility.Block.Reset on date
        Soil: same as CropLoadSensibilityTest.CropLoadSensibility.Block.Soil
        Manager AutomaticIrrigation: same as CropLoadSensibilityTest.CropLoadSensibility.Block.AutomaticIrrigation
        Manager FactorLabels: same as CropLoadSensibilityTest.CropLoadSensibility.Block.FactorLabels
        Manager AutomaticFertiliser: same as CropLoadSensibilityTest.CropLoadSensibility.Block.AutomaticFertiliser
        Manager WaterStatus: same as CropLoadSensibilityTest.CropLoadSensibility.Block.WaterStatus
        Manager SowDateCv
          InitialRootDepth = 5
          CropToSow = Heyward_TP
          SowingDate = 05/25/2012 00:00:00
          script: same as in Experiment.sensibility test.Block.SowDateCv
        AgriChemical
        Girdling
        BiomassRemovalEvents OnPrune: same as HW-BudbreakTP2020HiCane223.Block.OnPrune
    Simulation KKHaywardBB2013Co
      Weather: FileName=Kerikeri.met
      Clock: Start=2012-01-01; End=2014-06-30
      Summary
      SoilArbitrator Soil Arbitrator
      Zone Block: Area=1; Slope=0; AspectAngle=0; Altitude=50
        Report: same as BBControl.HaywardTPBBCon1.Block.Report
        Report Stages
          VariableNames:
            [KiwiFruit].Phenology.MaxBBP
            [KiwiFruit].Phenology.FloweringDOY
        Plant KiwiFruit
        Fertiliser
        SurfaceOrganicMatter: InitialResidueName=wheat_stubble; InitialResidueType=wheat; InitialResidueMass=500; InitialStandingFraction=0; InitialCPR=0; InitialCNR=100
        Irrigation
        MicroClimate: a_interception=0; b_interception=1; c_interception=0; d_interception=0; SoilHeatFluxFraction=0.4; MinimumHeightDiffForNewLayer=0; NightInterceptionFraction=0.5; ReferenceHeight=2
        Manager ReportOnEvents: same as CropLoadSensibilityTest.CropLoadSensibility.Block.ReportOnEvents
        Manager Reset on date: same as CropLoadSensibilityTest.CropLoadSensibility.Block.Reset on date
        Soil: same as CropLoadSensibilityTest.CropLoadSensibility.Block.Soil
        Manager AutomaticIrrigation: same as CropLoadSensibilityTest.CropLoadSensibility.Block.AutomaticIrrigation
        Manager FactorLabels: same as CropLoadSensibilityTest.CropLoadSensibility.Block.FactorLabels
        Manager AutomaticFertiliser: same as CropLoadSensibilityTest.CropLoadSensibility.Block.AutomaticFertiliser
        Manager WaterStatus: same as CropLoadSensibilityTest.CropLoadSensibility.Block.WaterStatus
        Manager SowDateCv: same as KKHaywardBB2013HC239.Block.SowDateCv
        AgriChemical
        Girdling
        BiomassRemovalEvents OnPrune: same as HW-BudbreakTP2020HiCane223.Block.OnPrune
    Simulation TPHaywardBB2018Control
      Weather: FileName=Te Puke.met
      Clock: Start=2017-01-01; End=2019-06-30
      Summary
      SoilArbitrator Soil Arbitrator
      Zone Block: Area=1; Slope=0; AspectAngle=0; Altitude=50
        Report: same as BBControl.HaywardTPBBCon1.Block.Report
        Report Stages
          VariableNames:
            [KiwiFruit].Phenology.MaxBBP
            [KiwiFruit].Phenology.FloweringDOY
        Plant KiwiFruit
        Fertiliser
        SurfaceOrganicMatter: InitialResidueName=wheat_stubble; InitialResidueType=wheat; InitialResidueMass=500; InitialStandingFraction=0; InitialCPR=0; InitialCNR=100
        Irrigation
        MicroClimate: a_interception=0; b_interception=1; c_interception=0; d_interception=0; SoilHeatFluxFraction=0.4; MinimumHeightDiffForNewLayer=0; NightInterceptionFraction=0.5; ReferenceHeight=2
        Manager ReportOnEvents: same as CropLoadSensibilityTest.CropLoadSensibility.Block.ReportOnEvents
        Manager Reset on date: same as CropLoadSensibilityTest.CropLoadSensibility.Block.Reset on date
        Soil: same as CropLoadSensibilityTest.CropLoadSensibility.Block.Soil
        Manager AutomaticIrrigation: same as CropLoadSensibilityTest.CropLoadSensibility.Block.AutomaticIrrigation
        Manager FactorLabels: same as CropLoadSensibilityTest.CropLoadSensibility.Block.FactorLabels
        Manager AutomaticFertiliser: same as CropLoadSensibilityTest.CropLoadSensibility.Block.AutomaticFertiliser
        Manager WaterStatus: same as CropLoadSensibilityTest.CropLoadSensibility.Block.WaterStatus
        Manager SowDateCv
          InitialRootDepth = 5
          CropToSow = Heyward_TP
          SowingDate = 05/25/2017 00:00:00
          script: same as in Experiment.sensibility test.Block.SowDateCv
        AgriChemical
        Girdling
        BiomassRemovalEvents OnPrune: same as HW-BudbreakTP2020HiCane223.Block.OnPrune
    Simulation KKHaywardBB2018UntreatedControl
      Weather: FileName=Kerikeri.met
      Clock: Start=2017-01-01; End=2024-06-30
      Summary
      SoilArbitrator Soil Arbitrator
      Zone Block: Area=1; Slope=0; AspectAngle=0; Altitude=50
        Report: EventNames=[Clock].DoReport
          VariableNames:
            [KiwiFruit].Leaf.Wt
            [KiwiFruit].Leaf.Canopy.Height
            [KiwiFruit].Leaf.NodeNumber
            [Clock].Today
            [KiwiFruit].Phenology.Stage
            [KiwiFruit].Phenology.CurrentStageName
            [KiwiFruit].Phenology.ProportionBB
            [KiwiFruit].Phenology.BrokenBuds
            [KiwiFruit].Phenology.BudBurstDOY
            [KiwiFruit].Phenology.EndoDormancy.ProgressThroughPhase
            [KiwiFruit].Phenology.EcoDormancy.ProgressThroughPhase
            [KiwiFruit].Phenology.BrokenBuds.Vegetative.BrokenBuds.Max_buds
            [KiwiFruit].Phenology.ProportionCU
            [KiwiFruit].Phenology.MaxBBP
            [KiwiFruit].Phenology.Flowering.ProgressThroughPhase
            [KiwiFruit].Phenology.FloweringDOY
        Report Stages
          VariableNames:
            [KiwiFruit].Phenology.MaxBBP
            [KiwiFruit].Phenology.FloweringDOY
        Plant KiwiFruit
        Fertiliser
        SurfaceOrganicMatter: InitialResidueName=wheat_stubble; InitialResidueType=wheat; InitialResidueMass=500; InitialStandingFraction=0; InitialCPR=0; InitialCNR=100
        Irrigation
        MicroClimate: a_interception=0; b_interception=1; c_interception=0; d_interception=0; SoilHeatFluxFraction=0.4; MinimumHeightDiffForNewLayer=0; NightInterceptionFraction=0.5; ReferenceHeight=2
        Manager ReportOnEvents: same as CropLoadSensibilityTest.CropLoadSensibility.Block.ReportOnEvents
        Manager Reset on date: same as CropLoadSensibilityTest.CropLoadSensibility.Block.Reset on date
        Soil: same as CropLoadSensibilityTest.CropLoadSensibility.Block.Soil
        Manager AutomaticIrrigation: same as CropLoadSensibilityTest.CropLoadSensibility.Block.AutomaticIrrigation
        Manager FactorLabels: same as CropLoadSensibilityTest.CropLoadSensibility.Block.FactorLabels
        Manager AutomaticFertiliser: same as CropLoadSensibilityTest.CropLoadSensibility.Block.AutomaticFertiliser
        Manager WaterStatus: same as CropLoadSensibilityTest.CropLoadSensibility.Block.WaterStatus
        Manager SowDateCv: same as KKHaywardBB2018HiCaneDriftstop239.Block.SowDateCv
        AgriChemical
        Girdling
        BiomassRemovalEvents OnPrune: same as HW-BudbreakTP2020HiCane223.Block.OnPrune
    Simulation HaywardBB2019Untreatedcontrol
      Weather: FileName=Kerikeri.met
      Clock: Start=2018-01-01; End=2020-06-30
      Summary
      SoilArbitrator Soil Arbitrator
      Zone Block: Area=1; Slope=0; AspectAngle=0; Altitude=50
        Report: EventNames=[Clock].DoReport
          VariableNames:
            [KiwiFruit].Leaf.Wt
            [KiwiFruit].Leaf.Canopy.Height
            [KiwiFruit].Leaf.NodeNumber
            [Clock].Today
            [KiwiFruit].Phenology.Stage
            [KiwiFruit].Phenology.CurrentStageName
            [KiwiFruit].Phenology.ThermalTime
            [KiwiFruit].Phenology.ProportionBB
            [KiwiFruit].Phenology.BrokenBuds
            [KiwiFruit].Phenology.BudBurstDOY
            [KiwiFruit].Phenology.ProportionCU
            [KiwiFruit].Phenology.MaxBBP
            [KiwiFruit].Phenology.Flowering.ProgressThroughPhase
            [KiwiFruit].Phenology.FloweringDOY
        Report Stages
          VariableNames:
            [KiwiFruit].Phenology.MaxBBP
            [KiwiFruit].Phenology.FloweringDOY
        Plant KiwiFruit
        Fertiliser
        SurfaceOrganicMatter: InitialResidueName=wheat_stubble; InitialResidueType=wheat; InitialResidueMass=500; InitialStandingFraction=0; InitialCPR=0; InitialCNR=100
        Irrigation
        MicroClimate: a_interception=0; b_interception=1; c_interception=0; d_interception=0; SoilHeatFluxFraction=0.4; MinimumHeightDiffForNewLayer=0; NightInterceptionFraction=0.5; ReferenceHeight=2
        Manager ReportOnEvents
          script: same as in Experiment.sensibility test.Block.ReportOnEvents
        Manager Reset on date: same as CropLoadSensibilityTest.CropLoadSensibility.Block.Reset on date
        Soil: same as CropLoadSensibilityTest.CropLoadSensibility.Block.Soil
        Manager AutomaticIrrigation: same as CropLoadSensibilityTest.CropLoadSensibility.Block.AutomaticIrrigation
        Manager FactorLabels: same as CropLoadSensibilityTest.CropLoadSensibility.Block.FactorLabels
        Manager AutomaticFertiliser: same as CropLoadSensibilityTest.CropLoadSensibility.Block.AutomaticFertiliser
        Manager WaterStatus: same as CropLoadSensibilityTest.CropLoadSensibility.Block.WaterStatus
        Manager SowDateCv: same as HaywardBB2019HCDS236.Block.SowDateCv
        AgriChemical
        Girdling
        BiomassRemovalEvents OnPrune: same as HW-BudbreakTP2020HiCane223.Block.OnPrune
    Simulation HWBBRaw2020Control
      Weather: FileName=Kerikeri.met
      Clock: Start=2019-01-01; End=2021-06-30
      Summary
      SoilArbitrator Soil Arbitrator
      Zone Block: Area=1; Slope=0; AspectAngle=0; Altitude=50
        Report: same as BBControl.HaywardBB2019Untreatedcontrol.Block.Report
        Report Stages
          VariableNames:
            [KiwiFruit].Phenology.MaxBBP
            [KiwiFruit].Phenology.FloweringDOY
        Plant KiwiFruit
        Fertiliser
        SurfaceOrganicMatter: InitialResidueName=wheat_stubble; InitialResidueType=wheat; InitialResidueMass=500; InitialStandingFraction=0; InitialCPR=0; InitialCNR=100
        Irrigation
        MicroClimate: a_interception=0; b_interception=1; c_interception=0; d_interception=0; SoilHeatFluxFraction=0.4; MinimumHeightDiffForNewLayer=0; NightInterceptionFraction=0.5; ReferenceHeight=2
        Manager ReportOnEvents
          script: same as in Experiment.sensibility test.Block.ReportOnEvents
        Manager Reset on date: same as CropLoadSensibilityTest.CropLoadSensibility.Block.Reset on date
        Soil: same as CropLoadSensibilityTest.CropLoadSensibility.Block.Soil
        Manager AutomaticIrrigation: same as CropLoadSensibilityTest.CropLoadSensibility.Block.AutomaticIrrigation
        Manager FactorLabels: same as CropLoadSensibilityTest.CropLoadSensibility.Block.FactorLabels
        Manager AutomaticFertiliser: same as CropLoadSensibilityTest.CropLoadSensibility.Block.AutomaticFertiliser
        Manager WaterStatus: same as CropLoadSensibilityTest.CropLoadSensibility.Block.WaterStatus
        Manager SowDateCv: same as HWBBRaw2020HiCaneDriftstop247.Block.SowDateCv
        AgriChemical
        Girdling
        BiomassRemovalEvents OnPrune: same as HW-BudbreakTP2020HiCane223.Block.OnPrune
    Simulation HWBBRaw2021Control (disabled)
      Weather: FileName=Kerikeri.met
      Clock: Start=2020-01-01; End=2022-06-30
      Summary
      SoilArbitrator Soil Arbitrator
      Zone Block: Area=1; Slope=0; AspectAngle=0; Altitude=50
        Report: EventNames=[Clock].DoReport
          VariableNames:
            [KiwiFruit].Leaf.Wt
            [KiwiFruit].Leaf.Canopy.Height
            [KiwiFruit].Leaf.NodeNumber
            [Clock].Today
            [KiwiFruit].Phenology.Stage
            [KiwiFruit].Phenology.CurrentStageName
            [KiwiFruit].Phenology.ThermalTime
            [KiwiFruit].Phenology.ProportionBB
            [KiwiFruit].Phenology.BrokenBuds
            [KiwiFruit].Phenology.BudBurstDOY
            [KiwiFruit].Phenology.ProportionCU
            [KiwiFruit].Phenology.MaxBBP
            [KiwiFruit].Phenology.Flowering.ProgressThroughPhase
            [KiwiFruit].Phenology.FloweringDOY
        Report Stages
          VariableNames:
            [KiwiFruit].Phenology.MaxBBP
            [KiwiFruit].Phenology.FloweringDOY
        Plant KiwiFruit
        Fertiliser
        SurfaceOrganicMatter: InitialResidueName=wheat_stubble; InitialResidueType=wheat; InitialResidueMass=500; InitialStandingFraction=0; InitialCPR=0; InitialCNR=100
        Irrigation
        MicroClimate: a_interception=0; b_interception=1; c_interception=0; d_interception=0; SoilHeatFluxFraction=0.4; MinimumHeightDiffForNewLayer=0; NightInterceptionFraction=0.5; ReferenceHeight=2
        BiomassRemovalEvents OnHarvestAndPrune: NameOfPlantToRemoveFrom=KiwiFruit; RemovalType=2
        Manager ReportOnEvents: same as Experiment.sensibility test.Block.ReportOnEvents
        Manager Reset on date: same as Experiment.sensibility test.Block.Reset on date
        Soil: same as BBControl.TeMaraBB2007Control.Block.Soil
        Manager AutomaticIrrigation: same as Experiment.sensibility test.Block.AutomaticIrrigation
        Manager FactorLabels: same as Experiment.sensibility test.Block.FactorLabels
        Manager AutomaticFertiliser: same as Experiment.sensibility test.Block.AutomaticFertiliser
        Manager WaterStatus: same as Experiment.sensibility test.Block.WaterStatus
        Manager SowDateCv
          InitialRootDepth = 5
          CropToSow = Heyward_KK
          SowingDate = 05/25/2020 00:00:00
          script: same as in Experiment.sensibility test.Block.SowDateCv
        Manager BudNumber
          MaxBudNum = 8.75
          script: same as in Experiment.sensibility test.Block.BudNumber
        AgriChemical
        Girdling
    Simulation HWBBRaw2022Control (disabled)
      Weather: FileName=Kerikeri.met
      Clock: Start=2021-01-01; End=2023-06-30
      Summary
      SoilArbitrator Soil Arbitrator
      Zone Block: Area=1; Slope=0; AspectAngle=0; Altitude=50
        Report: same as BBControl.HWBBRaw2021Control.Block.Report
        Report Stages
          VariableNames:
            [KiwiFruit].Phenology.MaxBBP
            [KiwiFruit].Phenology.FloweringDOY
        Plant KiwiFruit
        Fertiliser
        SurfaceOrganicMatter: InitialResidueName=wheat_stubble; InitialResidueType=wheat; InitialResidueMass=500; InitialStandingFraction=0; InitialCPR=0; InitialCNR=100
        Irrigation
        MicroClimate: a_interception=0; b_interception=1; c_interception=0; d_interception=0; SoilHeatFluxFraction=0.4; MinimumHeightDiffForNewLayer=0; NightInterceptionFraction=0.5; ReferenceHeight=2
        BiomassRemovalEvents OnHarvestAndPrune: NameOfPlantToRemoveFrom=KiwiFruit; RemovalType=2
        Manager ReportOnEvents: same as Experiment.sensibility test.Block.ReportOnEvents
        Manager Reset on date: same as Experiment.sensibility test.Block.Reset on date
        Soil: same as BBControl.TeMaraBB2007Control.Block.Soil
        Manager AutomaticIrrigation: same as Experiment.sensibility test.Block.AutomaticIrrigation
        Manager FactorLabels: same as Experiment.sensibility test.Block.FactorLabels
        Manager AutomaticFertiliser: same as Experiment.sensibility test.Block.AutomaticFertiliser
        Manager WaterStatus: same as Experiment.sensibility test.Block.WaterStatus
        Manager SowDateCv
          InitialRootDepth = 5
          CropToSow = Heyward_KK
          SowingDate = 05/25/2021 00:00:00
          script: same as in Experiment.sensibility test.Block.SowDateCv
        Manager BudNumber
          MaxBudNum = 2.5
          script: same as in Experiment.sensibility test.Block.BudNumber
        AgriChemical
        Girdling
    Simulation HWBBSpray2020Untreatedcontrol
      Weather: FileName=Kerikeri.met
      Clock: Start=2019-01-01; End=2021-06-30
      Summary
      SoilArbitrator Soil Arbitrator
      Zone Block: Area=1; Slope=0; AspectAngle=0; Altitude=50
        Report: EventNames=[Clock].DoReport
          VariableNames:
            [KiwiFruit].Leaf.Wt
            [KiwiFruit].Leaf.Canopy.Height
            [KiwiFruit].Leaf.NodeNumber
            [Clock].Today
            [KiwiFruit].Phenology.Stage
            [KiwiFruit].Phenology.CurrentStageName
            [KiwiFruit].Leaf.AreaLargestLeaf
            [KiwiFruit].Phenology.ThermalTime
            [KiwiFruit].Phenology.ProportionBB
            [KiwiFruit].Phenology.BrokenBuds
            [KiwiFruit].Phenology.BudBurstDOY
            [KiwiFruit].Phenology.MaxBBP
            [KiwiFruit].Phenology.Flowering.ProgressThroughPhase
            [KiwiFruit].Phenology.FloweringDOY
        Report Stages
          VariableNames:
            [KiwiFruit].Phenology.MaxBBP
            [KiwiFruit].Phenology.FloweringDOY
        Plant KiwiFruit
        Fertiliser
        SurfaceOrganicMatter: InitialResidueName=wheat_stubble; InitialResidueType=wheat; InitialResidueMass=500; InitialStandingFraction=0; InitialCPR=0; InitialCNR=100
        Irrigation
        MicroClimate: a_interception=0; b_interception=1; c_interception=0; d_interception=0; SoilHeatFluxFraction=0.4; MinimumHeightDiffForNewLayer=0; NightInterceptionFraction=0.5; ReferenceHeight=2
        Manager ReportOnEvents: same as CropLoadSensibilityTest.CropLoadSensibility.Block.ReportOnEvents
        Manager Reset on date: same as CropLoadSensibilityTest.CropLoadSensibility.Block.Reset on date
        Soil: same as CropLoadSensibilityTest.CropLoadSensibility.Block.Soil
        Manager AutomaticIrrigation: same as CropLoadSensibilityTest.CropLoadSensibility.Block.AutomaticIrrigation
        Manager FactorLabels: same as CropLoadSensibilityTest.CropLoadSensibility.Block.FactorLabels
        Manager AutomaticFertiliser: same as CropLoadSensibilityTest.CropLoadSensibility.Block.AutomaticFertiliser
        Manager WaterStatus: same as CropLoadSensibilityTest.CropLoadSensibility.Block.WaterStatus
        Manager SowDateCv: same as HWBBRaw2020HiCaneDriftstop247.Block.SowDateCv
        AgriChemical
        Girdling
        BiomassRemovalEvents OnPrune: same as HW-BudbreakTP2020HiCane223.Block.OnPrune
    Simulation HW-BudbreakTP2020Control
      Weather: FileName=Te Puke.met
      Clock: Start=2019-01-01; End=2021-06-30
      Summary
      SoilArbitrator Soil Arbitrator
      Zone Block: Area=1; Slope=0; AspectAngle=0; Altitude=50
        Report: same as HW-BudbreakTP2020HiCane223.Block.Report
        Report Stages
          VariableNames:
            [KiwiFruit].Phenology.MaxBBP
            [KiwiFruit].Phenology.FloweringDOY
        Plant KiwiFruit
        Fertiliser
        SurfaceOrganicMatter: InitialResidueName=wheat_stubble; InitialResidueType=wheat; InitialResidueMass=500; InitialStandingFraction=0; InitialCPR=0; InitialCNR=100
        Irrigation
        MicroClimate: a_interception=0; b_interception=1; c_interception=0; d_interception=0; SoilHeatFluxFraction=0.4; MinimumHeightDiffForNewLayer=0; NightInterceptionFraction=0.5; ReferenceHeight=2
        Manager ReportOnEvents: same as HW-BudbreakTP2020HiCane223.Block.ReportOnEvents
        Manager Reset on date: same as CropLoadSensibilityTest.CropLoadSensibility.Block.Reset on date
        Soil: same as CropLoadSensibilityTest.CropLoadSensibility.Block.Soil
        Manager AutomaticIrrigation: same as CropLoadSensibilityTest.CropLoadSensibility.Block.AutomaticIrrigation
        Manager FactorLabels: same as CropLoadSensibilityTest.CropLoadSensibility.Block.FactorLabels
        Manager AutomaticFertiliser: same as CropLoadSensibilityTest.CropLoadSensibility.Block.AutomaticFertiliser
        Manager WaterStatus: same as CropLoadSensibilityTest.CropLoadSensibility.Block.WaterStatus
        Manager SowDateCv: same as HWBBRaw2020HiCaneDriftstop247.Block.SowDateCv
        AgriChemical
        Girdling
        BiomassRemovalEvents OnPrune: same as HW-BudbreakTP2020HiCane223.Block.OnPrune
    Simulation HWBBRawTP2021Control
      Weather: FileName=Te Puke.met
      Clock: Start=2020-01-01; End=2022-06-30
      Summary
      SoilArbitrator Soil Arbitrator
      Zone Block: Area=1; Slope=0; AspectAngle=0; Altitude=50
        Report: same as HW-BudbreakTP2020HiCane223.Block.Report
        Report Stages
          VariableNames:
            [KiwiFruit].Phenology.MaxBBP
            [KiwiFruit].Phenology.FloweringDOY
        Plant KiwiFruit
        Fertiliser
        SurfaceOrganicMatter: InitialResidueName=wheat_stubble; InitialResidueType=wheat; InitialResidueMass=500; InitialStandingFraction=0; InitialCPR=0; InitialCNR=100
        Irrigation
        MicroClimate: a_interception=0; b_interception=1; c_interception=0; d_interception=0; SoilHeatFluxFraction=0.4; MinimumHeightDiffForNewLayer=0; NightInterceptionFraction=0.5; ReferenceHeight=2
        Manager ReportOnEvents: same as HW-BudbreakTP2020HiCane223.Block.ReportOnEvents
        Manager Reset on date: same as CropLoadSensibilityTest.CropLoadSensibility.Block.Reset on date
        Soil: same as CropLoadSensibilityTest.CropLoadSensibility.Block.Soil
        Manager AutomaticIrrigation: same as CropLoadSensibilityTest.CropLoadSensibility.Block.AutomaticIrrigation
        Manager FactorLabels: same as CropLoadSensibilityTest.CropLoadSensibility.Block.FactorLabels
        Manager AutomaticFertiliser: same as CropLoadSensibilityTest.CropLoadSensibility.Block.AutomaticFertiliser
        Manager WaterStatus: same as CropLoadSensibilityTest.CropLoadSensibility.Block.WaterStatus
        Manager SowDateCv
          InitialRootDepth = 5
          CropToSow = Heyward_KK
          SowingDate = 05/25/2020 00:00:00
          script: same as in Experiment.sensibility test.Block.SowDateCv
        AgriChemical
        Girdling
        BiomassRemovalEvents OnPrune: same as HW-BudbreakTP2020HiCane223.Block.OnPrune
    Simulation HW-Budbreak-TP2020Control
      Weather: FileName=Te Puke.met
      Clock: Start=2019-01-01; End=2021-06-30
      Summary
      SoilArbitrator Soil Arbitrator
      Zone Block: same as BBControl.HW-BudbreakTP2020Control.Block
  Folder FruitingAll
    Simulation TPHW2016_2024
      Weather: FileName=Te Puke.met
      Clock: Start=2014-01-01; End=2024-12-30
      Summary
      SoilArbitrator Soil Arbitrator
      Zone Block: Area=1; Slope=0; AspectAngle=0; Altitude=50
        Report: same as HW-BudbreakTP2020HiCane223.Block.Report
        Report Stages
          VariableNames:
            [KiwiFruit].Phenology.MaxBBP
            [KiwiFruit].Phenology.FloweringDOY
        Plant KiwiFruit
        Fertiliser
        SurfaceOrganicMatter: InitialResidueName=wheat_stubble; InitialResidueType=wheat; InitialResidueMass=500; InitialStandingFraction=0; InitialCPR=0; InitialCNR=100
        Irrigation
        MicroClimate: a_interception=0; b_interception=1; c_interception=0; d_interception=0; SoilHeatFluxFraction=0.4; MinimumHeightDiffForNewLayer=0; NightInterceptionFraction=0.5; ReferenceHeight=2
        Manager ReportOnEvents: same as HW-BudbreakTP2020HiCane223.Block.ReportOnEvents
        Manager Reset on date: same as CropLoadSensibilityTest.CropLoadSensibility.Block.Reset on date
        Soil: Latitude=0; Longitude=0
          LayerStructure: Thickness=[200, 200, 200, 200, 200, 200, 300, 300, 400, 800]
          Chemical: same as HWBBSpray2020HiCaneDriftstop243.Block.Soil.Chemical
          Water: Thickness=[300, 300, 300, 300, 300, 300, 1200]; InitialValues=[0.3, 0.3, 0.3, 0.3, 0.3, 0.3, 0.3]; FilledFromTop=false
          WaterBalance SoilWater: SummerDate=1-Nov; SummerU=9; SummerCona=4.4; WinterDate=1-Apr; WinterU=9; WinterCona=4.4; DiffusConst=88; DiffusSlope=35.4; Salb=0.3; CN2Bare=68; CNRed=20; CNCov=0.8; DischargeWidth=0; CatchmentArea=0; PSIDul=-100
            Thickness  SWCON  KLAT
            300        0.55   0
            300        0.55   0
            300        0.55   0
            300        0.55   0
            300        0.55   0
            300        0.55   0
            400        0.55   0
            800        0.55   0
          Organic: same as CropLoadSensibilityTest.CropLoadSensibility.Block.Soil.Organic
          OutputLayers: Thickness=[300, 300, 300, 300, 300, 300]
          Solute NO3: same as CropLoadSensibilityTest.CropLoadSensibility.Block.Soil.NO3
          Solute NH4: same as CropLoadSensibilityTest.CropLoadSensibility.Block.Soil.NH4
          Solute Urea: same as CropLoadSensibilityTest.CropLoadSensibility.Block.Soil.Urea
          Physical: same as CropLoadSensibilityTest.CropLoadSensibility.Block.Soil.Physical
          Nutrient
          SoilTemperature Temperature
        Manager AutomaticIrrigation: same as CropLoadSensibilityTest.CropLoadSensibility.Block.AutomaticIrrigation
        Manager FactorLabels: same as CropLoadSensibilityTest.CropLoadSensibility.Block.FactorLabels
        Manager AutomaticFertiliser: same as CropLoadSensibilityTest.CropLoadSensibility.Block.AutomaticFertiliser
        Manager WaterStatus: same as CropLoadSensibilityTest.CropLoadSensibility.Block.WaterStatus
        Manager SowDateCv
          InitialRootDepth = 3000
          CropToSow = Heyward_TP
          SowingDate = 05/25/2014 00:00:00
          script: same as in HWBBSpray2020HiCaneDriftstop243.Block.SowDateCv
        Manager Harvesting
```csharp
using APSIM.Shared.Utilities;
using Models.Utilities;
using Models.Management;
using Models.Soils;
using Models.PMF;
using Models.Core;
using System;
using System.Linq;
using Models.PMF.Phen;

namespace Models
{
    [Serializable] 
    public class Script : Model
    {

        [Link(Type = LinkType.Path, Path = "[KiwiFruit].Phenology")]
        private Phenology phenology;
 
        [Link] 
        public Plant Crop { get; set; }
        [Link] 
        public Summary summary;
        [Link(Type = LinkType.Scoped, ByName = true)]
        private BiomassRemovalEvents OnHarvest;
        
        [EventSubscribe("DoManagement")]
        private void OnDoManagement(object sender, EventArgs e)
        {

            if (phenology.CurrentPhase.Name == "NaturalLeafFall")
            {
                //OnHarvest.Remove();
                //summary.WriteMessage(this, "CropHarvested", MessageType.Information);
                
            }
        }
    }
}
```
        Manager SetBudNumber
          BudSetDate = 01-Jul
          BudNumber = 60
```csharp
using System.Diagnostics;
using APSIM.Core;
using APSIM.Shared.Utilities;
using Models.Core;
using Newtonsoft.Json;
using System;
using System.Collections.Generic;
using System.Linq;
using System;
using Models.Utilities;


namespace Models
{
    [Serializable]
    public class Script : Model, IStructureDependency
    {
        [Link] Clock clock;
        
        /// <summary>Structure instance supplied by APSIM.core.</summary>
        [field: NonSerialized]
        public IStructure Structure { private get; set; }
        
        [Description("Bud Set Date (dd-mmm)")]
        public string BudSetDate { get; set;} 
        [Description("Bud Number")]
        public double BudNumber { get; set;} 
        
        
        [EventSubscribe("StartOfDay")]
        private void OnStartOfDay(object sender, EventArgs data)
        {
            if (!String.IsNullOrEmpty(BudSetDate))
            {
            //Debugger.Break();
            if (DateUtilities.DatesEqual(BudSetDate,clock.Today))
               Structure.Set("[KiwiFruit].Phenology.BrokenBuds.Vegetative.MultiplyFunction.AllBuds.FixedValue", (object)BudNumber);
 
            }
            
        }
    }
}
```
        AgriChemical
        Girdling
        Operations
        BiomassRemovalEvents OnPrune: NameOfPlantToRemoveFrom=KiwiFruit; RemovalType=3
          BiomassRemovalFractions:
            PlantName  OrganName    TypeString  LiveToRemove  DeadToRemove  LiveToResidue  DeadToResidue
            KiwiFruit  Trunk        Pruning     0             0             0              0
            KiwiFruit  Leaf         Pruning     0             0             0              0
            KiwiFruit  Stem         Pruning     0             0             0              0
            KiwiFruit  FineRoot     Pruning     0             0             0              0
            KiwiFruit  Fruit        Pruning     0             0             0              0
            -          StorageRoot  Pruning     0             0             0              0
        BiomassRemovalEvents OnHarvest: NameOfPlantToRemoveFrom=KiwiFruit; RemovalType=0
          BiomassRemovalFractions:
            PlantName  OrganName    TypeString  LiveToRemove  DeadToRemove  LiveToResidue  DeadToResidue
            KiwiFruit  Trunk        Cutting     0             0             0              0
            KiwiFruit  Leaf         Cutting     0             0             0              0
            KiwiFruit  Stem         Cutting     0             0             0              0
            KiwiFruit  FineRoot     Cutting     0             0             0              0
            KiwiFruit  StorageRoot  Cutting     0             0             0              0
            KiwiFruit  Fruit        Cutting     0             0             0              0
      Memo
        Relationship between canopy density and fruit quality of kiwifruit

        Abstract: mean leaf area index (LAI) values ranging from 3.0 to 5.5 m2 (Hayward)
      Memo
        Relationship between canopy density and fruit quality of kiwifruit

        Abstract: mean leaf area index (LAI) values ranging from 3.0 to 5.5 m2 (Hayward)
      Memo
        Steve Green's report : @@ZesIR-Avg Fruit growth (2025).xlsx
      Memo
        Steve Green's report : @@ZesIR-Avg Fruit growth (2025).xlsx
      Memo
        Steve Green's report : @@ZesIR-Avg Fruit growth (2025).xlsx
      Memo
        Annette's Thesis:

        Figure 3.16, page 87. Total carbohydrate content of shoots and leaves (behaviour comparison)

        Figure 3.17, page 88. Total carbohydrate content of shoots and fruits (behaviour comparison)
    Simulation KKHW2020_2024
      Weather: FileName=Kerikeri.met
      Clock: Start=2018-01-01; End=2024-12-30
      Summary
      SoilArbitrator Soil Arbitrator
      Zone Block: Area=1; Slope=0; AspectAngle=0; Altitude=50
        Report: same as HW-BudbreakTP2020HiCane223.Block.Report
        Report Stages
          VariableNames:
            [KiwiFruit].Phenology.MaxBBP
            [KiwiFruit].Phenology.FloweringDOY
        Plant KiwiFruit
        Fertiliser
        SurfaceOrganicMatter: InitialResidueName=wheat_stubble; InitialResidueType=wheat; InitialResidueMass=500; InitialStandingFraction=0; InitialCPR=0; InitialCNR=100
        Irrigation
        MicroClimate: a_interception=0; b_interception=1; c_interception=0; d_interception=0; SoilHeatFluxFraction=0.4; MinimumHeightDiffForNewLayer=0; NightInterceptionFraction=0.5; ReferenceHeight=2
        Manager ReportOnEvents: same as HW-BudbreakTP2020HiCane223.Block.ReportOnEvents
        Manager Reset on date: same as CropLoadSensibilityTest.CropLoadSensibility.Block.Reset on date
        Soil: same as HWBBSpray2020HiCaneDriftstop243.Block.Soil
        Manager AutomaticIrrigation: same as CropLoadSensibilityTest.CropLoadSensibility.Block.AutomaticIrrigation
        Manager FactorLabels: same as CropLoadSensibilityTest.CropLoadSensibility.Block.FactorLabels
        Manager AutomaticFertiliser: same as CropLoadSensibilityTest.CropLoadSensibility.Block.AutomaticFertiliser
        Manager WaterStatus: same as CropLoadSensibilityTest.CropLoadSensibility.Block.WaterStatus
        Manager SowDateCv: same as HWBBSpray2020HiCaneDriftstop243.Block.SowDateCv
        AgriChemical
        Girdling
        Operations
          2024-09-10  [AgriChemical].Apply()
          2023-08-10  [AgriChemical].Apply()
          2022-09-10  [AgriChemical].Apply()
          2021-08-20  [AgriChemical].Apply()
          2020-08-15  [AgriChemical].Apply()
          2019-09-10  [AgriChemical].Apply()
          2018-09-10  [AgriChemical].Apply()
          2017-09-10  [AgriChemical].Apply()
          2016-09-10  [AgriChemical].Apply()
          2015-09-10  [AgriChemical].Apply()
        BiomassRemovalEvents OnPrune: same as HWBBSpray2020HiCaneDriftstop243.Block.OnPrune
      Memo
        Relationship between canopy density and fruit quality of kiwifruit

        Abstract: mean leaf area index (LAI) values ranging from 3.0 to 5.5 m2 (Hayward)
      Memo
        Relationship between canopy density and fruit quality of kiwifruit

        Abstract: mean leaf area index (LAI) values ranging from 3.0 to 5.5 m2 (Hayward)
      Memo
        Steve Green's report : @@ZesIR-Avg Fruit growth (2025).xlsx
      Memo
        Steve Green's report : @@ZesIR-Avg Fruit growth (2025).xlsx
      Memo
        Steve Green's report : @@ZesIR-Avg Fruit growth (2025).xlsx
      Memo
        Annette's Thesis:

        Figure 3.16, page 87. Total carbohydrate content of shoots and leaves (behaviour comparison)

        Figure 3.17, page 88. Total carbohydrate content of shoots and fruits (behaviour comparison)
    Simulation AKLDHW2020_2024
      Weather: FileName=South Auckland.met
      Clock: Start=2018-01-01; End=2024-12-30
      Summary
      SoilArbitrator Soil Arbitrator
      Zone Block: Area=1; Slope=0; AspectAngle=0; Altitude=50
        Report: same as HW-BudbreakTP2020HiCane223.Block.Report
        Report Stages
          VariableNames:
            [KiwiFruit].Phenology.MaxBBP
            [KiwiFruit].Phenology.FloweringDOY
        Plant KiwiFruit
        Fertiliser
        SurfaceOrganicMatter: InitialResidueName=wheat_stubble; InitialResidueType=wheat; InitialResidueMass=500; InitialStandingFraction=0; InitialCPR=0; InitialCNR=100
        Irrigation
        MicroClimate: a_interception=0; b_interception=1; c_interception=0; d_interception=0; SoilHeatFluxFraction=0.4; MinimumHeightDiffForNewLayer=0; NightInterceptionFraction=0.5; ReferenceHeight=2
        Manager ReportOnEvents: same as HW-BudbreakTP2020HiCane223.Block.ReportOnEvents
        Manager Reset on date: same as CropLoadSensibilityTest.CropLoadSensibility.Block.Reset on date
        Soil: same as HWBBSpray2020HiCaneDriftstop243.Block.Soil
        Manager AutomaticIrrigation: same as CropLoadSensibilityTest.CropLoadSensibility.Block.AutomaticIrrigation
        Manager FactorLabels: same as CropLoadSensibilityTest.CropLoadSensibility.Block.FactorLabels
        Manager AutomaticFertiliser: same as CropLoadSensibilityTest.CropLoadSensibility.Block.AutomaticFertiliser
        Manager WaterStatus: same as CropLoadSensibilityTest.CropLoadSensibility.Block.WaterStatus
        Manager SowDateCv: same as HWBBSpray2020HiCaneDriftstop243.Block.SowDateCv
        AgriChemical
        Girdling
        Operations
          2024-09-10  [AgriChemical].Apply()
          2023-09-10  [AgriChemical].Apply()
          2022-09-10  [AgriChemical].Apply()
          2021-09-10  [AgriChemical].Apply()
          2020-09-10  [AgriChemical].Apply()
          2019-09-10  [AgriChemical].Apply()
          2018-09-10  [AgriChemical].Apply()
          2017-09-10  [AgriChemical].Apply()
          2016-09-10  [AgriChemical].Apply()
          2015-09-10  [AgriChemical].Apply()
        BiomassRemovalEvents OnPrune: same as HWBBSpray2020HiCaneDriftstop243.Block.OnPrune
      Memo
        Relationship between canopy density and fruit quality of kiwifruit

        Abstract: mean leaf area index (LAI) values ranging from 3.0 to 5.5 m2 (Hayward)
      Memo
        Relationship between canopy density and fruit quality of kiwifruit

        Abstract: mean leaf area index (LAI) values ranging from 3.0 to 5.5 m2 (Hayward)
      Memo
        Steve Green's report : @@ZesIR-Avg Fruit growth (2025).xlsx
      Memo
        Steve Green's report : @@ZesIR-Avg Fruit growth (2025).xlsx
      Memo
        Steve Green's report : @@ZesIR-Avg Fruit growth (2025).xlsx
  Folder FruitingNoGirdle
    Simulation Gisborne2013HC
      Weather: FileName=Gisborne.met
      Clock: Start=2010-01-01; End=2014-06-30
      Summary
      SoilArbitrator Soil Arbitrator
      Zone Block: Area=1; Slope=0; AspectAngle=0; Altitude=50
        Report: same as BBControl.TPROB4BB2016control.Block.Report
        Report Stages
          VariableNames:
            [KiwiFruit].Phenology.MaxBBP
            [KiwiFruit].Phenology.FloweringDOY
        Plant KiwiFruit
        Fertiliser
        SurfaceOrganicMatter: InitialResidueName=wheat_stubble; InitialResidueType=wheat; InitialResidueMass=500; InitialStandingFraction=0; InitialCPR=0; InitialCNR=100
        Irrigation
        MicroClimate: a_interception=0; b_interception=1; c_interception=0; d_interception=0; SoilHeatFluxFraction=0.4; MinimumHeightDiffForNewLayer=0; NightInterceptionFraction=0.5; ReferenceHeight=2
        Manager ReportOnEvents: same as CropLoadSensibilityTest.CropLoadSensibility.Block.ReportOnEvents
        Manager Reset on date: same as CropLoadSensibilityTest.CropLoadSensibility.Block.Reset on date
        Soil: same as CropLoadSensibilityTest.CropLoadSensibility.Block.Soil
        Manager AutomaticIrrigation: same as CropLoadSensibilityTest.CropLoadSensibility.Block.AutomaticIrrigation
        Manager FactorLabels: same as CropLoadSensibilityTest.CropLoadSensibility.Block.FactorLabels
        Manager AutomaticFertiliser: same as CropLoadSensibilityTest.CropLoadSensibility.Block.AutomaticFertiliser
        Manager WaterStatus: same as CropLoadSensibilityTest.CropLoadSensibility.Block.WaterStatus
        Manager SowDateCv
          InitialRootDepth = 5
          CropToSow = Heyward_KK
          SowingDate = 05/25/2010 00:00:00
          BudNum = 25
          script: same as in HWTP2025HC.Block.SowDateCv
        Manager SetPhaseCompletionDates
          FruitMatureDate = 29-Apr
          script: same as in CropLoadSensibilityTest.CropLoadSensibility.Block.SetPhaseCompletionDates
        Manager SetBudNumber
          BudSetDate = 01-Jul
          BudNumber = 200
          script: same as in FruitingAll.TPHW2016_2024.Block.SetBudNumber
        AgriChemical
        Girdling
        Operations
        BiomassRemovalEvents OnPrune: same as HW-BudbreakTP2020HiCane223.Block.OnPrune
      Memo
        Steve Green's report : @@ZesIR-Avg Fruit growth (2025).xlsx
      Memo
        Steve Green's report : @@ZesIR-Avg Fruit growth (2025).xlsx
      Memo
        Steve Green's report : @@ZesIR-Avg Fruit growth (2025).xlsx
      Memo
        Relationship between canopy density and fruit quality of kiwifruit

        Abstract: mean leaf area index (LAI) values ranging from 3.0 to 5.5 m2 (Hayward)
    Simulation Katikati2013HC
      Weather: FileName=katikati.met
      Clock: Start=2008-01-01; End=2014-06-30
      Summary
      SoilArbitrator Soil Arbitrator
      Zone Block: Area=1; Slope=0; AspectAngle=0; Altitude=50
        Report: same as BBControl.TPROB4BB2016control.Block.Report
        Report Stages
          VariableNames:
            [KiwiFruit].Phenology.MaxBBP
            [KiwiFruit].Phenology.FloweringDOY
        Plant KiwiFruit
        Fertiliser
        SurfaceOrganicMatter: InitialResidueName=wheat_stubble; InitialResidueType=wheat; InitialResidueMass=500; InitialStandingFraction=0; InitialCPR=0; InitialCNR=100
        Irrigation
        MicroClimate: a_interception=0; b_interception=1; c_interception=0; d_interception=0; SoilHeatFluxFraction=0.4; MinimumHeightDiffForNewLayer=0; NightInterceptionFraction=0.5; ReferenceHeight=2
        Manager ReportOnEvents: same as CropLoadSensibilityTest.CropLoadSensibility.Block.ReportOnEvents
        Manager Reset on date: same as CropLoadSensibilityTest.CropLoadSensibility.Block.Reset on date
        Soil: same as CropLoadSensibilityTest.CropLoadSensibility.Block.Soil
        Manager AutomaticIrrigation: same as CropLoadSensibilityTest.CropLoadSensibility.Block.AutomaticIrrigation
        Manager FactorLabels: same as CropLoadSensibilityTest.CropLoadSensibility.Block.FactorLabels
        Manager AutomaticFertiliser: same as CropLoadSensibilityTest.CropLoadSensibility.Block.AutomaticFertiliser
        Manager WaterStatus: same as CropLoadSensibilityTest.CropLoadSensibility.Block.WaterStatus
        Manager SowDateCv
          InitialRootDepth = 5
          CropToSow = Heyward_KK
          SowingDate = 05/25/2008 00:00:00
          BudNum = 25
          script: same as in HWTP2025HC.Block.SowDateCv
        Manager SetPhaseCompletionDates
          FruitMatureDate = 17-Apr
          script: same as in CropLoadSensibilityTest.CropLoadSensibility.Block.SetPhaseCompletionDates
        Manager SetBudNumber
          BudSetDate = 01-Jul
          BudNumber = 21
          script: same as in FruitingAll.TPHW2016_2024.Block.SetBudNumber
        AgriChemical
        Girdling
        Operations
          2013-07-27  [AgriChemical].Apply()
        BiomassRemovalEvents OnPrune: same as HW-BudbreakTP2020HiCane223.Block.OnPrune
      Memo
        Steve Green's report : @@ZesIR-Avg Fruit growth (2025).xlsx
      Memo
        Steve Green's report : @@ZesIR-Avg Fruit growth (2025).xlsx
      Memo
        Steve Green's report : @@ZesIR-Avg Fruit growth (2025).xlsx
      Memo
        Relationship between canopy density and fruit quality of kiwifruit

        Abstract: mean leaf area index (LAI) values ranging from 3.0 to 5.5 m2 (Hayward)
    Simulation Whangarei2013HC
      Weather: FileName=whangarei.met
      Clock: Start=2005-01-01; End=2014-06-30
      Summary
      SoilArbitrator Soil Arbitrator
      Zone Block: Area=1; Slope=0; AspectAngle=0; Altitude=50
        Report: same as BBControl.TPROB4BB2016control.Block.Report
        Report Stages
          VariableNames:
            [KiwiFruit].Phenology.MaxBBP
            [KiwiFruit].Phenology.FloweringDOY
        Plant KiwiFruit
        Fertiliser
        SurfaceOrganicMatter: InitialResidueName=wheat_stubble; InitialResidueType=wheat; InitialResidueMass=500; InitialStandingFraction=0; InitialCPR=0; InitialCNR=100
        Irrigation
        MicroClimate: a_interception=0; b_interception=1; c_interception=0; d_interception=0; SoilHeatFluxFraction=0.4; MinimumHeightDiffForNewLayer=0; NightInterceptionFraction=0.5; ReferenceHeight=2
        Manager ReportOnEvents: same as CropLoadSensibilityTest.CropLoadSensibility.Block.ReportOnEvents
        Manager Reset on date: same as CropLoadSensibilityTest.CropLoadSensibility.Block.Reset on date
        Soil: same as CropLoadSensibilityTest.CropLoadSensibility.Block.Soil
        Manager AutomaticIrrigation: same as CropLoadSensibilityTest.CropLoadSensibility.Block.AutomaticIrrigation
        Manager FactorLabels: same as CropLoadSensibilityTest.CropLoadSensibility.Block.FactorLabels
        Manager AutomaticFertiliser: same as CropLoadSensibilityTest.CropLoadSensibility.Block.AutomaticFertiliser
        Manager WaterStatus: same as CropLoadSensibilityTest.CropLoadSensibility.Block.WaterStatus
        Manager SowDateCv
          InitialRootDepth = 5
          CropToSow = Heyward_KK
          SowingDate = 05/25/2005 00:00:00
          BudNum = 25
          script: same as in HWTP2025HC.Block.SowDateCv
        Manager SetPhaseCompletionDates
          FruitMatureDate = 6-May
          script: same as in CropLoadSensibilityTest.CropLoadSensibility.Block.SetPhaseCompletionDates
        Manager SetBudNumber
          BudSetDate = 01-Jul
          BudNumber = 127
          script: same as in FruitingAll.TPHW2016_2024.Block.SetBudNumber
        AgriChemical
        Girdling
        Operations
        BiomassRemovalEvents OnPrune: same as HW-BudbreakTP2020HiCane223.Block.OnPrune
      Memo
        Steve Green's report : @@ZesIR-Avg Fruit growth (2025).xlsx
      Memo
        Steve Green's report : @@ZesIR-Avg Fruit growth (2025).xlsx
      Memo
        Steve Green's report : @@ZesIR-Avg Fruit growth (2025).xlsx
      Memo
        Relationship between canopy density and fruit quality of kiwifruit

        Abstract: mean leaf area index (LAI) values ranging from 3.0 to 5.5 m2 (Hayward)
    Simulation TPHW2016
      Weather: FileName=Te Puke.met
      Clock: Start=2010-01-01; End=2017-12-30
      Summary
      SoilArbitrator Soil Arbitrator
      Zone Block: Area=1; Slope=0; AspectAngle=0; Altitude=50
        Report: same as HW-BudbreakTP2020HiCane223.Block.Report
        Report Stages
          VariableNames:
            [KiwiFruit].Phenology.MaxBBP
            [KiwiFruit].Phenology.FloweringDOY
        Plant KiwiFruit
        Fertiliser
        SurfaceOrganicMatter: InitialResidueName=wheat_stubble; InitialResidueType=wheat; InitialResidueMass=500; InitialStandingFraction=0; InitialCPR=0; InitialCNR=100
        Irrigation
        MicroClimate: a_interception=0; b_interception=1; c_interception=0; d_interception=0; SoilHeatFluxFraction=0.4; MinimumHeightDiffForNewLayer=0; NightInterceptionFraction=0.5; ReferenceHeight=2
        Manager ReportOnEvents: same as HW-BudbreakTP2020HiCane223.Block.ReportOnEvents
        Manager Reset on date: same as CropLoadSensibilityTest.CropLoadSensibility.Block.Reset on date
        Soil: same as HWBBSpray2020HiCaneDriftstop243.Block.Soil
        Manager AutomaticIrrigation: same as CropLoadSensibilityTest.CropLoadSensibility.Block.AutomaticIrrigation
        Manager FactorLabels: same as CropLoadSensibilityTest.CropLoadSensibility.Block.FactorLabels
        Manager AutomaticFertiliser: same as CropLoadSensibilityTest.CropLoadSensibility.Block.AutomaticFertiliser
        Manager WaterStatus: same as CropLoadSensibilityTest.CropLoadSensibility.Block.WaterStatus
        Manager SowDateCv
          InitialRootDepth = 5
          CropToSow = Heyward_TP
          SowingDate = 05/25/2010 00:00:00
          script: same as in HWBBSpray2020HiCaneDriftstop243.Block.SowDateCv
        Manager SetBudNumber
          BudSetDate = 01-Jul
          BudNumber = 40
          script: same as in FruitingAll.TPHW2016_2024.Block.SetBudNumber
        Manager SetPhaseCompletionDates
          FruitMatureDate = 30-Apr
          script: same as in CropLoadSensibilityTest.CropLoadSensibility.Block.SetPhaseCompletionDates
        AgriChemical
        Girdling
        Operations
        BiomassRemovalEvents OnPrune: same as FruitingAll.TPHW2016_2024.Block.OnPrune
        BiomassRemovalEvents OnHarvest: same as FruitingAll.TPHW2016_2024.Block.OnHarvest
      Memo
        Relationship between canopy density and fruit quality of kiwifruit

        Abstract: mean leaf area index (LAI) values ranging from 3.0 to 5.5 m2 (Hayward)
      Memo
        Relationship between canopy density and fruit quality of kiwifruit

        Abstract: mean leaf area index (LAI) values ranging from 3.0 to 5.5 m2 (Hayward)
      Memo
        Annette Richardson's thesis: Fig 3.10.A

        Carbon acquisition of single shoots on daily basis (~photosynthesis?)
      Memo
        Steve Green's report : @@ZesIR-Avg Fruit growth (2025).xlsx
      Memo
        Steve Green's report : @@ZesIR-Avg Fruit growth (2025).xlsx
      Memo
        Steve Green's report : @@ZesIR-Avg Fruit growth (2025).xlsx
      Memo
        Steve Green's report : @@ZesIR-Avg Fruit growth (2025).xlsx
      Memo
        Annette's Thesis:

        Figure 3.16, page 87. Total carbohydrate content of shoots and leaves (behaviour comparison)

        Figure 3.17, page 88. Total carbohydrate content of shoots and fruits (behaviour comparison)
    Simulation TPHW2017
      Weather: FileName=Te Puke.met
      Clock: Start=2010-01-01; End=2018-12-30
      Summary
      SoilArbitrator Soil Arbitrator
      Zone Block: Area=1; Slope=0; AspectAngle=0; Altitude=50
        Report: same as HW-BudbreakTP2020HiCane223.Block.Report
        Report Stages
          VariableNames:
            [KiwiFruit].Phenology.MaxBBP
            [KiwiFruit].Phenology.FloweringDOY
        Plant KiwiFruit
        Fertiliser
        SurfaceOrganicMatter: InitialResidueName=wheat_stubble; InitialResidueType=wheat; InitialResidueMass=500; InitialStandingFraction=0; InitialCPR=0; InitialCNR=100
        Irrigation
        MicroClimate: a_interception=0; b_interception=1; c_interception=0; d_interception=0; SoilHeatFluxFraction=0.4; MinimumHeightDiffForNewLayer=0; NightInterceptionFraction=0.5; ReferenceHeight=2
        Manager ReportOnEvents: same as HW-BudbreakTP2020HiCane223.Block.ReportOnEvents
        Manager Reset on date: same as CropLoadSensibilityTest.CropLoadSensibility.Block.Reset on date
        Soil: same as HWBBSpray2020HiCaneDriftstop243.Block.Soil
        Manager AutomaticIrrigation: same as CropLoadSensibilityTest.CropLoadSensibility.Block.AutomaticIrrigation
        Manager FactorLabels: same as CropLoadSensibilityTest.CropLoadSensibility.Block.FactorLabels
        Manager AutomaticFertiliser: same as CropLoadSensibilityTest.CropLoadSensibility.Block.AutomaticFertiliser
        Manager WaterStatus: same as CropLoadSensibilityTest.CropLoadSensibility.Block.WaterStatus
        Manager SowDateCv: same as FruitingNoGirdle.TPHW2016.Block.SowDateCv
        Manager SetBudNumber: same as FruitingAll.TPHW2016_2024.Block.SetBudNumber
        Manager SetPhaseCompletionDates
          FruitMatureDate = 28-Apr
          script: same as in CropLoadSensibilityTest.CropLoadSensibility.Block.SetPhaseCompletionDates
        AgriChemical
        Girdling
        Operations
        BiomassRemovalEvents OnPrune: same as HWBBSpray2020HiCaneDriftstop243.Block.OnPrune
      Memo
        Relationship between canopy density and fruit quality of kiwifruit

        Abstract: mean leaf area index (LAI) values ranging from 3.0 to 5.5 m2 (Hayward)
      Memo
        Relationship between canopy density and fruit quality of kiwifruit

        Abstract: mean leaf area index (LAI) values ranging from 3.0 to 5.5 m2 (Hayward)
      Memo
        Annette Richardson's thesis: Fig 3.10.A

        Carbon acquisition of single shoots on daily basis (~photosynthesis?)
      Memo
        Steve Green's report : @@ZesIR-Avg Fruit growth (2025).xlsx
      Memo
        Steve Green's report : @@ZesIR-Avg Fruit growth (2025).xlsx
      Memo
        Steve Green's report : @@ZesIR-Avg Fruit growth (2025).xlsx
      Memo
        Steve Green's report : @@ZesIR-Avg Fruit growth (2025).xlsx
      Memo
        Annette's Thesis:

        Figure 3.16, page 87. Total carbohydrate content of shoots and leaves (behaviour comparison)

        Figure 3.17, page 88. Total carbohydrate content of shoots and fruits (behaviour comparison)
    Simulation TPHW2018
      Weather: FileName=Te Puke.met
      Clock: Start=2010-01-01; End=2019-12-30
      Summary
      SoilArbitrator Soil Arbitrator
      Zone Block: Area=1; Slope=0; AspectAngle=0; Altitude=50
        Report: same as HW-BudbreakTP2020HiCane223.Block.Report
        Report Stages
          VariableNames:
            [KiwiFruit].Phenology.MaxBBP
            [KiwiFruit].Phenology.FloweringDOY
        Plant KiwiFruit
        Fertiliser
        SurfaceOrganicMatter: InitialResidueName=wheat_stubble; InitialResidueType=wheat; InitialResidueMass=500; InitialStandingFraction=0; InitialCPR=0; InitialCNR=100
        Irrigation
        MicroClimate: a_interception=0; b_interception=1; c_interception=0; d_interception=0; SoilHeatFluxFraction=0.4; MinimumHeightDiffForNewLayer=0; NightInterceptionFraction=0.5; ReferenceHeight=2
        Manager ReportOnEvents: same as HW-BudbreakTP2020HiCane223.Block.ReportOnEvents
        Manager Reset on date: same as CropLoadSensibilityTest.CropLoadSensibility.Block.Reset on date
        Soil: same as HWBBSpray2020HiCaneDriftstop243.Block.Soil
        Manager AutomaticIrrigation: same as CropLoadSensibilityTest.CropLoadSensibility.Block.AutomaticIrrigation
        Manager FactorLabels: same as CropLoadSensibilityTest.CropLoadSensibility.Block.FactorLabels
        Manager AutomaticFertiliser: same as CropLoadSensibilityTest.CropLoadSensibility.Block.AutomaticFertiliser
        Manager WaterStatus: same as CropLoadSensibilityTest.CropLoadSensibility.Block.WaterStatus
        Manager SowDateCv: same as FruitingNoGirdle.TPHW2016.Block.SowDateCv
        Manager SetBudNumber
          BudSetDate = 01-Jul
          BudNumber = 35
          script: same as in FruitingAll.TPHW2016_2024.Block.SetBudNumber
        Manager SetPhaseCompletionDates
          FruitMatureDate = 19-Apr
          script: same as in CropLoadSensibilityTest.CropLoadSensibility.Block.SetPhaseCompletionDates
        AgriChemical
        Operations
          2024-08-10  [AgriChemical].Apply()
          2023-07-25  [AgriChemical].Apply()
          2022-08-10  [AgriChemical].Apply()
          2021-08-10  [AgriChemical].Apply()
          2020-08-10  [AgriChemical].Apply()
          2019-08-10  [AgriChemical].Apply()
          2018-08-01  [AgriChemical].Apply()
          2017-08-10  [AgriChemical].Apply()
        BiomassRemovalEvents OnPrune: same as HWBBSpray2020HiCaneDriftstop243.Block.OnPrune
        Girdling
      Memo
        Relationship between canopy density and fruit quality of kiwifruit

        Abstract: mean leaf area index (LAI) values ranging from 3.0 to 5.5 m2 (Hayward)
      Memo
        Relationship between canopy density and fruit quality of kiwifruit

        Abstract: mean leaf area index (LAI) values ranging from 3.0 to 5.5 m2 (Hayward)
      Memo
        Annette Richardson's thesis: Fig 3.10.A

        Carbon acquisition of single shoots on daily basis (~photosynthesis?)
      Memo
        Steve Green's report : @@ZesIR-Avg Fruit growth (2025).xlsx
      Memo
        Steve Green's report : @@ZesIR-Avg Fruit growth (2025).xlsx
      Memo
        Steve Green's report : @@ZesIR-Avg Fruit growth (2025).xlsx
      Memo
        Steve Green's report : @@ZesIR-Avg Fruit growth (2025).xlsx
    Simulation TPHW2019
      Weather: FileName=Te Puke.met
      Clock: Start=2010-01-01; End=2020-12-30
      Summary
      SoilArbitrator Soil Arbitrator
      Zone Block: Area=1; Slope=0; AspectAngle=0; Altitude=50
        Report: same as HW-BudbreakTP2020HiCane223.Block.Report
        Report Stages
          VariableNames:
            [KiwiFruit].Phenology.MaxBBP
            [KiwiFruit].Phenology.FloweringDOY
        Plant KiwiFruit
        Fertiliser
        SurfaceOrganicMatter: InitialResidueName=wheat_stubble; InitialResidueType=wheat; InitialResidueMass=500; InitialStandingFraction=0; InitialCPR=0; InitialCNR=100
        Irrigation
        MicroClimate: a_interception=0; b_interception=1; c_interception=0; d_interception=0; SoilHeatFluxFraction=0.4; MinimumHeightDiffForNewLayer=0; NightInterceptionFraction=0.5; ReferenceHeight=2
        Manager ReportOnEvents: same as HW-BudbreakTP2020HiCane223.Block.ReportOnEvents
        Manager Reset on date: same as CropLoadSensibilityTest.CropLoadSensibility.Block.Reset on date
        Soil: same as HWBBSpray2020HiCaneDriftstop243.Block.Soil
        Manager AutomaticIrrigation: same as CropLoadSensibilityTest.CropLoadSensibility.Block.AutomaticIrrigation
        Manager FactorLabels: same as CropLoadSensibilityTest.CropLoadSensibility.Block.FactorLabels
        Manager AutomaticFertiliser: same as CropLoadSensibilityTest.CropLoadSensibility.Block.AutomaticFertiliser
        Manager WaterStatus: same as CropLoadSensibilityTest.CropLoadSensibility.Block.WaterStatus
        Manager SowDateCv: same as FruitingNoGirdle.TPHW2016.Block.SowDateCv
        Manager SetBudNumber: same as FruitingNoGirdle.TPHW2018.Block.SetBudNumber
        Manager SetPhaseCompletionDates
          FruitMatureDate = 26-Apr
          script: same as in CropLoadSensibilityTest.CropLoadSensibility.Block.SetPhaseCompletionDates
        AgriChemical
        Operations
        BiomassRemovalEvents OnPrune: same as HWBBSpray2020HiCaneDriftstop243.Block.OnPrune
        Girdling
      Memo
        Relationship between canopy density and fruit quality of kiwifruit

        Abstract: mean leaf area index (LAI) values ranging from 3.0 to 5.5 m2 (Hayward)
      Memo
        Relationship between canopy density and fruit quality of kiwifruit

        Abstract: mean leaf area index (LAI) values ranging from 3.0 to 5.5 m2 (Hayward)
      Memo
        Annette Richardson's thesis: Fig 3.10.A

        Carbon acquisition of single shoots on daily basis (~photosynthesis?)
      Memo
        Steve Green's report : @@ZesIR-Avg Fruit growth (2025).xlsx
      Memo
        Steve Green's report : @@ZesIR-Avg Fruit growth (2025).xlsx
      Memo
        Steve Green's report : @@ZesIR-Avg Fruit growth (2025).xlsx
      Memo
        Steve Green's report : @@ZesIR-Avg Fruit growth (2025).xlsx
    Simulation TPHW2020
      Weather: FileName=Te Puke.met
      Clock: Start=2010-01-01; End=2021-12-30
      Summary
      SoilArbitrator Soil Arbitrator
      Zone Block: Area=1; Slope=0; AspectAngle=0; Altitude=50
        Report: same as HW-BudbreakTP2020HiCane223.Block.Report
        Report Stages
          VariableNames:
            [KiwiFruit].Phenology.MaxBBP
            [KiwiFruit].Phenology.FloweringDOY
        Plant KiwiFruit
        Fertiliser
        SurfaceOrganicMatter: InitialResidueName=wheat_stubble; InitialResidueType=wheat; InitialResidueMass=500; InitialStandingFraction=0; InitialCPR=0; InitialCNR=100
        Irrigation
        MicroClimate: a_interception=0; b_interception=1; c_interception=0; d_interception=0; SoilHeatFluxFraction=0.4; MinimumHeightDiffForNewLayer=0; NightInterceptionFraction=0.5; ReferenceHeight=2
        Manager ReportOnEvents: same as HW-BudbreakTP2020HiCane223.Block.ReportOnEvents
        Manager Reset on date: same as CropLoadSensibilityTest.CropLoadSensibility.Block.Reset on date
        Soil: same as HWBBSpray2020HiCaneDriftstop243.Block.Soil
        Manager AutomaticIrrigation: same as CropLoadSensibilityTest.CropLoadSensibility.Block.AutomaticIrrigation
        Manager FactorLabels: same as CropLoadSensibilityTest.CropLoadSensibility.Block.FactorLabels
        Manager AutomaticFertiliser: same as CropLoadSensibilityTest.CropLoadSensibility.Block.AutomaticFertiliser
        Manager WaterStatus: same as CropLoadSensibilityTest.CropLoadSensibility.Block.WaterStatus
        Manager SowDateCv: same as FruitingNoGirdle.TPHW2016.Block.SowDateCv
        Manager SetBudNumber
          BudSetDate = 01-Jul
          BudNumber = 29
          script: same as in FruitingAll.TPHW2016_2024.Block.SetBudNumber
        Manager SetPhaseCompletionDates
          FruitMatureDate = 23-Apr
          script: same as in CropLoadSensibilityTest.CropLoadSensibility.Block.SetPhaseCompletionDates
        AgriChemical
        Operations: same as FruitingNoGirdle.TPHW2018.Block.Operations
        BiomassRemovalEvents OnPrune: same as HWBBSpray2020HiCaneDriftstop243.Block.OnPrune
        Girdling
      Memo
        Relationship between canopy density and fruit quality of kiwifruit

        Abstract: mean leaf area index (LAI) values ranging from 3.0 to 5.5 m2 (Hayward)
      Memo
        Relationship between canopy density and fruit quality of kiwifruit

        Abstract: mean leaf area index (LAI) values ranging from 3.0 to 5.5 m2 (Hayward)
      Memo
        Steve Green's report : @@ZesIR-Avg Fruit growth (2025).xlsx
      Memo
        Steve Green's report : @@ZesIR-Avg Fruit growth (2025).xlsx
      Memo
        Steve Green's report : @@ZesIR-Avg Fruit growth (2025).xlsx
      Memo
        Steve Green's report : @@ZesIR-Avg Fruit growth (2025).xlsx
    Simulation TPHW2021
      Weather: FileName=Te Puke.met
      Clock: Start=2010-01-01; End=2022-12-30
      Summary
      SoilArbitrator Soil Arbitrator
      Zone Block: Area=1; Slope=0; AspectAngle=0; Altitude=50
        Report: same as HW-BudbreakTP2020HiCane223.Block.Report
        Report Stages
          VariableNames:
            [KiwiFruit].Phenology.MaxBBP
            [KiwiFruit].Phenology.FloweringDOY
        Plant KiwiFruit
        Fertiliser
        SurfaceOrganicMatter: InitialResidueName=wheat_stubble; InitialResidueType=wheat; InitialResidueMass=500; InitialStandingFraction=0; InitialCPR=0; InitialCNR=100
        Irrigation
        MicroClimate: a_interception=0; b_interception=1; c_interception=0; d_interception=0; SoilHeatFluxFraction=0.4; MinimumHeightDiffForNewLayer=0; NightInterceptionFraction=0.5; ReferenceHeight=2
        Manager ReportOnEvents: same as HW-BudbreakTP2020HiCane223.Block.ReportOnEvents
        Manager Reset on date: same as CropLoadSensibilityTest.CropLoadSensibility.Block.Reset on date
        Soil: same as HWBBSpray2020HiCaneDriftstop243.Block.Soil
        Manager AutomaticIrrigation: same as CropLoadSensibilityTest.CropLoadSensibility.Block.AutomaticIrrigation
        Manager FactorLabels: same as CropLoadSensibilityTest.CropLoadSensibility.Block.FactorLabels
        Manager AutomaticFertiliser: same as CropLoadSensibilityTest.CropLoadSensibility.Block.AutomaticFertiliser
        Manager WaterStatus: same as CropLoadSensibilityTest.CropLoadSensibility.Block.WaterStatus
        Manager SowDateCv: same as FruitingNoGirdle.TPHW2016.Block.SowDateCv
        Manager SetBudNumber: same as FruitingNoGirdle.TPHW2016.Block.SetBudNumber
        Manager SetPhaseCompletionDates
          FruitMatureDate = 13-Apr
          script: same as in CropLoadSensibilityTest.CropLoadSensibility.Block.SetPhaseCompletionDates
        AgriChemical
        Operations: same as FruitingNoGirdle.TPHW2018.Block.Operations
        BiomassRemovalEvents OnPrune: same as HWBBSpray2020HiCaneDriftstop243.Block.OnPrune
        Girdling
      Memo
        Relationship between canopy density and fruit quality of kiwifruit

        Abstract: mean leaf area index (LAI) values ranging from 3.0 to 5.5 m2 (Hayward)
      Memo
        Relationship between canopy density and fruit quality of kiwifruit

        Abstract: mean leaf area index (LAI) values ranging from 3.0 to 5.5 m2 (Hayward)
      Memo
        Annette Richardson's thesis: Fig 3.10.A

        Carbon acquisition of single shoots on daily basis (~photosynthesis?)
      Memo
        Steve Green's report : @@ZesIR-Avg Fruit growth (2025).xlsx
      Memo
        Steve Green's report : @@ZesIR-Avg Fruit growth (2025).xlsx
      Memo
        Steve Green's report : @@ZesIR-Avg Fruit growth (2025).xlsx
      Memo
        Steve Green's report : @@ZesIR-Avg Fruit growth (2025).xlsx
    Simulation TPHW2022
      Weather: FileName=Te Puke.met
      Clock: Start=2010-01-01; End=2023-12-30
      Summary
      SoilArbitrator Soil Arbitrator
      Zone Block: Area=1; Slope=0; AspectAngle=0; Altitude=50
        Report: same as HW-BudbreakTP2020HiCane223.Block.Report
        Report Stages
          VariableNames:
            [KiwiFruit].Phenology.MaxBBP
            [KiwiFruit].Phenology.FloweringDOY
        Plant KiwiFruit
        Fertiliser
        SurfaceOrganicMatter: InitialResidueName=wheat_stubble; InitialResidueType=wheat; InitialResidueMass=500; InitialStandingFraction=0; InitialCPR=0; InitialCNR=100
        Irrigation
        MicroClimate: a_interception=0; b_interception=1; c_interception=0; d_interception=0; SoilHeatFluxFraction=0.4; MinimumHeightDiffForNewLayer=0; NightInterceptionFraction=0.5; ReferenceHeight=2
        Manager ReportOnEvents: same as HW-BudbreakTP2020HiCane223.Block.ReportOnEvents
        Manager Reset on date: same as CropLoadSensibilityTest.CropLoadSensibility.Block.Reset on date
        Soil: same as HWBBSpray2020HiCaneDriftstop243.Block.Soil
        Manager AutomaticIrrigation: same as CropLoadSensibilityTest.CropLoadSensibility.Block.AutomaticIrrigation
        Manager FactorLabels: same as CropLoadSensibilityTest.CropLoadSensibility.Block.FactorLabels
        Manager AutomaticFertiliser: same as CropLoadSensibilityTest.CropLoadSensibility.Block.AutomaticFertiliser
        Manager WaterStatus: same as CropLoadSensibilityTest.CropLoadSensibility.Block.WaterStatus
        Manager SowDateCv: same as FruitingNoGirdle.TPHW2016.Block.SowDateCv
        Manager SetBudNumber
          BudSetDate = 01-Jul
          BudNumber = 70
          script: same as in FruitingAll.TPHW2016_2024.Block.SetBudNumber
        Manager SetPhaseCompletionDates
          FruitMatureDate = 09-Apr
          script: same as in CropLoadSensibilityTest.CropLoadSensibility.Block.SetPhaseCompletionDates
        AgriChemical
        Operations
        BiomassRemovalEvents OnPrune: same as HWBBSpray2020HiCaneDriftstop243.Block.OnPrune
        Girdling
      Memo
        Relationship between canopy density and fruit quality of kiwifruit

        Abstract: mean leaf area index (LAI) values ranging from 3.0 to 5.5 m2 (Hayward)
      Memo
        Relationship between canopy density and fruit quality of kiwifruit

        Abstract: mean leaf area index (LAI) values ranging from 3.0 to 5.5 m2 (Hayward)
      Memo
        Annette Richardson's thesis: Fig 3.10.A

        Carbon acquisition of single shoots on daily basis (~photosynthesis?)
      Memo
        Steve Green's report : @@ZesIR-Avg Fruit growth (2025).xlsx
      Memo
        Steve Green's report : @@ZesIR-Avg Fruit growth (2025).xlsx
      Memo
        Steve Green's report : @@ZesIR-Avg Fruit growth (2025).xlsx
      Memo
        Steve Green's report : @@ZesIR-Avg Fruit growth (2025).xlsx
    Simulation TPHW2023
      Weather: FileName=Te Puke.met
      Clock: Start=2010-01-01; End=2024-12-30
      Summary
      SoilArbitrator Soil Arbitrator
      Zone Block: Area=1; Slope=0; AspectAngle=0; Altitude=50
        Report: same as HW-BudbreakTP2020HiCane223.Block.Report
        Report Stages
          VariableNames:
            [KiwiFruit].Phenology.MaxBBP
            [KiwiFruit].Phenology.FloweringDOY
        Plant KiwiFruit
        Fertiliser
        SurfaceOrganicMatter: InitialResidueName=wheat_stubble; InitialResidueType=wheat; InitialResidueMass=500; InitialStandingFraction=0; InitialCPR=0; InitialCNR=100
        Irrigation
        MicroClimate: a_interception=0; b_interception=1; c_interception=0; d_interception=0; SoilHeatFluxFraction=0.4; MinimumHeightDiffForNewLayer=0; NightInterceptionFraction=0.5; ReferenceHeight=2
        Manager ReportOnEvents: same as HW-BudbreakTP2020HiCane223.Block.ReportOnEvents
        Manager Reset on date: same as CropLoadSensibilityTest.CropLoadSensibility.Block.Reset on date
        Soil: same as HWBBSpray2020HiCaneDriftstop243.Block.Soil
        Manager AutomaticIrrigation: same as CropLoadSensibilityTest.CropLoadSensibility.Block.AutomaticIrrigation
        Manager FactorLabels: same as CropLoadSensibilityTest.CropLoadSensibility.Block.FactorLabels
        Manager AutomaticFertiliser: same as CropLoadSensibilityTest.CropLoadSensibility.Block.AutomaticFertiliser
        Manager WaterStatus: same as CropLoadSensibilityTest.CropLoadSensibility.Block.WaterStatus
        Manager SowDateCv: same as FruitingNoGirdle.TPHW2016.Block.SowDateCv
        Manager SetBudNumber
          BudSetDate = 01-Jul
          BudNumber = 50
          script: same as in FruitingAll.TPHW2016_2024.Block.SetBudNumber
        Manager SetPhaseCompletionDates
          FruitMatureDate = 12-Apr
          script: same as in CropLoadSensibilityTest.CropLoadSensibility.Block.SetPhaseCompletionDates
        AgriChemical
        Operations
          2022-08-05  [AgriChemical].Apply()
        BiomassRemovalEvents OnPrune: same as HWBBSpray2020HiCaneDriftstop243.Block.OnPrune
        Girdling
      Memo
        Relationship between canopy density and fruit quality of kiwifruit

        Abstract: mean leaf area index (LAI) values ranging from 3.0 to 5.5 m2 (Hayward)
      Memo
        Relationship between canopy density and fruit quality of kiwifruit

        Abstract: mean leaf area index (LAI) values ranging from 3.0 to 5.5 m2 (Hayward)
      Memo
        Annette Richardson's thesis: Fig 3.10.A

        Carbon acquisition of single shoots on daily basis (~photosynthesis?)
      Memo
        Steve Green's report : @@ZesIR-Avg Fruit growth (2025).xlsx
      Memo
        Steve Green's report : @@ZesIR-Avg Fruit growth (2025).xlsx
      Memo
        Steve Green's report : @@ZesIR-Avg Fruit growth (2025).xlsx
      Memo
        Steve Green's report : @@ZesIR-Avg Fruit growth (2025).xlsx
    Simulation TPHW2024
      Weather: FileName=Te Puke.met
      Clock: Start=2015-01-01; End=2024-12-30
      Summary
      SoilArbitrator Soil Arbitrator
      Zone Block: Area=1; Slope=0; AspectAngle=0; Altitude=50
        Report: same as HW-BudbreakTP2020HiCane223.Block.Report
        Report Stages
          VariableNames:
            [KiwiFruit].Phenology.MaxBBP
            [KiwiFruit].Phenology.FloweringDOY
        Plant KiwiFruit
        Fertiliser
        SurfaceOrganicMatter: InitialResidueName=wheat_stubble; InitialResidueType=wheat; InitialResidueMass=500; InitialStandingFraction=0; InitialCPR=0; InitialCNR=100
        Irrigation
        MicroClimate: a_interception=0; b_interception=1; c_interception=0; d_interception=0; SoilHeatFluxFraction=0.4; MinimumHeightDiffForNewLayer=0; NightInterceptionFraction=0.5; ReferenceHeight=2
        Manager ReportOnEvents: same as HW-BudbreakTP2020HiCane223.Block.ReportOnEvents
        Manager Reset on date: same as CropLoadSensibilityTest.CropLoadSensibility.Block.Reset on date
        Soil: same as HWBBSpray2020HiCaneDriftstop243.Block.Soil
        Manager AutomaticIrrigation: same as CropLoadSensibilityTest.CropLoadSensibility.Block.AutomaticIrrigation
        Manager FactorLabels: same as CropLoadSensibilityTest.CropLoadSensibility.Block.FactorLabels
        Manager AutomaticFertiliser: same as CropLoadSensibilityTest.CropLoadSensibility.Block.AutomaticFertiliser
        Manager WaterStatus: same as CropLoadSensibilityTest.CropLoadSensibility.Block.WaterStatus
        Manager SowDateCv
          InitialRootDepth = 5
          CropToSow = Heyward_TP
          SowingDate = 05/25/2015 00:00:00
          script: same as in HWBBSpray2020HiCaneDriftstop243.Block.SowDateCv
        Manager SetBudNumber
          BudSetDate = 01-Jul
          BudNumber = 85
          script: same as in FruitingAll.TPHW2016_2024.Block.SetBudNumber
        Manager SetPhaseCompletionDates: same as FruitingNoGirdle.TPHW2021.Block.SetPhaseCompletionDates
        AgriChemical
        Operations
        BiomassRemovalEvents OnPrune: same as HWBBSpray2020HiCaneDriftstop243.Block.OnPrune
        Girdling
      Memo
        Relationship between canopy density and fruit quality of kiwifruit

        Abstract: mean leaf area index (LAI) values ranging from 3.0 to 5.5 m2 (Hayward)
      Memo
        Relationship between canopy density and fruit quality of kiwifruit

        Abstract: mean leaf area index (LAI) values ranging from 3.0 to 5.5 m2 (Hayward)
      Memo
        Annette Richardson's thesis: Fig 3.10.A

        Carbon acquisition of single shoots on daily basis (~photosynthesis?)
      Memo
        Steve Green's report : @@ZesIR-Avg Fruit growth (2025).xlsx
      Memo
        Steve Green's report : @@ZesIR-Avg Fruit growth (2025).xlsx
      Memo
        Steve Green's report : @@ZesIR-Avg Fruit growth (2025).xlsx
      Memo
        Steve Green's report : @@ZesIR-Avg Fruit growth (2025).xlsx
    Simulation KKHW2020
      Weather: FileName=Kerikeri.met
      Clock: Start=2010-01-01; End=2021-12-30
      Summary
      SoilArbitrator Soil Arbitrator
      Zone Block: Area=1; Slope=0; AspectAngle=0; Altitude=50
        Report: same as HW-BudbreakTP2020HiCane223.Block.Report
        Report Stages
          VariableNames:
            [KiwiFruit].Phenology.MaxBBP
            [KiwiFruit].Phenology.FloweringDOY
        Plant KiwiFruit
        Fertiliser
        SurfaceOrganicMatter: InitialResidueName=wheat_stubble; InitialResidueType=wheat; InitialResidueMass=500; InitialStandingFraction=0; InitialCPR=0; InitialCNR=100
        Irrigation
        MicroClimate: a_interception=0; b_interception=1; c_interception=0; d_interception=0; SoilHeatFluxFraction=0.4; MinimumHeightDiffForNewLayer=0; NightInterceptionFraction=0.5; ReferenceHeight=2
        Manager ReportOnEvents: same as HW-BudbreakTP2020HiCane223.Block.ReportOnEvents
        Manager Reset on date: same as CropLoadSensibilityTest.CropLoadSensibility.Block.Reset on date
        Soil: same as HWBBSpray2020HiCaneDriftstop243.Block.Soil
        Manager AutomaticIrrigation: same as CropLoadSensibilityTest.CropLoadSensibility.Block.AutomaticIrrigation
        Manager FactorLabels: same as CropLoadSensibilityTest.CropLoadSensibility.Block.FactorLabels
        Manager AutomaticFertiliser: same as CropLoadSensibilityTest.CropLoadSensibility.Block.AutomaticFertiliser
        Manager WaterStatus: same as CropLoadSensibilityTest.CropLoadSensibility.Block.WaterStatus
        Manager SowDateCv
          InitialRootDepth = 5
          CropToSow = Heyward_KK
          SowingDate = 05/25/2010 00:00:00
          script: same as in HWBBSpray2020HiCaneDriftstop243.Block.SowDateCv
        Manager SetBudNumber
          BudSetDate = 01-Jul
          BudNumber = 135
          script: same as in FruitingAll.TPHW2016_2024.Block.SetBudNumber
        Manager SetPhaseCompletionDates: same as FruitingNoGirdle.TPHW2018.Block.SetPhaseCompletionDates
        AgriChemical
        Operations
        BiomassRemovalEvents OnPrune: same as HWBBSpray2020HiCaneDriftstop243.Block.OnPrune
        Girdling
      Memo
        Relationship between canopy density and fruit quality of kiwifruit

        Abstract: mean leaf area index (LAI) values ranging from 3.0 to 5.5 m2 (Hayward)
      Memo
        Relationship between canopy density and fruit quality of kiwifruit

        Abstract: mean leaf area index (LAI) values ranging from 3.0 to 5.5 m2 (Hayward)
      Memo
        Annette Richardson's thesis: Fig 3.10.A

        Carbon acquisition of single shoots on daily basis (~photosynthesis?)
      Memo
        Steve Green's report : @@ZesIR-Avg Fruit growth (2025).xlsx
      Memo
        Steve Green's report : @@ZesIR-Avg Fruit growth (2025).xlsx
      Memo
        Steve Green's report : @@ZesIR-Avg Fruit growth (2025).xlsx
      Memo
        Steve Green's report : @@ZesIR-Avg Fruit growth (2025).xlsx
    Simulation KKHW2021
      Weather: FileName=Kerikeri.met
      Clock: Start=2010-01-01; End=2022-12-30
      Summary
      SoilArbitrator Soil Arbitrator
      Zone Block: Area=1; Slope=0; AspectAngle=0; Altitude=50
        Report: same as HW-BudbreakTP2020HiCane223.Block.Report
        Report Stages
          VariableNames:
            [KiwiFruit].Phenology.MaxBBP
            [KiwiFruit].Phenology.FloweringDOY
        Plant KiwiFruit
        Fertiliser
        SurfaceOrganicMatter: InitialResidueName=wheat_stubble; InitialResidueType=wheat; InitialResidueMass=500; InitialStandingFraction=0; InitialCPR=0; InitialCNR=100
        Irrigation
        MicroClimate: a_interception=0; b_interception=1; c_interception=0; d_interception=0; SoilHeatFluxFraction=0.4; MinimumHeightDiffForNewLayer=0; NightInterceptionFraction=0.5; ReferenceHeight=2
        Manager ReportOnEvents: same as HW-BudbreakTP2020HiCane223.Block.ReportOnEvents
        Manager Reset on date: same as CropLoadSensibilityTest.CropLoadSensibility.Block.Reset on date
        Soil: same as HWBBSpray2020HiCaneDriftstop243.Block.Soil
        Manager AutomaticIrrigation: same as CropLoadSensibilityTest.CropLoadSensibility.Block.AutomaticIrrigation
        Manager FactorLabels: same as CropLoadSensibilityTest.CropLoadSensibility.Block.FactorLabels
        Manager AutomaticFertiliser: same as CropLoadSensibilityTest.CropLoadSensibility.Block.AutomaticFertiliser
        Manager WaterStatus: same as CropLoadSensibilityTest.CropLoadSensibility.Block.WaterStatus
        Manager SowDateCv: same as FruitingNoGirdle.KKHW2020.Block.SowDateCv
        Manager SetBudNumber
          BudSetDate = 01-Jul
          BudNumber = 180
          script: same as in FruitingAll.TPHW2016_2024.Block.SetBudNumber
        Manager SetPhaseCompletionDates: same as FruitingNoGirdle.TPHW2018.Block.SetPhaseCompletionDates
        AgriChemical
        Operations
        BiomassRemovalEvents OnPrune: same as HWBBSpray2020HiCaneDriftstop243.Block.OnPrune
        Girdling
      Memo
        Relationship between canopy density and fruit quality of kiwifruit

        Abstract: mean leaf area index (LAI) values ranging from 3.0 to 5.5 m2 (Hayward)
      Memo
        Relationship between canopy density and fruit quality of kiwifruit

        Abstract: mean leaf area index (LAI) values ranging from 3.0 to 5.5 m2 (Hayward)
      Memo
        Annette Richardson's thesis: Fig 3.10.A

        Carbon acquisition of single shoots on daily basis (~photosynthesis?)
      Memo
        Steve Green's report : @@ZesIR-Avg Fruit growth (2025).xlsx
      Memo
        Steve Green's report : @@ZesIR-Avg Fruit growth (2025).xlsx
      Memo
        Steve Green's report : @@ZesIR-Avg Fruit growth (2025).xlsx
      Memo
        Steve Green's report : @@ZesIR-Avg Fruit growth (2025).xlsx
    Simulation KKHW2022
      Weather: FileName=Kerikeri.met
      Clock: Start=2010-01-01; End=2023-12-30
      Summary
      SoilArbitrator Soil Arbitrator
      Zone Block: Area=1; Slope=0; AspectAngle=0; Altitude=50
        Report: same as HW-BudbreakTP2020HiCane223.Block.Report
        Report Stages
          VariableNames:
            [KiwiFruit].Phenology.MaxBBP
            [KiwiFruit].Phenology.FloweringDOY
        Plant KiwiFruit
        Fertiliser
        SurfaceOrganicMatter: InitialResidueName=wheat_stubble; InitialResidueType=wheat; InitialResidueMass=500; InitialStandingFraction=0; InitialCPR=0; InitialCNR=100
        Irrigation
        MicroClimate: a_interception=0; b_interception=1; c_interception=0; d_interception=0; SoilHeatFluxFraction=0.4; MinimumHeightDiffForNewLayer=0; NightInterceptionFraction=0.5; ReferenceHeight=2
        Manager ReportOnEvents: same as HW-BudbreakTP2020HiCane223.Block.ReportOnEvents
        Manager Reset on date: same as CropLoadSensibilityTest.CropLoadSensibility.Block.Reset on date
        Soil: same as HWBBSpray2020HiCaneDriftstop243.Block.Soil
        Manager AutomaticIrrigation: same as CropLoadSensibilityTest.CropLoadSensibility.Block.AutomaticIrrigation
        Manager FactorLabels: same as CropLoadSensibilityTest.CropLoadSensibility.Block.FactorLabels
        Manager AutomaticFertiliser: same as CropLoadSensibilityTest.CropLoadSensibility.Block.AutomaticFertiliser
        Manager WaterStatus: same as CropLoadSensibilityTest.CropLoadSensibility.Block.WaterStatus
        Manager SowDateCv: same as FruitingNoGirdle.KKHW2020.Block.SowDateCv
        Manager SetBudNumber: same as FruitingNoGirdle.Gisborne2013HC.Block.SetBudNumber
        Manager SetPhaseCompletionDates
          FruitMatureDate = 10-Apr
          script: same as in CropLoadSensibilityTest.CropLoadSensibility.Block.SetPhaseCompletionDates
        AgriChemical
        Operations
        BiomassRemovalEvents OnPrune: same as HWBBSpray2020HiCaneDriftstop243.Block.OnPrune
        Girdling
      Memo
        Relationship between canopy density and fruit quality of kiwifruit

        Abstract: mean leaf area index (LAI) values ranging from 3.0 to 5.5 m2 (Hayward)
      Memo
        Relationship between canopy density and fruit quality of kiwifruit

        Abstract: mean leaf area index (LAI) values ranging from 3.0 to 5.5 m2 (Hayward)
      Memo
        Annette Richardson's thesis: Fig 3.10.A

        Carbon acquisition of single shoots on daily basis (~photosynthesis?)
      Memo
        Steve Green's report : @@ZesIR-Avg Fruit growth (2025).xlsx
      Memo
        Steve Green's report : @@ZesIR-Avg Fruit growth (2025).xlsx
      Memo
        Steve Green's report : @@ZesIR-Avg Fruit growth (2025).xlsx
      Memo
        Steve Green's report : @@ZesIR-Avg Fruit growth (2025).xlsx
    Simulation KKHW2023 (disabled)
      Weather: FileName=Kerikeri.met
      Clock: Start=2016-01-01; End=2024-12-30
      Summary
      SoilArbitrator Soil Arbitrator
      Zone Block: Area=1; Slope=0; AspectAngle=0; Altitude=50
        Report: EventNames=[Clock].DoReport
          VariableNames:
            [KiwiFruit].Leaf.Wt
            [KiwiFruit].Leaf.Canopy.Height
            [KiwiFruit].Leaf.NodeNumber
            [Clock].Today
            [KiwiFruit].Phenology.Stage
            [KiwiFruit].Phenology.CurrentStageName
            [KiwiFruit].Phenology.ProportionBB
            [KiwiFruit].Phenology.BrokenBuds
            [KiwiFruit].Phenology.BudBurstDOY
            [KiwiFruit].Phenology.BrokenBuds.Vegetative.BrokenBuds.Max_buds
            [KiwiFruit].Phenology.EndoDormancy.ProgressThroughPhase
            [KiwiFruit].Phenology.EcoDormancy.ProgressThroughPhase
            [KiwiFruit].Phenology.ProportionCU
            [KiwiFruit].Phenology.EarlyLeaf.ProgressThroughPhase
            [KiwiFruit].Phenology.Flowering.ProgressThroughPhase
            [KiwiFruit].Phenology.FloweringDOY
            [KiwiFruit].Phenology.AccumulatedChillingPreEndo
        Report Stages
          VariableNames:
            [KiwiFruit].Phenology.MaxBBP
            [KiwiFruit].Phenology.FloweringDOY
        Plant KiwiFruit
        Fertiliser
        SurfaceOrganicMatter: InitialResidueName=wheat_stubble; InitialResidueType=wheat; InitialResidueMass=500; InitialStandingFraction=0; InitialCPR=0; InitialCNR=100
        Irrigation
        MicroClimate: a_interception=0; b_interception=1; c_interception=0; d_interception=0; SoilHeatFluxFraction=0.4; MinimumHeightDiffForNewLayer=0; NightInterceptionFraction=0.5; ReferenceHeight=2
        Manager ReportOnEvents
          script: same as in Experiment.sensibility test.Block.ReportOnEvents
        Manager Reset on date: same as Experiment.sensibility test.Block.Reset on date
        Soil: Latitude=0; Longitude=0
          LayerStructure: Thickness=[200, 200, 200, 200, 200, 200, 300, 300, 400, 800]
          Chemical: PHUnits=Water
            Thickness  PH   CEC
            100        6.6  12.44
            200        6.2  11.6525
            300        5.7  11.045
            300        5.5  10.6625
            300        5.5  9.4025
            300        5.5  9.4025
            CEC source: Calculated
          Water: Thickness=[300, 300, 300, 300, 300, 300, 1200]; InitialValues=[0.3, 0.21, 0.18, 0.17, 0.17, 0.17, 0.17]; FilledFromTop=false
          WaterBalance SoilWater: same as Experiment.sensibility test.Block.Soil.SoilWater
          Organic: same as Experiment.sensibility test.Block.Soil.Organic
          OutputLayers: Thickness=[300, 300, 300, 300, 300, 300]
          Solute NO3: same as Experiment.sensibility test.Block.Soil.NO3
          Solute NH4: same as Experiment.sensibility test.Block.Soil.NH4
          Solute Urea: same as Experiment.sensibility test.Block.Soil.Urea
          Physical: same as Experiment.sensibility test.Block.Soil.Physical
          Nutrient
          SoilTemperature Temperature
        Manager AutomaticIrrigation: same as Experiment.sensibility test.Block.AutomaticIrrigation
        Manager FactorLabels: same as Experiment.sensibility test.Block.FactorLabels
        Manager AutomaticFertiliser: same as Experiment.sensibility test.Block.AutomaticFertiliser
        Manager WaterStatus: same as Experiment.sensibility test.Block.WaterStatus
        Manager SowDateCv
          InitialRootDepth = 5
          CropToSow = Heyward_KK
          SowingDate = 05/25/2016 00:00:00
          script: same as in HWBBSpray2020HiCaneDriftstop243.Block.SowDateCv
        Manager SetBudNumber
          BudSetDate = 01-Jul
          BudNumber = 100
          script: same as in FruitingAll.TPHW2016_2024.Block.SetBudNumber
        Manager SetPhaseCompletionDates
          FruitMatureDate = 23-Apr
          script: same as in CropLoadSensibilityTest.CropLoadSensibility.Block.SetPhaseCompletionDates
        AgriChemical
        Operations
          2022-08-25  [AgriChemical].Apply()
          2021-08-25  [AgriChemical].Apply()
          2022-08-20  [AgriChemical].Apply()
        BiomassRemovalEvents OnPrune: NameOfPlantToRemoveFrom=KiwiFruit; RemovalType=3
          BiomassRemovalFractions:
            PlantName  OrganName  TypeString  LiveToRemove  DeadToRemove  LiveToResidue  DeadToResidue
            KiwiFruit  Trunk      Pruning     0             0             0              0
            KiwiFruit  Leaf       Pruning     0             0             1              1
            KiwiFruit  Stem       Pruning     0             0             1              1
            KiwiFruit  Root       Pruning     0             0             0              0
            KiwiFruit  Fruit      Pruning     0.9           0             0.1            0
        Girdling
      Memo
        Relationship between canopy density and fruit quality of kiwifruit

        Abstract: mean leaf area index (LAI) values ranging from 3.0 to 5.5 m2 (Hayward)
      Memo
        Relationship between canopy density and fruit quality of kiwifruit

        Abstract: mean leaf area index (LAI) values ranging from 3.0 to 5.5 m2 (Hayward)
      Memo
        Annette Richardson's thesis: Fig 3.10.A

        Carbon acquisition of single shoots on daily basis (~photosynthesis?)
      Memo
        Steve Green's report : @@ZesIR-Avg Fruit growth (2025).xlsx
      Memo
        Steve Green's report : @@ZesIR-Avg Fruit growth (2025).xlsx
      Memo
        Steve Green's report : @@ZesIR-Avg Fruit growth (2025).xlsx
      Memo
        Steve Green's report : @@ZesIR-Avg Fruit growth (2025).xlsx
      Memo
        Annette's Thesis:

        Figure 3.16, page 87. Total carbohydrate content of shoots and leaves (behaviour comparison)

        Figure 3.17, page 88. Total carbohydrate content of shoots and fruits (behaviour comparison)
    Simulation KKHW2024
      Weather: FileName=Kerikeri.met
      Clock: Start=2010-01-01; End=2024-12-30
      Summary
      SoilArbitrator Soil Arbitrator
      Zone Block: Area=1; Slope=0; AspectAngle=0; Altitude=50
        Report: same as HW-BudbreakTP2020HiCane223.Block.Report
        Report Stages
          VariableNames:
            [KiwiFruit].Phenology.MaxBBP
            [KiwiFruit].Phenology.FloweringDOY
        Plant KiwiFruit
        Fertiliser
        SurfaceOrganicMatter: InitialResidueName=wheat_stubble; InitialResidueType=wheat; InitialResidueMass=500; InitialStandingFraction=0; InitialCPR=0; InitialCNR=100
        Irrigation
        MicroClimate: a_interception=0; b_interception=1; c_interception=0; d_interception=0; SoilHeatFluxFraction=0.4; MinimumHeightDiffForNewLayer=0; NightInterceptionFraction=0.5; ReferenceHeight=2
        Manager ReportOnEvents: same as HW-BudbreakTP2020HiCane223.Block.ReportOnEvents
        Manager Reset on date: same as CropLoadSensibilityTest.CropLoadSensibility.Block.Reset on date
        Soil: same as HWBBSpray2020HiCaneDriftstop243.Block.Soil
        Manager AutomaticIrrigation: same as CropLoadSensibilityTest.CropLoadSensibility.Block.AutomaticIrrigation
        Manager FactorLabels: same as CropLoadSensibilityTest.CropLoadSensibility.Block.FactorLabels
        Manager AutomaticFertiliser: same as CropLoadSensibilityTest.CropLoadSensibility.Block.AutomaticFertiliser
        Manager WaterStatus: same as CropLoadSensibilityTest.CropLoadSensibility.Block.WaterStatus
        Manager SowDateCv: same as FruitingNoGirdle.KKHW2020.Block.SowDateCv
        Manager SetBudNumber: same as FruitingNoGirdle.KKHW2020.Block.SetBudNumber
        Manager SetPhaseCompletionDates
          FruitMatureDate = 15-Apr
          script: same as in CropLoadSensibilityTest.CropLoadSensibility.Block.SetPhaseCompletionDates
        AgriChemical
        Operations
          2024-09-10  [AgriChemical].Apply()
          2023-08-20  [AgriChemical].Apply()
          2022-09-10  [AgriChemical].Apply()
          2021-08-20  [AgriChemical].Apply()
          2020-08-15  [AgriChemical].Apply()
          2019-09-10  [AgriChemical].Apply()
          2018-09-10  [AgriChemical].Apply()
          2017-09-10  [AgriChemical].Apply()
          2016-09-10  [AgriChemical].Apply()
          2015-09-10  [AgriChemical].Apply()
        BiomassRemovalEvents OnPrune: same as HWBBSpray2020HiCaneDriftstop243.Block.OnPrune
        Girdling
      Memo
        Relationship between canopy density and fruit quality of kiwifruit

        Abstract: mean leaf area index (LAI) values ranging from 3.0 to 5.5 m2 (Hayward)
      Memo
        Relationship between canopy density and fruit quality of kiwifruit

        Abstract: mean leaf area index (LAI) values ranging from 3.0 to 5.5 m2 (Hayward)
      Memo
        Annette Richardson's thesis: Fig 3.10.A

        Carbon acquisition of single shoots on daily basis (~photosynthesis?)
      Memo
        Steve Green's report : @@ZesIR-Avg Fruit growth (2025).xlsx
      Memo
        Steve Green's report : @@ZesIR-Avg Fruit growth (2025).xlsx
      Memo
        Steve Green's report : @@ZesIR-Avg Fruit growth (2025).xlsx
      Memo
        Steve Green's report : @@ZesIR-Avg Fruit growth (2025).xlsx
    Simulation AKLDHW2020
      Weather: FileName=South Auckland.met
      Clock: Start=2016-01-01; End=2021-12-30
      Summary
      SoilArbitrator Soil Arbitrator
      Zone Block: Area=1; Slope=0; AspectAngle=0; Altitude=50
        Report: same as HW-BudbreakTP2020HiCane223.Block.Report
        Report Stages
          VariableNames:
            [KiwiFruit].Phenology.MaxBBP
            [KiwiFruit].Phenology.FloweringDOY
        Plant KiwiFruit
        Fertiliser
        SurfaceOrganicMatter: InitialResidueName=wheat_stubble; InitialResidueType=wheat; InitialResidueMass=500; InitialStandingFraction=0; InitialCPR=0; InitialCNR=100
        Irrigation
        MicroClimate: a_interception=0; b_interception=1; c_interception=0; d_interception=0; SoilHeatFluxFraction=0.4; MinimumHeightDiffForNewLayer=0; NightInterceptionFraction=0.5; ReferenceHeight=2
        Manager ReportOnEvents: same as HW-BudbreakTP2020HiCane223.Block.ReportOnEvents
        Manager Reset on date: same as CropLoadSensibilityTest.CropLoadSensibility.Block.Reset on date
        Soil: same as HWBBSpray2020HiCaneDriftstop243.Block.Soil
        Manager AutomaticIrrigation: same as CropLoadSensibilityTest.CropLoadSensibility.Block.AutomaticIrrigation
        Manager FactorLabels: same as CropLoadSensibilityTest.CropLoadSensibility.Block.FactorLabels
        Manager AutomaticFertiliser: same as CropLoadSensibilityTest.CropLoadSensibility.Block.AutomaticFertiliser
        Manager WaterStatus: same as CropLoadSensibilityTest.CropLoadSensibility.Block.WaterStatus
        Manager SowDateCv
          InitialRootDepth = 5
          CropToSow = Heyward_AKLD
          SowingDate = 05/25/2016 00:00:00
          script: same as in HWBBSpray2020HiCaneDriftstop243.Block.SowDateCv
        Manager SetBudNumber
          BudSetDate = 01-Jul
          BudNumber = 45
          script: same as in FruitingAll.TPHW2016_2024.Block.SetBudNumber
        Manager SetPhaseCompletionDates: same as FruitingNoGirdle.TPHW2016.Block.SetPhaseCompletionDates
        AgriChemical
        Operations
          2019-08-01  [AgriChemical].Apply()
        BiomassRemovalEvents OnPrune: same as HWBBSpray2020HiCaneDriftstop243.Block.OnPrune
        Girdling
      Memo
        Relationship between canopy density and fruit quality of kiwifruit

        Abstract: mean leaf area index (LAI) values ranging from 3.0 to 5.5 m2 (Hayward)
      Memo
        Relationship between canopy density and fruit quality of kiwifruit

        Abstract: mean leaf area index (LAI) values ranging from 3.0 to 5.5 m2 (Hayward)
      Memo
        Annette Richardson's thesis: Fig 3.10.A

        Carbon acquisition of single shoots on daily basis (~photosynthesis?)
      Memo
        Steve Green's report : @@ZesIR-Avg Fruit growth (2025).xlsx
      Memo
        Steve Green's report : @@ZesIR-Avg Fruit growth (2025).xlsx
      Memo
        Steve Green's report : @@ZesIR-Avg Fruit growth (2025).xlsx
      Memo
        Steve Green's report : @@ZesIR-Avg Fruit growth (2025).xlsx
    Simulation AKLDHW2021
      Weather: FileName=South Auckland.met
      Clock: Start=2016-01-01; End=2022-12-30
      Summary
      SoilArbitrator Soil Arbitrator
      Zone Block: Area=1; Slope=0; AspectAngle=0; Altitude=50
        Report: same as HW-BudbreakTP2020HiCane223.Block.Report
        Report Stages
          VariableNames:
            [KiwiFruit].Phenology.MaxBBP
            [KiwiFruit].Phenology.FloweringDOY
        Plant KiwiFruit
        Fertiliser
        SurfaceOrganicMatter: InitialResidueName=wheat_stubble; InitialResidueType=wheat; InitialResidueMass=500; InitialStandingFraction=0; InitialCPR=0; InitialCNR=100
        Irrigation
        MicroClimate: a_interception=0; b_interception=1; c_interception=0; d_interception=0; SoilHeatFluxFraction=0.4; MinimumHeightDiffForNewLayer=0; NightInterceptionFraction=0.5; ReferenceHeight=2
        Manager ReportOnEvents: same as HW-BudbreakTP2020HiCane223.Block.ReportOnEvents
        Manager Reset on date: same as CropLoadSensibilityTest.CropLoadSensibility.Block.Reset on date
        Soil: same as HWBBSpray2020HiCaneDriftstop243.Block.Soil
        Manager AutomaticIrrigation: same as CropLoadSensibilityTest.CropLoadSensibility.Block.AutomaticIrrigation
        Manager FactorLabels: same as CropLoadSensibilityTest.CropLoadSensibility.Block.FactorLabels
        Manager AutomaticFertiliser: same as CropLoadSensibilityTest.CropLoadSensibility.Block.AutomaticFertiliser
        Manager WaterStatus: same as CropLoadSensibilityTest.CropLoadSensibility.Block.WaterStatus
        Manager SowDateCv: same as FruitingNoGirdle.AKLDHW2020.Block.SowDateCv
        AgriChemical
        Operations
          2020-08-01  [AgriChemical].Apply()
        BiomassRemovalEvents OnPrune: same as HWBBSpray2020HiCaneDriftstop243.Block.OnPrune
        Girdling
        Manager SetBudNumber: same as FruitingNoGirdle.TPHW2023.Block.SetBudNumber
        Manager SetPhaseCompletionDates: same as FruitingNoGirdle.Katikati2013HC.Block.SetPhaseCompletionDates
      Memo
        Relationship between canopy density and fruit quality of kiwifruit

        Abstract: mean leaf area index (LAI) values ranging from 3.0 to 5.5 m2 (Hayward)
      Memo
        Relationship between canopy density and fruit quality of kiwifruit

        Abstract: mean leaf area index (LAI) values ranging from 3.0 to 5.5 m2 (Hayward)
      Memo
        Annette Richardson's thesis: Fig 3.10.A

        Carbon acquisition of single shoots on daily basis (~photosynthesis?)
      Memo
        Steve Green's report : @@ZesIR-Avg Fruit growth (2025).xlsx
      Memo
        Steve Green's report : @@ZesIR-Avg Fruit growth (2025).xlsx
      Memo
        Steve Green's report : @@ZesIR-Avg Fruit growth (2025).xlsx
      Memo
        Steve Green's report : @@ZesIR-Avg Fruit growth (2025).xlsx
    Simulation AKLDHW2022
      Weather: FileName=South Auckland.met
      Clock: Start=2016-01-01; End=2023-12-30
      Summary
      SoilArbitrator Soil Arbitrator
      Zone Block: Area=1; Slope=0; AspectAngle=0; Altitude=50
        Report: same as HW-BudbreakTP2020HiCane223.Block.Report
        Report Stages
          VariableNames:
            [KiwiFruit].Phenology.MaxBBP
            [KiwiFruit].Phenology.FloweringDOY
        Plant KiwiFruit
        Fertiliser
        SurfaceOrganicMatter: InitialResidueName=wheat_stubble; InitialResidueType=wheat; InitialResidueMass=500; InitialStandingFraction=0; InitialCPR=0; InitialCNR=100
        Irrigation
        MicroClimate: a_interception=0; b_interception=1; c_interception=0; d_interception=0; SoilHeatFluxFraction=0.4; MinimumHeightDiffForNewLayer=0; NightInterceptionFraction=0.5; ReferenceHeight=2
        Manager ReportOnEvents: same as HW-BudbreakTP2020HiCane223.Block.ReportOnEvents
        Manager Reset on date: same as CropLoadSensibilityTest.CropLoadSensibility.Block.Reset on date
        Soil: same as HWBBSpray2020HiCaneDriftstop243.Block.Soil
        Manager AutomaticIrrigation: same as CropLoadSensibilityTest.CropLoadSensibility.Block.AutomaticIrrigation
        Manager FactorLabels: same as CropLoadSensibilityTest.CropLoadSensibility.Block.FactorLabels
        Manager AutomaticFertiliser: same as CropLoadSensibilityTest.CropLoadSensibility.Block.AutomaticFertiliser
        Manager WaterStatus: same as CropLoadSensibilityTest.CropLoadSensibility.Block.WaterStatus
        Manager SowDateCv: same as FruitingNoGirdle.AKLDHW2020.Block.SowDateCv
        Manager SetBudNumber: same as FruitingNoGirdle.TPHW2018.Block.SetBudNumber
        Manager SetPhaseCompletionDates
          FruitMatureDate = 14-Apr
          script: same as in CropLoadSensibilityTest.CropLoadSensibility.Block.SetPhaseCompletionDates
        AgriChemical
        Operations
          2021-08-12  [AgriChemical].Apply()
        BiomassRemovalEvents OnPrune: same as HWBBSpray2020HiCaneDriftstop243.Block.OnPrune
        Girdling
      Memo
        Relationship between canopy density and fruit quality of kiwifruit

        Abstract: mean leaf area index (LAI) values ranging from 3.0 to 5.5 m2 (Hayward)
      Memo
        Relationship between canopy density and fruit quality of kiwifruit

        Abstract: mean leaf area index (LAI) values ranging from 3.0 to 5.5 m2 (Hayward)
      Memo
        Annette Richardson's thesis: Fig 3.10.A

        Carbon acquisition of single shoots on daily basis (~photosynthesis?)
      Memo
        Steve Green's report : @@ZesIR-Avg Fruit growth (2025).xlsx
      Memo
        Steve Green's report : @@ZesIR-Avg Fruit growth (2025).xlsx
      Memo
        Steve Green's report : @@ZesIR-Avg Fruit growth (2025).xlsx
      Memo
        Steve Green's report : @@ZesIR-Avg Fruit growth (2025).xlsx
    Simulation AKLDHW2023
      Weather: FileName=South Auckland.met
      Clock: Start=2016-01-01; End=2024-12-30
      Summary
      SoilArbitrator Soil Arbitrator
      Zone Block: Area=1; Slope=0; AspectAngle=0; Altitude=50
        Report: same as HW-BudbreakTP2020HiCane223.Block.Report
        Report Stages
          VariableNames:
            [KiwiFruit].Phenology.MaxBBP
            [KiwiFruit].Phenology.FloweringDOY
        Plant KiwiFruit
        Fertiliser
        SurfaceOrganicMatter: InitialResidueName=wheat_stubble; InitialResidueType=wheat; InitialResidueMass=500; InitialStandingFraction=0; InitialCPR=0; InitialCNR=100
        Irrigation
        MicroClimate: a_interception=0; b_interception=1; c_interception=0; d_interception=0; SoilHeatFluxFraction=0.4; MinimumHeightDiffForNewLayer=0; NightInterceptionFraction=0.5; ReferenceHeight=2
        Manager ReportOnEvents: same as HW-BudbreakTP2020HiCane223.Block.ReportOnEvents
        Manager Reset on date: same as CropLoadSensibilityTest.CropLoadSensibility.Block.Reset on date
        Soil: same as HWBBSpray2020HiCaneDriftstop243.Block.Soil
        Manager AutomaticIrrigation: same as CropLoadSensibilityTest.CropLoadSensibility.Block.AutomaticIrrigation
        Manager FactorLabels: same as CropLoadSensibilityTest.CropLoadSensibility.Block.FactorLabels
        Manager AutomaticFertiliser: same as CropLoadSensibilityTest.CropLoadSensibility.Block.AutomaticFertiliser
        Manager WaterStatus: same as CropLoadSensibilityTest.CropLoadSensibility.Block.WaterStatus
        Manager SowDateCv: same as FruitingNoGirdle.AKLDHW2020.Block.SowDateCv
        Manager SetBudNumber: same as FruitingNoGirdle.AKLDHW2020.Block.SetBudNumber
        Manager SetPhaseCompletionDates: same as FruitingNoGirdle.Katikati2013HC.Block.SetPhaseCompletionDates
        AgriChemical
        Operations
          2022-08-10  [AgriChemical].Apply()
        BiomassRemovalEvents OnPrune: same as HWBBSpray2020HiCaneDriftstop243.Block.OnPrune
        Girdling
      Memo
        Relationship between canopy density and fruit quality of kiwifruit

        Abstract: mean leaf area index (LAI) values ranging from 3.0 to 5.5 m2 (Hayward)
      Memo
        Relationship between canopy density and fruit quality of kiwifruit

        Abstract: mean leaf area index (LAI) values ranging from 3.0 to 5.5 m2 (Hayward)
      Memo
        Annette Richardson's thesis: Fig 3.10.A

        Carbon acquisition of single shoots on daily basis (~photosynthesis?)
      Memo
        Steve Green's report : @@ZesIR-Avg Fruit growth (2025).xlsx
      Memo
        Steve Green's report : @@ZesIR-Avg Fruit growth (2025).xlsx
      Memo
        Steve Green's report : @@ZesIR-Avg Fruit growth (2025).xlsx
      Memo
        Steve Green's report : @@ZesIR-Avg Fruit growth (2025).xlsx
    Simulation AKLDHW2024
      Weather: FileName=South Auckland.met
      Clock: Start=2016-01-01; End=2024-12-30
      Summary
      SoilArbitrator Soil Arbitrator
      Zone Block: Area=1; Slope=0; AspectAngle=0; Altitude=50
        Report: same as HW-BudbreakTP2020HiCane223.Block.Report
        Report Stages
          VariableNames:
            [KiwiFruit].Phenology.MaxBBP
            [KiwiFruit].Phenology.FloweringDOY
        Plant KiwiFruit
        Fertiliser
        SurfaceOrganicMatter: InitialResidueName=wheat_stubble; InitialResidueType=wheat; InitialResidueMass=500; InitialStandingFraction=0; InitialCPR=0; InitialCNR=100
        Irrigation
        MicroClimate: a_interception=0; b_interception=1; c_interception=0; d_interception=0; SoilHeatFluxFraction=0.4; MinimumHeightDiffForNewLayer=0; NightInterceptionFraction=0.5; ReferenceHeight=2
        Manager ReportOnEvents: same as HW-BudbreakTP2020HiCane223.Block.ReportOnEvents
        Manager Reset on date: same as CropLoadSensibilityTest.CropLoadSensibility.Block.Reset on date
        Soil: same as HWBBSpray2020HiCaneDriftstop243.Block.Soil
        Manager AutomaticIrrigation: same as CropLoadSensibilityTest.CropLoadSensibility.Block.AutomaticIrrigation
        Manager FactorLabels: same as CropLoadSensibilityTest.CropLoadSensibility.Block.FactorLabels
        Manager AutomaticFertiliser: same as CropLoadSensibilityTest.CropLoadSensibility.Block.AutomaticFertiliser
        Manager WaterStatus: same as CropLoadSensibilityTest.CropLoadSensibility.Block.WaterStatus
        Manager SowDateCv: same as FruitingNoGirdle.AKLDHW2020.Block.SowDateCv
        Manager SetBudNumber: same as FruitingNoGirdle.AKLDHW2020.Block.SetBudNumber
        Manager SetPhaseCompletionDates
          FruitMatureDate = 25-Apr
          script: same as in CropLoadSensibilityTest.CropLoadSensibility.Block.SetPhaseCompletionDates
        AgriChemical
        Operations
          2022-08-10  [AgriChemical].Apply()
          2023-08-10  [AgriChemical].Apply()
        BiomassRemovalEvents OnPrune: same as HWBBSpray2020HiCaneDriftstop243.Block.OnPrune
        Girdling
      Memo
        Relationship between canopy density and fruit quality of kiwifruit

        Abstract: mean leaf area index (LAI) values ranging from 3.0 to 5.5 m2 (Hayward)
      Memo
        Relationship between canopy density and fruit quality of kiwifruit

        Abstract: mean leaf area index (LAI) values ranging from 3.0 to 5.5 m2 (Hayward)
      Memo
        Annette Richardson's thesis: Fig 3.10.A

        Carbon acquisition of single shoots on daily basis (~photosynthesis?)
      Memo
        Steve Green's report : @@ZesIR-Avg Fruit growth (2025).xlsx
      Memo
        Steve Green's report : @@ZesIR-Avg Fruit growth (2025).xlsx
      Memo
        Steve Green's report : @@ZesIR-Avg Fruit growth (2025).xlsx
      Memo
        Steve Green's report : @@ZesIR-Avg Fruit growth (2025).xlsx
      Memo
        Annette's Thesis:

        Figure 3.16, page 87. Total carbohydrate content of shoots and leaves (behaviour comparison)

        Figure 3.17, page 88. Total carbohydrate content of shoots and fruits (behaviour comparison)
  Folder FruitingGirdle
    Simulation HWTP2005HighSupply
      Memo
        Cane Girdling
      Weather: FileName=TePuke(12428).met
      Clock: Start=2004-01-01; End=2006-06-30
      Summary
      SoilArbitrator Soil Arbitrator
      Zone Block: Area=1; Slope=0; AspectAngle=0; Altitude=50
        Report: same as BBControl.TPROB4BB2016control.Block.Report
        Report Stages
          VariableNames:
            [KiwiFruit].Phenology.MaxBBP
            [KiwiFruit].Phenology.FloweringDOY
        Plant KiwiFruit
        Fertiliser
        SurfaceOrganicMatter: InitialResidueName=wheat_stubble; InitialResidueType=wheat; InitialResidueMass=500; InitialStandingFraction=0; InitialCPR=0; InitialCNR=100
        Irrigation
        MicroClimate: a_interception=0; b_interception=1; c_interception=0; d_interception=0; SoilHeatFluxFraction=0.4; MinimumHeightDiffForNewLayer=0; NightInterceptionFraction=0.5; ReferenceHeight=2
        Manager ReportOnEvents: same as CropLoadSensibilityTest.CropLoadSensibility.Block.ReportOnEvents
        Manager Reset on date: same as CropLoadSensibilityTest.CropLoadSensibility.Block.Reset on date
        Soil: same as CropLoadSensibilityTest.CropLoadSensibility.Block.Soil
        Manager AutomaticIrrigation: same as CropLoadSensibilityTest.CropLoadSensibility.Block.AutomaticIrrigation
        Manager FactorLabels: same as CropLoadSensibilityTest.CropLoadSensibility.Block.FactorLabels
        Manager AutomaticFertiliser: same as CropLoadSensibilityTest.CropLoadSensibility.Block.AutomaticFertiliser
        Manager WaterStatus: same as CropLoadSensibilityTest.CropLoadSensibility.Block.WaterStatus
        Manager SowDateCv
          InitialRootDepth = 5
          CropToSow = Heyward_TP
          SowingDate = 05/25/2004 00:00:00
          script: same as in Experiment.sensibility test.Block.SowDateCv
        Manager SetPhaseCompletionDates: same as CropLoadSensibilityTest.CropLoadSensibility.Block.SetPhaseCompletionDates
        Manager SetBudNumber: same as FruitingNoGirdle.TPHW2018.Block.SetBudNumber
        AgriChemical
        Girdling
        Operations
          2006-03-01  [Girdling].Apply()
        BiomassRemovalEvents OnPrune: same as HW-BudbreakTP2020HiCane223.Block.OnPrune
      Memo
        Steve Green's report : @@ZesIR-Avg Fruit growth (2025).xlsx
      Memo
        Steve Green's report : @@ZesIR-Avg Fruit growth (2025).xlsx
      Memo
        Steve Green's report : @@ZesIR-Avg Fruit growth (2025).xlsx
    Simulation HWTP2005LowSupply
      Memo
        Cane Girdling
      Weather: FileName=TePuke(12428).met
      Clock: Start=2004-01-01; End=2006-06-30
      Summary
      SoilArbitrator Soil Arbitrator
      Zone Block: Area=1; Slope=0; AspectAngle=0; Altitude=50
        Report: same as BBControl.TPROB4BB2016control.Block.Report
        Report Stages
          VariableNames:
            [KiwiFruit].Phenology.MaxBBP
            [KiwiFruit].Phenology.FloweringDOY
        Plant KiwiFruit
        Fertiliser
        SurfaceOrganicMatter: InitialResidueName=wheat_stubble; InitialResidueType=wheat; InitialResidueMass=500; InitialStandingFraction=0; InitialCPR=0; InitialCNR=100
        Irrigation
        MicroClimate: a_interception=0; b_interception=1; c_interception=0; d_interception=0; SoilHeatFluxFraction=0.4; MinimumHeightDiffForNewLayer=0; NightInterceptionFraction=0.5; ReferenceHeight=2
        Manager ReportOnEvents: same as CropLoadSensibilityTest.CropLoadSensibility.Block.ReportOnEvents
        Manager Reset on date: same as CropLoadSensibilityTest.CropLoadSensibility.Block.Reset on date
        Soil: same as CropLoadSensibilityTest.CropLoadSensibility.Block.Soil
        Manager AutomaticIrrigation: same as CropLoadSensibilityTest.CropLoadSensibility.Block.AutomaticIrrigation
        Manager FactorLabels: same as CropLoadSensibilityTest.CropLoadSensibility.Block.FactorLabels
        Manager AutomaticFertiliser: same as CropLoadSensibilityTest.CropLoadSensibility.Block.AutomaticFertiliser
        Manager WaterStatus: same as CropLoadSensibilityTest.CropLoadSensibility.Block.WaterStatus
        Manager SowDateCv
          InitialRootDepth = 5
          CropToSow = Heyward_TP
          SowingDate = 05/25/2004 00:00:00
          BudNum = 25
          script: same as in HWTP2025HC.Block.SowDateCv
        Manager SetBudNumber
          BudSetDate = 01-Jul
          BudNumber = 28
          script: same as in FruitingAll.TPHW2016_2024.Block.SetBudNumber
        Manager SetPhaseCompletionDates: same as CropLoadSensibilityTest.CropLoadSensibility.Block.SetPhaseCompletionDates
        AgriChemical
        Girdling
        Operations
          2005-08-05  [AgriChemical].Apply()
          2006-03-01  [Girdling].Apply()
        BiomassRemovalEvents OnPrune: same as HW-BudbreakTP2020HiCane223.Block.OnPrune
      Memo
        Steve Green's report : @@ZesIR-Avg Fruit growth (2025).xlsx
      Memo
        Steve Green's report : @@ZesIR-Avg Fruit growth (2025).xlsx
      Memo
        Steve Green's report : @@ZesIR-Avg Fruit growth (2025).xlsx
      Memo
        Annette's Thesis:

        Figure 3.16, page 87. Total carbohydrate content of shoots and leaves (behaviour comparison)

        Figure 3.17, page 88. Total carbohydrate content of shoots and fruits (behaviour comparison)
  Folder Replacements
    Plant KiwiFruit: PlantType=KiwiFruit
      BiomassArbitrator Arbitrator
        Memo
          The partitioning of biomass to fodder beet organs follows a "Relative Allocation" routine (see Arbitrator module documentation) guided by coefficients derived from the October sowing date data of the test dataset
        PlantNutrientsDelta Carbon
        PlantNutrientsDelta Nitrogen
      RootUptakesArbitrator
      Phenology
        SubDailyInterpolation ThermalTime: agregationMethod=1
          XYPairs Response
            X=[-3, -2, -1, 0, 1, 3, 4, 6, 7, 9, 10, 12, 14.5, 15, 20, 25, 30, 35]
            Y=[0, 0, 0, 0, 0.26, 0.66, 0.81, 0.97, 1, 0.93, 0.84, 0.54, 0, 0, 0, 0, 0, 0]
          HourlySinPpAdjusted InterpolationMethod
        LinearInterpolationFunction HCSensitivityChill
          XYPairs
            X=[0, 100, 200, 300, 400, 500, 700, 800, 900, 1030, 1100, 1150, 1200, 1284, 1331, 1378.9, 1426, 1473, 1520, 1600, 1700, 1800, 1900]
            Y=[1, 1, 1, 1, 1, 1, 1, 1, 1, 1, 1, 0.96, 0.955, 0.957, 0.964, 0.981, 0.995, 0.999, 1, 1, 1, 1, 1]
          VariableReference XValue: VariableName=[Phenology].ChillingAtHC
        LinearInterpolationFunction HCSensitivityHeat
          XYPairs
            X=[0, 100, 200, 300, 400, 500, 600, 700, 800, 900, 1000, 1426, 1478, 1600, 1700, 1710, 1800, 2000, 3000]
            Y=[0, 0, 0, 0, 0, 0, 0, 0, 0, 0, 0, 0, 0.57, 0.6, 0.6, 0.6, 0.6, 0.6, 0.6]
          VariableReference XValue: VariableName=[Phenology].ChillingAtHC
        LinearInterpolationFunction HCSensitivityFlowering
          XYPairs
            X=[0, 100, 200, 300, 400, 500, 600, 700, 800, 900, 1000, 1426, 1478, 1600, 1700, 1790, 1800, 2000, 3000]
            Y=[0, 0, 0, 0, 0, 0, 0, 0, 0, 0, 0, 0, 0.57, 0.6, 0.6, 1, 1, 1, 1]
          VariableReference XValue: VariableName=[Phenology].ChillingAtHC
        SubDailyInterpolation ChillModelHourly: same as Replacements.KiwiFruit.Phenology.ThermalTime
        SubDailyInterpolation HeatModelHourlyBB: agregationMethod=1
          WangEngelTempFunction Response: MinTemp=3.79; OptTemp=21.8; MaxTemp=24.5; RefTemp=21.8; MaximumTemperatureWeighting=0; Units=GDH
          HourlySinPpAdjusted InterpolationMethod
        SubDailyInterpolation HourlyTempLeaves: agregationMethod=1
          XYPairs Response
            X=[-3, -2, -1, 0, 1, 3, 4, 6, 7, 9, 10, 12, 14.5, 15, 20, 25, 30, 35]
            Y=[1, 1, 1, 1, 1, 1, 1, 1, 1, 1, 1, 1, 1, 1, 1, 1, 1, 1]
          HourlySinPpAdjusted InterpolationMethod
        SubDailyInterpolation HeatModelHourlyFlwr: agregationMethod=1
          WangEngelTempFunction Response: MinTemp=8.7; OptTemp=25.68; MaxTemp=31.5; RefTemp=25.68; MaximumTemperatureWeighting=0; Units=GDH
          HourlySinPpAdjusted InterpolationMethod
        SubDailyInterpolation HeatModelHourlyFruit: agregationMethod=1
          Memo
            Temperature influences growth and maturation of fruit on hayward kiwifruit vines

            Fig3: Max growth rate is at 17C. The quadratic equation is also given
          WangEngelTempFunction Response: MinTemp=8.5; OptTemp=19; MaxTemp=33; RefTemp=19; MaximumTemperatureWeighting=0; Units=GDH
          HourlySinPpAdjusted InterpolationMethod
        PhaseLookup ProportionBB
          PhaseLookupValue StartEndoToFruitMature: Start=StartEndo; End=FruitMature
            MinimumFunction
              Constant MaxPBB: FixedValue=0.85
              LessThanFunction HCFraction
                Constant Zero: FixedValue=0
                VariableReference ChillingAtHC: VariableName=[Phenology].ChillingAtHC
                MultiplyFunction HCEffect
                  VariableReference WinterChillingEffectPBBHC: VariableName=[Phenology].WinterChillingEffectPBBHC
                  AddFunction HcEffect
                    Constant one: FixedValue=1
                    MultiplyFunction EndoDormancy
                      Constant Sensitivity: FixedValue=10
                      SubtractFunction
                        Constant one: FixedValue=1
                        VariableReference HCSensitivityChill: VariableName=[Phenology].HCSensitivityChill
                    MultiplyFunction Ecodormancy
                      LessThanFunction
                        VariableReference ChillingAtHC: VariableName=[Phenology].ChillingAtHC
                        Constant HeatSensitivityStart: FixedValue=1426
                        Constant Zero: FixedValue=0
                        Constant Sensitivity: FixedValue=0.5
                      SubtractFunction
                        Constant One: FixedValue=1
                        VariableReference HCSensitivityHeat: VariableName=[Phenology].HCSensitivityHeat
                MultiplyFunction Control
                  Constant C1: FixedValue=0.00035
                  AccumulateFunctionGeneral Sum: AccumulateToday=false; AccumulateEventName=[Clock].StartOfDay; StartDate=1-May; EndDate=1-Aug; ReduceStageName=FruitMature; FractionRemovedOnStage=1; FractionRemovedOnEvent=0; FractionRemovedOnDate=0; FractionRemovedOnCut=0; FractionRemovedOnHarvest=1; FractionRemovedOnGraze=0; FractionRemovedOnPrune=0
                    VariableReference HourlyTemp: VariableName=[Phenology].ChillModelHourly
        PhaseLookup BrokenBuds
          PhaseLookupValue Dormant: Start=StartEndo; End=EndChilling
            Constant Zero: FixedValue=0
          PhaseLookupValue Vegetative: Start=EndChilling; End=FruitMature
            MultiplyFunction
              Constant AllBuds: FixedValue=25
              SigmoidFunction
                AccumulateFunctionGeneral XValue: AccumulateToday=false; AccumulateEventName=[Clock].StartOfDay; StartStageName=EndChilling; EndStageName=EndFlowering; ReduceStageName=FruitMature; FractionRemovedOnStage=1; FractionRemovedOnEvent=0; FractionRemovedOnDate=0; FractionRemovedOnCut=0; FractionRemovedOnHarvest=1; FractionRemovedOnGraze=0; FractionRemovedOnPrune=0
                  VariableReference HourlyTemp: VariableName=[Phenology].HeatModelHourlyFlwr
                VariableReference Ymax: VariableName=[Phenology].MaxBBP
                Constant Xo: FixedValue=200
                Constant b: FixedValue=30
        PhaseLookup Flowers
          PhaseLookupValue Dormant: Start=StartEndo; End=BudBreak
            Constant Zero: FixedValue=0
          PhaseLookupValue Vegetative: Start=BudBreak; End=BareTree
            LessThanFunction FlowersPerCane
              Constant Zero: FixedValue=0
              VariableReference ChillingAtHC: VariableName=[Phenology].ChillingAtHC
              MultiplyFunction FlowersPerCaneHC
                VariableReference BrokenBuds: VariableName=[Phenology].BrokenBuds
                SigmoidFunction FlowersPerBud
                  AccumulateFunctionGeneral XValue: AccumulateToday=false; AccumulateEventName=[Clock].StartOfDay; StartStageName=BudBreak; EndDate=20-Dec; ReduceStageName=FruitMature; FractionRemovedOnStage=1; FractionRemovedOnEvent=0; FractionRemovedOnCut=0; FractionRemovedOnHarvest=1; FractionRemovedOnGraze=0; FractionRemovedOnPrune=0
                    VariableReference HourlyTemp: VariableName=[Phenology].HeatModelHourlyFlwr
                  MultiplyFunction Ymax
                    VariableReference WinterChillingEffectFlwr: VariableName=[Phenology].WinterChillingEffectFlwr
                    AddFunction HcEffect
                      Memo
                        Effects of hydrogen cyanamide on budbreak
                        and flowering in kiwifruit (Actinidia deliciosa
                        ’Hayward')

                        Fig.5.B

                        ** Instead of using the HC regression line to estimate the number of flowers/winter bud, I used the Control estimation ([Phenology].WinterChillingEffectFlwr) and incorporate the HCSensitivity during endodormancy because the estimation from paper didn't account for the timing of HC application and only considered the effect of mean winter temperature when HC was applied (no time specification)
                      Constant one: FixedValue=1
                      LinearInterpolationFunction HCSensitivityNumFlwr
                        XYPairs
                          X=[0, 100, 200, 300, 400, 500, 600, 700, 900, 1000, 1150, 1200, 1250, 1790, 1800, 2000, -, -, -]
                          Y=[0, 0, 0, 0, 0, 0, 0, 0, 0, 0.06, 0.17, 0.17, 0.17, 0.17, 0, 0, -, -, -]
                        VariableReference XValue: VariableName=[Phenology].ChillingAtHC
                    Constant MaxFlwrPerBud: FixedValue=4.6
                    Memo
                      Max number of flowers from Table 6.5 of Annette Richardson's thesis.

                      4.72 -+ 0.2
                  Constant Xo: FixedValue=400
                  Constant b: FixedValue=25
              MultiplyFunction FlowersPerCaneControl
                VariableReference BrokenBuds: VariableName=[Phenology].BrokenBuds
                SigmoidFunction FlowersPerBud
                  AccumulateFunctionGeneral XValue: same as Replacements.KiwiFruit.Phenology.Flowers.Vegetative.FlowersPerCane.FlowersPerCaneHC.FlowersPerBud.XValue
                  MultiplyFunction Ymax
                    VariableReference WinterChillingEffectFlwr: VariableName=[Phenology].WinterChillingEffectFlwr
                    Constant MaxFlwrPerBud: FixedValue=4
                  Constant Xo: FixedValue=400
                  Constant b: FixedValue=25
        GenericPhase ZeroPhase: Start=ModelInitialisation; End=StartEndo; IsEmerged=false
          Memo
            It is necessary to have a phase before Dormancy otherwise the rewind doesn't work
          VariableReference Progression: VariableName=[Phenology].ChillModelHourly
          Constant Target: FixedValue=0; Units=oCd
        GenericPhase EndoDormancy: Start=StartEndo; End=EndChilling; IsEmerged=true
          Memo
            It is necessary to have a phase before Dormancy otherwise the rewind doesn't work
          VariableReference Progression: VariableName=[Phenology].ChillModelHourly
          SubtractFunction Target
            MultiplyFunction HCEffect
              Constant FixedTarget: FixedValue=1689.3
              LessThanFunction
                Constant Zero: FixedValue=0
                VariableReference ChillingAtHC: VariableName=[Phenology].ChillingAtHC
                VariableReference HCSensitivityChill: VariableName=[Phenology].HCSensitivityChill
                Constant One: FixedValue=1
            VariableReference AccumulatedChillingPreEndo: VariableName=[Phenology].AccumulatedChillingPreEndo
        GenericPhase EcoDormancy: Start=EndChilling; End=BudBreak; IsEmerged=true
          VariableReference Progression: VariableName=[Phenology].HeatModelHourlyBB
          MultiplyFunction Target
            VariableReference WinterChillingEffectEco: VariableName=[Phenology].WinterChillingEffectEco
            Constant FixedTarget: FixedValue=101.29; Units=oC hours
            LessThanFunction HCEffect
              Constant Zero: FixedValue=0
              VariableReference ChillingAtHC: VariableName=[Phenology].ChillingAtHC
              VariableReference HCSensitivityHeat: VariableName=[Phenology].HCSensitivityHeat
              Constant One: FixedValue=1
        GenericPhase EarlyLeaf: Start=BudBreak; End=StartFlowering; IsEmerged=true
          VariableReference Progression: VariableName=[Phenology].HeatModelHourlyFlwr
          MultiplyFunction Target
            Constant FixedTarget: FixedValue=330
            LessThanFunction HCEffect
              Constant Zero: FixedValue=0
              VariableReference ChillingAtHC: VariableName=[Phenology].ChillingAtHC
              SubtractFunction
                Constant One: FixedValue=1
                LinearInterpolationFunction HCSensitivityStartFlowring
                  XYPairs
                    X=[0, 100, 200, 300, 400, 500, 600, 700, 900, 1000, 1150, 1360, 1370, 1385, 1390, 1500, 1700, 2000, -]
                    Y=[0, 0, 0, 0, 0, 0, 0, 0, 0, 0, 0, 0, 0, 0, 0, 0, 0, 0, -]
                  VariableReference XValue: VariableName=[Phenology].ChillingAtHC
              Constant one: FixedValue=1
        GenericPhase Flowering: Start=StartFlowering; End=EndFlowering; IsEmerged=true
          VariableReference Progression: VariableName=[Phenology].HeatModelHourlyFlwr
          MultiplyFunction Target
            Constant FixedTarget: FixedValue=150
            LessThanFunction: same as Replacements.KiwiFruit.Phenology.EndoDormancy.Target.HCEffect.LessThanFunction
        GenericPhase RapidBerryGrowth: Start=EndFlowering; End=StartFruitGrowth; IsEmerged=true
          VariableReference Progression: VariableName=[Phenology].HeatModelHourlyFlwr
          Constant Target: FixedValue=50; Units=GDH
        GenericPhase FruitGrowth: Start=StartFruitGrowth; End=FruitMaxSize; IsEmerged=true
          VariableReference Progression: VariableName=[Phenology].HeatModelHourlyFruit
          Constant Target: FixedValue=2000; Units=GDH
        GenericPhase FruitMaturity: Start=FruitMaxSize; End=FruitMature; IsEmerged=true
          VariableReference Progression: VariableName=[Fruit].Brix
          Constant Target: FixedValue=300
        GenericPhase NaturalLeafFall: Start=FruitMature; End=HalfLeafFall; IsEmerged=true
          VariableReference Progression: VariableName=[Phenology].ChillModelHourly
          Constant Target: FixedValue=150; Units=GDH
        GenericPhase LeafDrop: Start=HalfLeafFall; End=BareTree; IsEmerged=true
          VariableReference Progression: VariableName=[Phenology].ChillModelHourly
          Constant Target: FixedValue=400; Units=GDH
        GotoPhase: Start=BareTree; IsEmerged=false; PhaseNameToGoto=ZeroPhase; RemovalType=3
        AccumulateFunctionGeneral AccumulatedChillingPreEndo: AccumulateToday=false; AccumulateEventName=[Clock].DoReportCalculations; NameOfPlantToLink=KiwiFruit; EndStageName=StartEndo; StartDate=19-Mar; ReduceStageName=BudBreak; FractionRemovedOnStage=1; FractionRemovedOnEvent=0; FractionRemovedOnDate=0; FractionRemovedOnCut=0; FractionRemovedOnHarvest=0; FractionRemovedOnGraze=0; FractionRemovedOnPrune=0
          VariableReference HourlyChill: VariableName=[Phenology].ChillModelHourly
        AccumulateFunctionGeneral AccumulatedChilling: AccumulateToday=false; AccumulateEventName=[Clock].DoReportCalculations; NameOfPlantToLink=KiwiFruit; EndStageName=EndChilling; StartDate=19-Mar; ReduceStageName=StartFlowering; FractionRemovedOnStage=1; FractionRemovedOnEvent=0; FractionRemovedOnDate=0; FractionRemovedOnCut=0; FractionRemovedOnHarvest=0; FractionRemovedOnGraze=0; FractionRemovedOnPrune=0
          VariableReference HourlyChill: VariableName=[Phenology].ChillModelHourly
        OnEventFunctionHC ChillingAtHC: SetEvent=[AgriChemical].Sprayed; ReSetEvent=BareTree
          Constant PreEventValue: FixedValue=0
          VariableReference PostEventValue: VariableName=[Phenology].AccumulatedChilling
        OnEventFunction BudBurstDOY: SetEvent=BudBreak; ReSetEvent=EndFlowering
          Constant PreEventValue: FixedValue=0
          VariableReference PostEventValue: VariableName=[Clock].Today.DayOfYear
        OnEventFunction FloweringDOY: SetEvent=StartFlowering; ReSetEvent=EndFlowering
          Constant PreEventValue: FixedValue=0
          VariableReference PostEventValue: VariableName=[Clock].Today.DayOfYear
        OnEventFunction FullBloomDOY: SetEvent=EndFlowering; ReSetEvent=FruitMature
          Memo
            Taking the time in where the DOY value is stable.
          Constant PreEventValue: FixedValue=0
          VariableReference PostEventValue: VariableName=[Clock].Today.DayOfYear
        OnEventFunction MaxBB: SetEvent=EndFlowering; ReSetEvent=FruitMature
          Constant PreEventValue: FixedValue=0
          VariableReference PostEventValue: VariableName=[Phenology].BrokenBuds
        HoldFunction MaxBBP: WhenToHold=EndFlowering
          VariableReference PBB: VariableName=[Phenology].ProportionBB
        HoldFunction MaxFlowers: WhenToHold=EndFlowering
          VariableReference Flowers: VariableName=[Phenology].Flowers
        Age: AnniversaryOnWinterSolstice=false
        AddFunction AgeDecimal
          VariableReference AgeInt: VariableName=[Phenology].Age
          DivideFunction Decimal
            VariableReference DOY: VariableName=[Weather].DaysSinceWinterSolstice
            Constant DaysInAYear: FixedValue=365
        PhotoperiodFunction Photoperiod: Twilight=-6; DayLength=0
        PhotoperiodDeltaFunction DeltaPhotoperiod: Twilight=0
        PhaseLookupValue MeanEndoTemp: Start=StartEndo; End=FruitMature
          ProtectedDivideFunction MeanEndoTemp: NumeratorErrVal=0; DenominatorErrVal=0
            AccumulateFunctionGeneral AccEndoDailyMeanT: AccumulateToday=false; AccumulateEventName=[Clock].DoReportCalculations; NameOfPlantToLink=KiwiFruit; StartStageName=StartEndo; EndStageName=EndChilling; ReduceStageName=FruitMature; FractionRemovedOnStage=1; FractionRemovedOnEvent=0; FractionRemovedOnDate=0; FractionRemovedOnCut=0; FractionRemovedOnHarvest=0; FractionRemovedOnGraze=0; FractionRemovedOnPrune=0
              VariableReference DailyMeanT: VariableName=[IWeather].MeanT
            AccumulateFunctionGeneral EndoDays: AccumulateToday=false; AccumulateEventName=[Clock].DoReportCalculations; NameOfPlantToLink=KiwiFruit; StartStageName=StartEndo; EndStageName=EndChilling; ReduceStageName=FruitMature; FractionRemovedOnStage=1; FractionRemovedOnEvent=0; FractionRemovedOnDate=0; FractionRemovedOnCut=0; FractionRemovedOnHarvest=0; FractionRemovedOnGraze=0; FractionRemovedOnPrune=0
              Constant OneDay: FixedValue=1
        LinearInterpolationFunction WinterChillingEffectEco
          XYPairs: X=[0, 2, 5, 8, 8.5, 9, 9.5, 10, 11, 15]; Y=[0, 0, 0, 0, 0, 0.7, 0.8, 0.9, 1, 1]
          VariableReference XValue: VariableName=[Phenology].MeanEndoTemp
          Memo
            Effects of hydrogen cyanamide on budbreak
            and flowering in kiwifruit (Actinidia deliciosa
            ’Hayward')

            Fig.5.B
        LinearInterpolationFunction WinterChillingEffectPBBHC
          XYPairs: X=[0, 4, 7, 10, 11, 12, 13, 15]; Y=[0.867, 0.738, 0.642, 0.546, 0.514, 0.481, 0.449, 0.385]
          VariableReference XValue: VariableName=[Phenology].MeanEndoTemp
          Memo
            Effects of hydrogen cyanamide on budbreak
            and flowering in kiwifruit (Actinidia deliciosa
            ’Hayward')

            Fig.5.B
        LinearInterpolationFunction WinterChillingEffectFlwr
          XYPairs: X=[0, 4, 7, 10, 11, 12, 13, 14]; Y=[1, 1, 0.84, 0.51, 0.4, 0.29, 0.18, 0.07]
          VariableReference XValue: VariableName=[Phenology].MeanEndoTemp
          Memo
            Effects of hydrogen cyanamide on budbreak
            and flowering in kiwifruit (Actinidia deliciosa
            ’Hayward')

            Fig.5.B
        LinearInterpolationFunction WinterChillingEffectFlwrHC (disabled)
          XYPairs: X=[0, 4, 7, 10, 11, 12, 13, 14]; Y=[1, 0.76, 0.58, 0.41, 0.35, 0.29, 0.23, 0.17]
          VariableReference XValue: VariableName=[Phenology].MeanEndoTemp
          Memo
            Effects of hydrogen cyanamide on budbreak
            and flowering in kiwifruit (Actinidia deliciosa
            ’Hayward')

            Fig.5.B
        LinearInterpolationFunction FloweringDevelopmentRate
          XYPairs: X=[0, 5, 10, 15, 20, 30, 35, -]; Y=[0, 0, 0.006, 0.019, 0.032, 0.059, 0.059, -]
          VariableReference XValue: VariableName=[IWeather].MeanT
      Organ Leaf: Cconc=0.4; IsAboveGround=true
        Constant InitialWt: FixedValue=0; Units=g/m2
        Respiration
          Constant MaintenanceRespirationFunction: FixedValue=0.5; Units=0-1
          NutrientFunctions AssimilationCostFunctions
            Constant C: FixedValue=0; Units=0-1
            Constant N: FixedValue=0; Units=0-1
            Constant P: FixedValue=0; Units=0-1
            Constant K: FixedValue=0; Units=0-1
          NutrientFunctions MobilisationCostFunctions: same as Replacements.KiwiFruit.Leaf.Respiration.AssimilationCostFunctions
        Constant DetachmentRate: FixedValue=0; Units=/d
        OrganNutrientDelta Carbon: MaxCDelta=0
          OrganNutrientSupplies Supplies: Fixation=0; Uptake=0
            NutrientPoolsState ReAllocation
            NutrientPoolsState ReTranslocation
          NutrientDemandFunctions DemandFunctions
            VariableReference Structural: VariableName=[Leaf].TotalCarbonDemand
            DeficitDemandFunction Metabolic
            DeficitDemandFunction Storage
            Constant QStructuralPriority: FixedValue=2
            Constant QMetabolicPriority: FixedValue=1
            Constant QStoragePriority: FixedValue=0
          NutrientSupplyFunctions SupplyFunctions
            MultiplyFunction Fixation
              VariableReference Fixation: VariableName=[Leaf].Photosynthesis
              VariableReference Cconc: VariableName=[Leaf].Cconc
            Constant Uptake: FixedValue=0
            NutrientPoolFunctions ReAllocation
              Constant Structural: FixedValue=0
              MobilisationSupplyFunction Metabolic
                Constant Multiplier: FixedValue=0
              MobilisationSupplyFunction Storage
                Constant Multiplier: FixedValue=0
            NutrientPoolFunctions ReTranslocation: same as Replacements.KiwiFruit.Leaf.Carbon.SupplyFunctions.ReAllocation
          NutrientProportionFunctions PoolFractions
            Constant Structural: FixedValue=0.6
            Constant Metabolic: FixedValue=0.4
            Constant Storage: FixedValue=0
        OrganNutrientDelta Nitrogen: MaxCDelta=0
          OrganNutrientSupplies Supplies: Fixation=0; Uptake=0
            NutrientPoolsState ReAllocation
            NutrientPoolsState ReTranslocation
          NutrientDemandFunctions DemandFunctions
            DeficitDemandFunction Structural
            DeficitDemandFunction Metabolic
            DeficitDemandFunction Storage
            Constant QStructuralPriority: FixedValue=56.642
            Constant QMetabolicPriority: FixedValue=56.642
            Constant QStoragePriority: FixedValue=20.4379
          NutrientSupplyFunctions SupplyFunctions
            Constant Fixation: FixedValue=1
            Constant Uptake: FixedValue=0
            NutrientPoolFunctions ReAllocation
              Constant Structural: FixedValue=0
              MobilisationSupplyFunction Metabolic
                Constant Multiplier: FixedValue=1
              MobilisationSupplyFunction Storage
                Constant Multiplier: FixedValue=1
            NutrientPoolFunctions ReTranslocation
              Constant Structural: FixedValue=0
              MobilisationSupplyFunction Metabolic
                Constant Multiplier: FixedValue=0
              MobilisationSupplyFunction Storage
                Constant Multiplier: FixedValue=0.5
          NutrientConcentrationFunctions ConcFunctions
            LinearInterpolationFunction Maximum
              XYPairs: X=[0, 10, 40, 60]; Y=[0.045, 0.045, 0.035, 0.035]
              VariableReference XValue: VariableName=[Leaf].LeafNumber
              Memo
                These values have been fitted to the available data. The fitted values are within the observed maximum and minimum values obtained in the FACTS soybean experiments ([ARCHONTOULIS2020721]).
            MinimumFunction Critical
              Constant MaxNConc: FixedValue=0.035
              MultiplyFunction CritNConc
                VariableReference MinNConc: VariableName=[Leaf].Nitrogen.ConcFunctions.Minimum
                Constant CritNFactor: FixedValue=1.57072
            Constant Minimum: FixedValue=0.0135454
        EnergyBalance Canopy: Albedo=0.2; Gsmax350=0.00403149; R50=59.6895; KDead=0; LAIDead=0
          MinimumFunction FRGRer
            VariableReference RUE_FT: VariableName=[Leaf].Photosynthesis.FT
            MinimumFunction Others
              VariableReference RUE_FN: VariableName=[Leaf].Photosynthesis.FN
              VariableReference RUE_FVPD: VariableName=[Leaf].Photosynthesis.FVPD
          StomatalConductanceCO2Modifier
            VariableReference PhotosynthesisCO2Modifier: VariableName=[Leaf].Photosynthesis.FCO2
          LinearInterpolationFunction Tallness
            XYPairs: X=[0, 24]; Y=[20, 500]
            Memo
              The maximum height of 500 mm was estimated from the 2014 sowing date trial ([Khaembah_etal_2017]).
            VariableReference XValue: VariableName=[Leaf].LeafNumber
          VariableReference Deepness: VariableName=[Leaf].Canopy.Height
          MultiplyFunction DeadAreaIndex
            VariableReference SLA: VariableName=[Leaf].SpecificArea
            VariableReference LeafDeadWt: VariableName=[Leaf].Dead.Wt
          MultiplyFunction GreenAreaIndex
            VariableReference SLA: VariableName=[Leaf].SpecificArea
            VariableReference LeafLiveStructuralWt: VariableName=[Leaf].Live.Wt
          MultiplyFunction GreenExtinctionCoefficient
            Constant PotentialExtinctionCoeff: FixedValue=0.833
              Memo
                Hayward’s larger, flatter leaves mean it intercepts more light per unit LAI, so its extinction coefficient is higher.

                k = 0.833 : Values of LAI and transmitted light(T) from Fig.5.5 (The architecture & radiation regime in kiwifruit stand, by E. Morgan)

                k = - ln(T)/LAI
            LinearInterpolationFunction WaterStress
              XYPairs: X=[0, 0.641792, 1]; Y=[1, 1, 1]
              VariableReference XValue: VariableName=[KiwiFruit].Leaf.Canopy.Fw
          Constant Wideness: FixedValue=0
          Constant DeadExtinctionCoefficient: FixedValue=0.3
        RUEModel Photosynthesis
          VariableReference RadnInt: VariableName=[Leaf].Canopy.RadiationIntercepted
          RUECO2Function FCO2: PhotosyntheticPathway=C3
          Constant RUE: FixedValue=1.1; Units=g(DM)/MJ
          WeightedTemperatureFunction FT: MaximumTemperatureWeighting=0.75
            XYPairs: X=[0, 8, 15, 30, 45]; Y=[1, 1, 1, 1, 0]
              Memo
                different from the thermal time. The effect of temperature on photosynthesis in leaves and all the micro-mechanisms.
          LinearInterpolationFunction FW
            XYPairs: X=[0, 0.5, 0.8, 1]; Y=[0, 0.7, 1, 1]
            VariableReference XValue: VariableName=[Leaf].Canopy.Fw
          LinearInterpolationFunction FN
            XYPairs: X=[0, 1, 1.5]; Y=[1, 1, 1]
            VariableReference XValue: VariableName=[Leaf].FNmetabolic
          Constant FVPD: FixedValue=1
        DivideFunction TotalDMDemand
          VariableReference DeltaLAI: VariableName=[Leaf].DeltaLAI
          VariableReference SLA: VariableName=[Leaf].SpecificArea
          Memo
            Growth in leaf area is used to calculate the leaf dry matter demand. The same was assumed in the original crop models in APSIM. Further model development can be taken once new experimental data for metabolic, structural and storage forms are provided.
          Memo Memo1
            DeltaLAI describes the LAI variation over the cycle and is calculated using the Area of Largest Leaf, relative leaf area, plant number, branch number and leaf appearance rate (thermal time/phyllochron).
        MultiplyFunction ThawInverse
          LinearInterpolationFunction ThawInverse
            XYPairs: X=[0, 4, 10, 13, 20, 28, 35]; Y=[0, 0, 0.09, 0.13, 0.33, 0.33, 0]
            VariableReference XValue: VariableName=[Phenology].HourlyTempLeaves
            Memo
              Modelling Effect of Temperature on Area Expansion at the Leaf, the Shoot and the Whole Plant Level

              Fig.2.a

              &

              A functional–structural kiwifruit vine model integrating architecture, carbon dynamics and effects of the environment

              Fig.5
          Constant a: FixedValue=1
        LinearInterpolationFunction B
          XYPairs
            X=[0, 9, 10, 12, 15, 16, 17, 18, 19, 20, 21, 35, 80]
            Y=[-0.0006, -0.0038, -0.0027, -0.002, -0.0013, -0.001, -0.0006, -0.0004, -0.0003, -0.0001, 0, 0, 0]
          VariableReference XValue: VariableName=[Leaf].LeafNumber
          Memo
            A functional–structural kiwifruit vine model integrating architecture, carbon dynamics and effects of the environment

            Fig.7
        PhaseLookup DeltaLAI
          Memo
            DeltaLAI describes the LAI variation over the cycle and is calculated using the Area of Largest Leaf, relative leaf area, number of shoots, and leaf appearance rate (thermal time/phyllochron).
          PhaseLookupValue Vegetative: Start=BudBreak; End=BareTree
            MultiplyFunction Delta
              MultiplyFunction VineShoots
                VariableReference CaneNum: VariableName=[Leaf].CaneNum
                VariableReference ShootNumber: VariableName=[Phenology].BrokenBuds
              LinearInterpolationFunction RelativeArea
                XYPairs: X=[0, 5, 10, 15, 20, 35, 50]; Y=[0, 0.4, 0.9, 1, 0.9, 0, 0]
                VariableReference XValue: VariableName=[Leaf].LeafNumber
                Memo
                  Modelling Effect of Temperature on Area Expansion at the Leaf, the Shoot and the Whole Plant Level

                  Fig.5.a, solid triangles
              AddFunction SigmoidalGrowth
                MultiplyFunction
                  SubtractFunction A_B
                    VariableReference AreaLargestLeaf: VariableName=[Leaf].AreaLargestLeaf
                    VariableReference B: VariableName=[Leaf].B
                  ExpressionFunction SigmoidFunc
                    Expression=exp(([Leaf].LeafNumber - [KiwiFruit].Leaf.LeafAppearanceRate)*[Leaf].ThawInverse)/(1+exp(([Leaf].LeafNumber - [KiwiFruit].Leaf.LeafAppearanceRate)*[Leaf].ThawInverse))
                    Memo
                      Modelling Effect of Temperature on Area Expansion at the Leaf, the Shoot and the Whole Plant Level

                      Eq.1
                VariableReference B: VariableName=[Leaf].B
              VariableReference ContinuousSummerPruning: VariableName=[Leaf].ContinuousSummerPruning
        MultiplyFunction LeafAppearanceRate
          LinearInterpolationFunction LeafAppearanceRate
            XYPairs
              X=[0, 7, 12, 17, 20, 24, 26, 28, 29, 30, 31, 34, 40]
              Y=[0, 0, 0.13, 0.25, 0.35, 0.45, 0.5, 0.5, 0.45, 0.4, 0, 0, 0]
            VariableReference XValue: VariableName=[Phenology].HourlyTempLeaves
            Memo
              A functional–structural kiwifruit vine model integrating architecture, carbon dynamics and effects of the environment

              Fig.5 (solid line)
          Constant a: FixedValue=0.005
          Memo Memo_a
            The "a" multiplier fixes the rate of leaf appearance on a "shoot" basis. Eventually each shoot will have ~15 leaves.

            #leaves/shoot = 15

            #shoots = 12

            #canes = 24

            VineArea = 24 m2

            leaves/m2 = (24 * 12 * 15)/24 = 180

            180 leaves/m2 is within an acceptable range based on the following reference:

            E f f e c t s of Partial D e f o l i a t i o n at Various S t a g e s of
            the G r o w i n g S e a s o n on Fruit Yields, Root G r o w t h
            and R e t u r n B l o o m of K i w i f r u i t V i n e s (1990), Buwalda & Smith, Fig.2(a) ==> (FZ + RCZ to account for both the "Fruit Zone" and "Replaced Cane Zone")
        AccumulateFunction LeafNumber: StartStageName=BudBreak; EndStageName=FruitMaxSize; ResetStageName=BareTree; FractionRemovedOnCut=0; FractionRemovedOnHarvest=0; FractionRemovedOnGraze=0; FractionRemovedOnPrune=1
          VariableReference LeafAppearanceRate: VariableName=[Leaf].LeafAppearanceRate
          Memo
            This calculates the leaf number without the ongoing summer pruning
        MultiplyFunction SpecificArea
          Constant SLA: FixedValue=0.0065; Units=m2/g
            Memo
              Monitoring water and nutrient balance

              Fig.120
            Memo Memo1
              Accumulation and partitioning of dry matter and mineral nutrients in developing kiwifruit vines

              p. 299: 6.4 (m2 kg-1)  ==> 0.0064 (m2 g-1)
          LinearInterpolationFunction StressFactor
            XYPairs: X=[0, 0.5, 1]; Y=[1, 1, 1]
            VariableReference XValue: VariableName=[Leaf].AccumulatedWaterStressEffect
        Constant AreaLargestLeaf: FixedValue=0.0175; Units=m2
          Memo
            Annette's PhD: p.65
        Constant CaneNum: FixedValue=24
        BiomassRemoval BiomassRemovalDefaults: HarvestFractionLiveToRemove=0; HarvestFractionDeadToRemove=0; HarvestFractionLiveToResidue=0; HarvestFractionDeadToResidue=0
        MovingAverageFunction AccumulatedWaterStressEffect: NumberOfDays=30; StageToStartMovingAverage=Emergence
          VariableReference FW: VariableName=[Leaf].Canopy.Fw
        MultiplyFunction TotalCarbonDemand
          VariableReference TotalDMDemand: VariableName=[Leaf].TotalDMDemand
          VariableReference Cconc: VariableName=[Leaf].Cconc
        PhaseLookup SenescenceRate
          PhaseLookupValue Vegetative: Start=BudBreak; End=FruitMature
            AddFunction Total
              MultiplyFunction CoverEffect
                LinearInterpolationFunction RelativeRate
                  XYPairs: X=[0, 0.25, 0.5, 0.9, 1, 2, -]; Y=[0, 0, 0, 0, 1, 1, -]
                  Memo
                    The maximum height of 500 mm was estimated from the 2014 sowing date trial ([Khaembah_etal_2017]).
                  VariableReference XValue: VariableName=[Leaf].Canopy.CoverTotal
                Constant MaxRate: FixedValue=0.01; Units=/d
              MultiplyFunction AgeEffect
                LinearInterpolationFunction RelativeRate
                  XYPairs: X=[0, 15, 25, 40, 45]; Y=[0, 0, 0, 1, 1]
                  Memo
                    The maximum height of 500 mm was estimated from the 2014 sowing date trial ([Khaembah_etal_2017]).
                  VariableReference XValue: VariableName=[Leaf].LeafNumber
                Constant MaxRate: FixedValue=0.015; Units=/d
          PhaseLookupValue SenescenceLeafFall: Start=FruitMature; End=HalfLeafFall
            Constant: FixedValue=0.03
        ExpressionFunction Transmitted_light
          Expression=exp(- [Leaf].Canopy.GreenExtinctionCoefficient.PotentialExtinctionCoeff  * [Leaf].Canopy.LAI)
        ProtectedDivideFunction TranspirationPerLeafArea: NumeratorErrVal=0; DenominatorErrVal=0
          VariableReference Transpiration: VariableName=[RootUptakesArbitrator].WaterUptake.amount
          VariableReference LAI: VariableName=[Leaf].Canopy.LAI
        PhaseLookupValue ContinuousSummerPruning: Start=BudBreak; End=FruitMaxSize
          LinearInterpolationFunction ContinuousSummerPruning
            XYPairs: X=[0, 1, 1.5, 3, 3.9, 4.25, 4.5, 5, 6]; Y=[1, 1, 1, 1, 0, 0, 0, 0, 0]
            VariableReference XValue: VariableName=[Leaf].Canopy.LAI
      Organ Stem: Cconc=0.4; IsAboveGround=true
        Constant InitialWt: FixedValue=1; Units=g/m2
        Respiration
          Constant MaintenanceRespirationFunction: FixedValue=0; Units=0-1
          NutrientFunctions AssimilationCostFunctions: same as Replacements.KiwiFruit.Leaf.Respiration.AssimilationCostFunctions
          NutrientFunctions MobilisationCostFunctions: same as Replacements.KiwiFruit.Leaf.Respiration.AssimilationCostFunctions
        VariableReference SenescenceRate: VariableName=[Leaf].SenescenceRate
        Constant DetachmentRate: FixedValue=0; Units=/d
        OrganNutrientDelta Carbon: MaxCDelta=0
          OrganNutrientSupplies Supplies: Fixation=0; Uptake=0
            NutrientPoolsState ReAllocation
            NutrientPoolsState ReTranslocation
          NutrientDemandFunctions DemandFunctions
            VariableReference Structural: VariableName=[Stem].TotalCarbonDemand
            Constant Storage: FixedValue=0; Units=g/day
            Constant Metabolic: FixedValue=0
            Constant QStructuralPriority: FixedValue=2
            Constant QStoragePriority: FixedValue=0
            Constant QMetabolicPriority: FixedValue=0
          NutrientProportionFunctions PoolFractions
            Constant Structural: FixedValue=0
            Constant Metabolic: FixedValue=0
            Constant Storage: FixedValue=1
          NutrientSupplyFunctions SupplyFunctions
            Constant Fixation: FixedValue=0
            Constant Uptake: FixedValue=0
            NutrientPoolFunctions ReAllocation
              Constant Structural: FixedValue=0
              Constant Metabolic: FixedValue=0
              Constant Storage: FixedValue=0
            NutrientPoolFunctions ReTranslocation: same as Replacements.KiwiFruit.Stem.Carbon.SupplyFunctions.ReAllocation
        OrganNutrientDelta Nitrogen: MaxCDelta=0
          OrganNutrientSupplies Supplies: Fixation=0; Uptake=0
            NutrientPoolsState ReAllocation
            NutrientPoolsState ReTranslocation
          NutrientDemandFunctions DemandFunctions
            DeficitDemandFunction Structural
            DeficitDemandFunction Metabolic
            DeficitDemandFunction Storage
            Constant QStructuralPriority: FixedValue=0
            Constant QMetabolicPriority: FixedValue=0
            Constant QStoragePriority: FixedValue=100
          NutrientSupplyFunctions SupplyFunctions
            Constant Fixation: FixedValue=0
            Constant Uptake: FixedValue=0
            NutrientPoolFunctions ReAllocation: same as Replacements.KiwiFruit.Leaf.Nitrogen.SupplyFunctions.ReAllocation
            NutrientPoolFunctions ReTranslocation: same as Replacements.KiwiFruit.Leaf.Nitrogen.SupplyFunctions.ReTranslocation
          NutrientConcentrationFunctions ConcFunctions
            LinearInterpolationFunction Maximum
              XYPairs: X=[-, 0, 40, 60]; Y=[-, 0.03, 0.02, 0.02]
              VariableReference XValue: VariableName=[Leaf].LeafNumber
              Memo
                These values have been fitted to the available data. The fitted values are within the observed maximum and minimum values obtained in the FACTS soybean experiments ([ARCHONTOULIS2020721]).
            MinimumFunction Critical
              Constant MaxNConc: FixedValue=0.02
              MultiplyFunction CritNConc
                VariableReference MinNConc: VariableName=[Stem].Nitrogen.ConcFunctions.Minimum
                Constant CritNFactor: FixedValue=1.5
            Constant Minimum: FixedValue=0.01
        AllometricDemandFunction TotalDMDemand: Const=0.17; Power=1.1
          VariableReference XValue: VariableName=[Leaf].Live.Wt
          VariableReference YValue: VariableName=[Stem].Live.Wt
        BiomassRemoval BiomassRemovalDefaults: HarvestFractionLiveToRemove=0; HarvestFractionDeadToRemove=0; HarvestFractionLiveToResidue=1; HarvestFractionDeadToResidue=1
        MultiplyFunction TotalCarbonDemand
          VariableReference TotalDMDemand: VariableName=[Stem].TotalDMDemand
          VariableReference Cconc: VariableName=[Stem].Cconc
      Organ Trunk: Cconc=0.4; IsAboveGround=true
        ProtectedDivideFunction InitialWt: NumeratorErrVal=0; DenominatorErrVal=0
          Constant Wt: FixedValue=5000; Units=g/tree
          VariableReference PlantArea: VariableName=[Fruit].FruitNumberPerM2.FruitingPhase.PerM2.Area
        ProtectedDivideFunction MatureWt: NumeratorErrVal=0; DenominatorErrVal=0
          Constant Wt: FixedValue=12000; Units=g/tree
          VariableReference PlantArea: VariableName=[Fruit].FruitNumberPerM2.FruitingPhase.PerM2.Area
        Respiration: same as Replacements.KiwiFruit.Stem.Respiration
        Constant SenescenceRate: FixedValue=0; Units=/d
        Constant DetachmentRate: FixedValue=0; Units=/d
        OrganNutrientDelta Carbon: MaxCDelta=0
          OrganNutrientSupplies Supplies: Fixation=0; Uptake=0
            NutrientPoolsState ReAllocation
            NutrientPoolsState ReTranslocation
          NutrientDemandFunctions DemandFunctions
            VariableReference Structural: VariableName=[Trunk].TotalCarbonDemand
            MultiplyFunction Storage
              VariableReference Structural: VariableName=[Trunk].TotalCarbonDemand
              Constant Coeff: FixedValue=0.1
            Constant Metabolic: FixedValue=0; Units=g/day
            Constant QStructuralPriority: FixedValue=20
            Constant QMetabolicPriority: FixedValue=1
            Constant QStoragePriority: FixedValue=5
          NutrientProportionFunctions PoolFractions
            CalculateCarbonFractionFromNConc Structural
            CalculateCarbonFractionFromNConc Metabolic
            CalculateCarbonFractionFromNConc Storage
          NutrientSupplyFunctions SupplyFunctions
            Constant Fixation: FixedValue=0
            Constant Uptake: FixedValue=0
            NutrientPoolFunctions ReAllocation: same as Replacements.KiwiFruit.Leaf.Nitrogen.SupplyFunctions.ReAllocation
            NutrientPoolFunctions ReTranslocation
              Constant Structural: FixedValue=0
              MobilisationSupplyFunction Metabolic
                Constant Multiplier: FixedValue=0
              MobilisationSupplyFunction Storage
                Constant Multiplier: FixedValue=0.001
        OrganNutrientDelta Nitrogen: MaxCDelta=0
          OrganNutrientSupplies Supplies: Fixation=0; Uptake=0
            NutrientPoolsState ReAllocation
            NutrientPoolsState ReTranslocation
          NutrientDemandFunctions DemandFunctions
            DeficitDemandFunction Structural
            DeficitDemandFunction Metabolic
            DeficitDemandFunction Storage
            Constant QStructuralPriority: FixedValue=100
            Constant QMetabolicPriority: FixedValue=100
            Constant QStoragePriority: FixedValue=100
          NutrientSupplyFunctions SupplyFunctions
            Constant Fixation: FixedValue=0
            Constant Uptake: FixedValue=0
            NutrientPoolFunctions ReAllocation: same as Replacements.KiwiFruit.Leaf.Nitrogen.SupplyFunctions.ReAllocation
            NutrientPoolFunctions ReTranslocation: same as Replacements.KiwiFruit.Leaf.Carbon.SupplyFunctions.ReAllocation
          NutrientConcentrationFunctions ConcFunctions
            LinearInterpolationFunction Maximum
              XYPairs: X=[0, 10, 40, 60]; Y=[0.02, 0.02, 0.01, 0.01]
              VariableReference XValue: VariableName=[Leaf].LeafNumber
              Memo
                These values have been fitted to the available data. The fitted values are within the observed maximum and minimum values obtained in the FACTS soybean experiments ([ARCHONTOULIS2020721]).
            MinimumFunction Critical
              Constant MaxNConc: FixedValue=0.01
              MultiplyFunction CritNConc
                VariableReference MinNConc: VariableName=[Trunk].Nitrogen.ConcFunctions.Minimum
                Constant CritNFactor: FixedValue=1.5
            Constant Minimum: FixedValue=0.004
        BiomassRemoval BiomassRemovalDefaults: HarvestFractionLiveToRemove=0.95; HarvestFractionDeadToRemove=0; HarvestFractionLiveToResidue=0.05; HarvestFractionDeadToResidue=1
        AccumulateFunctionGeneral GirdleHeal: AccumulateToday=false; AccumulateEventName=[Clock].DoReportCalculations; NameOfPlantToLink=KiwiFruit; EndStageName=BareTree; StartEventName=[Girdling].Girdled; ReduceStageName=BareTree; FractionRemovedOnStage=1; FractionRemovedOnEvent=0; FractionRemovedOnDate=0; FractionRemovedOnCut=0; FractionRemovedOnHarvest=0; FractionRemovedOnGraze=0; FractionRemovedOnPrune=0
          VariableReference HourlyFruit: VariableName=[Phenology].HeatModelHourlyFruit
        MultiplyFunction TotalCarbonDemand
          MaximumFunction TotalDMDemand
            MinimumFunction MinDemand
              MultiplyFunction Available
                VariableReference PotentialPhotosynthesis: VariableName=[Leaf].Photosynthesis
                Constant PartitionFraction: FixedValue=1
              MultiplyFunction SizeDemand
                Constant Rate: FixedValue=0.002
                SubtractFunction TotalDemand
                  MultiplyFunction TargetWt
                    VariableReference AgePattern: VariableName=[KiwiFruit].RelativeAnnualDimension
                    VariableReference MatureWt: VariableName=[Trunk].MatureWt
                  VariableReference CurrentWt: VariableName=[Trunk].Wt
            Constant Zero: FixedValue=0
          OnEventFunctionGirdle GirdlingPartitioningResponse: SetEvent=[Girdling].Girdled; ReSetEvent=BareTree
            Constant PreEventValue: FixedValue=1
            LessThanFunction PostEventValue
              VariableReference GirdleHeal: VariableName=[Trunk].GirdleHeal
              Constant GirdleHealTarget: FixedValue=1000
              Constant Zero: FixedValue=0
              Constant One: FixedValue=1
          VariableReference Cconc: VariableName=[Trunk].Cconc
      Organ StorageRoot: Cconc=0.4; IsAboveGround=false
        Memo
          Read:

          Accumulation and partitioning of dry matter and mineral nutrients in developing kiwifruit vines - p.298

          With an allometric function of Y = aW^b, we might be able to to find the root weight change by its growing size.
        Constant InitialWt: FixedValue=500; Units=g/m2
        Respiration
          ExponentialFunction MaintenanceRespirationFunction: A=0; B=1.8; C=0.1
            SubtractFunction TempDiff
              VariableReference DailyMeanT: VariableName=[IWeather].MeanT
              Constant RefTemp: FixedValue=17
            Memo
              unit: g/m^2
          NutrientFunctions AssimilationCostFunctions: same as Replacements.KiwiFruit.Leaf.Respiration.AssimilationCostFunctions
          NutrientFunctions MobilisationCostFunctions: same as Replacements.KiwiFruit.Leaf.Respiration.AssimilationCostFunctions
        Constant SenescenceRate: FixedValue=0; Units=/d
        Constant DetachmentRate: FixedValue=0; Units=/d
        OrganNutrientDelta Carbon: MaxCDelta=0
          OrganNutrientSupplies Supplies: Fixation=0; Uptake=0
            NutrientPoolsState ReAllocation
            NutrientPoolsState ReTranslocation
          NutrientDemandFunctions DemandFunctions
            MultiplyFunction Structural
              SubtractFunction GapToMaxStructural
                MaximumFunction MaximumStorageRootStructuralDM
                  VariableReference ActualStructuralDM: VariableName=[StorageRoot].Live.Weight.Structural
                  MinimumFunction
                    Constant MaxStrStorageRootPerM2: FixedValue=1000; Units=g structural DM/m2
                    MultiplyFunction MinStrStorageRootPerM2ByPlant
                      Constant MaxStrStorageRootPerPlant: FixedValue=10; Units=minimum g structural storage root DM / plant
                      VariableReference Population: VariableName=[KiwiFruit].Population
                VariableReference StorageRootStructuralDM: VariableName=[StorageRoot].Live.Weight.Structural
              Constant DailyStrucDemandRate: FixedValue=0.025; Units=fraction of biomass gap per day as demand
              Memo
                • Assume a mimimum amount of structural biomass

                • Create demand to reach this target if current amount is less than that

                • Assumes that 1% of potential difference is "demanded" by day

                • Assumes a maximum 2.5 t/ha of taproot
            Constant Metabolic: FixedValue=0; Units=g/day
            PhaseLookup Storage
              PhaseLookupValue NoLeaf: Start=StartEndo; End=StartFruitGrowth
                Constant Zero: FixedValue=0
              PhaseLookupValue Fruiting: Start=StartFruitGrowth; End=BareTree
                MultiplyFunction Storage
                  SubtractFunction StorageGap
                    ProtectedDivideFunction PotentialStorage: NumeratorErrVal=0; DenominatorErrVal=0
                      VariableReference CurrentStructural: VariableName=[StorageRoot].Live.Weight.Structural
                      Constant StructuralFraction: FixedValue=0.35; Units=minimum share of structural in storage root
                    VariableReference ActualStorage: VariableName=[StorageRoot].Live.Weight.Storage
                  MultiplyFunction
                    LessThanFunction AnnualEffect
                      VariableReference DeltaPhotoperiod: VariableName=[Phenology].DeltaPhotoperiod
                      Constant Ref: FixedValue=-0.02
                      Constant DecreasingPhotoperiod: FixedValue=1; Units=100% storage demand at decreasing Photoperiod
                      LinearInterpolationFunction IncreasingPhotoperiod
                        XYPairs: X=[10, 16.8]; Y=[0, 1]
                        VariableReference XValue: VariableName=[Phenology].Photoperiod
                    LinearInterpolationFunction RegrowthEffect
                      XYPairs: X=[0, 200, 400, 600, 800]; Y=[0, 1, 2, 3, 4]
                      VariableReference XValue: VariableName=[Phenology].HeatModelHourlyFruit
                    Constant DailyStorageDemandRate: FixedValue=0.05
                  Memo
                    • Assumes a mimimum of 20% StructuralFraction biomass in storage root - so a PotentialStorage of 80% DM

                    • Compares current Storage with PotentialStorage (StorageGap)

                    • Allows a MaxDailyStorageRate as a fraction of the StorageGap (g DM/m2 per day)

                    • MaxDailyDemand is a first try to ensure we do not have exess demands per day - needs check FIXME
            Constant QStructuralPriority: FixedValue=5
            Constant QMetabolicPriority: FixedValue=0
            Constant QStoragePriority: FixedValue=5
          NutrientSupplyFunctions SupplyFunctions
            Constant Fixation: FixedValue=0
            Constant Uptake: FixedValue=0
            NutrientPoolFunctions ReAllocation
              Constant Structural: FixedValue=0
              MobilisationSupplyFunction Metabolic
                Constant Multiplier: FixedValue=0
              MobilisationSupplyFunction Storage
                Constant Multiplier: FixedValue=10
            NutrientPoolFunctions ReTranslocation
              Constant Structural: FixedValue=0
              MobilisationSupplyFunction Metabolic
                Constant Multiplier: FixedValue=0
              MobilisationSupplyFunction Storage
                Constant Multiplier: FixedValue=0.01; Units=0.01
          NutrientProportionFunctions PoolFractions: same as Replacements.KiwiFruit.Trunk.Carbon.PoolFractions
        OrganNutrientDelta Nitrogen: MaxCDelta=0
          OrganNutrientSupplies Supplies: Fixation=0; Uptake=0
            NutrientPoolsState ReAllocation
            NutrientPoolsState ReTranslocation
          NutrientDemandFunctions DemandFunctions
            DeficitDemandFunction Structural
            DeficitDemandFunction Storage
            DeficitDemandFunction Metabolic
            Constant QStructuralPriority: FixedValue=1
            Constant QMetabolicPriority: FixedValue=1
            Constant QStoragePriority: FixedValue=0
          NutrientSupplyFunctions SupplyFunctions: same as Replacements.KiwiFruit.Trunk.Nitrogen.SupplyFunctions
          NutrientConcentrationFunctions ConcFunctions
            Constant Maximum: FixedValue=0.01
            Constant Critical: FixedValue=0.009
            Constant Minimum: FixedValue=0.0045
        AddFunction TotalDMDemand
          VariableReference Structural: VariableName=[StorageRoot].Carbon.DemandFunctions.Structural
          VariableReference Metabolic: VariableName=[StorageRoot].Carbon.DemandFunctions.Metabolic
          VariableReference Storage: VariableName=[StorageRoot].Carbon.DemandFunctions.Storage
        BiomassRemoval BiomassRemovalDefaults: HarvestFractionLiveToRemove=0; HarvestFractionDeadToRemove=0; HarvestFractionLiveToResidue=1; HarvestFractionDeadToResidue=1
        MultiplyFunction TotalCarbonDemand
          VariableReference TotalDMDemand: VariableName=[StorageRoot].TotalDMDemand
          VariableReference GirdlingPartitioningResponse
            VariableName=[KiwiFruit].Trunk.TotalCarbonDemand.GirdlingPartitioningResponse
          VariableReference Cconc: VariableName=[StorageRoot].Cconc
      Organ FineRoot: Cconc=0.4; IsAboveGround=false
        Memo
          Read:

          Accumulation and partitioning of dry matter and mineral nutrients in developing kiwifruit vines - p.298

          With an allometric function of Y = aW^b, we might be able to to find the root weight change by its growing size.
        Constant InitialWt: FixedValue=100; Units=g/m2
        Respiration: same as Replacements.KiwiFruit.Stem.Respiration
        Constant DetachmentRate: FixedValue=1; Units=/d
        OrganNutrientDelta Carbon: MaxCDelta=0
          OrganNutrientSupplies Supplies: Fixation=0; Uptake=0
            NutrientPoolsState ReAllocation
            NutrientPoolsState ReTranslocation
          NutrientDemandFunctions DemandFunctions
            VariableReference Structural: VariableName=[FineRoot].TotalCarbonDemand
            Constant Metabolic: FixedValue=0
            Constant Storage: FixedValue=0
            Constant QStructuralPriority: FixedValue=4
            Constant QMetabolicPriority: FixedValue=0
            Constant QStoragePriority: FixedValue=0
          NutrientSupplyFunctions SupplyFunctions: same as Replacements.KiwiFruit.Stem.Carbon.SupplyFunctions
          NutrientProportionFunctions PoolFractions
            Constant Structural: FixedValue=1
            Constant Metabolic: FixedValue=0
            Constant Storage: FixedValue=0
        OrganNutrientDelta Nitrogen: MaxCDelta=0
          OrganNutrientSupplies Supplies: Fixation=0; Uptake=0
            NutrientPoolsState ReAllocation
            NutrientPoolsState ReTranslocation
          NutrientDemandFunctions DemandFunctions
            DeficitDemandFunction Structural
            DeficitDemandFunction Storage
            DeficitDemandFunction Metabolic
            Constant QStructuralPriority: FixedValue=1
            Constant QMetabolicPriority: FixedValue=0
            Constant QStoragePriority: FixedValue=0
          NutrientSupplyFunctions SupplyFunctions: same as Replacements.KiwiFruit.Trunk.Nitrogen.SupplyFunctions
          NutrientConcentrationFunctions ConcFunctions
            Constant Maximum: FixedValue=0
            Constant Critical: FixedValue=0
            Constant Minimum: FixedValue=0
        RootNetwork Network
          RootShapeCylinder RootShape
          LinearInterpolationFunction KLModifier
            XYPairs: X=[0, 1]; Y=[1, 1]
            VariableReference XValue: VariableName=[FineRoot].Network.LengthDensity
          Constant SoilWaterEffect: FixedValue=1
          Constant MaximumRootDepth: FixedValue=3000; Units=mm
          PhaseLookup RootFrontVelocity
            PhaseLookupValue Vegetative: Start=BudBreak; End=BareTree
              MultiplyFunction Velocity
                Constant RFVmax: FixedValue=10; Units=mm/d
                VariableReference RUEstress: VariableName=[Leaf].Photosynthesis.FT
          Constant KNO3: FixedValue=0.02; Units=g/plant
          Constant KNH4: FixedValue=0.01; Units=g/plant
          LinearInterpolationFunction NUptakeSWFactor
            XYPairs: X=[0, 0.5, 1]; Y=[0, 0.2758, 1]
            VariableReference XValue: VariableName=[FineRoot].Network.RWC
          Constant SpecificRootLength: FixedValue=40; Units=m/g
          LinearInterpolationFunction MaxDailyNUptake
            XYPairs: X=[0, 1000]; Y=[0, 100]
            Memo
              Early growth N uptake is assumed to be 0.1 kg N/ha/day, and this increases with root growth reaching a maximumof 5.8 kg N/ha/day. The maximum N uptake per day is assumed from sugar beet data (Armstrong et al., 1986).
            VariableReference XValue: VariableName=[FineRoot].Wt
          Constant RootDepthStressFactor: FixedValue=1
        AllometricDemandFunction TotalDMDemandAllometric: Const=1; Power=1.2
          Memo
            Check:

            Accumulation and partitioning of dry matter and mineral
            nutrients in developing kiwifruit vines

            page. 299: the ratioof leaf area to root length => 0.76 m2/Km for five-year-old vines
          VariableReference XValue: VariableName=[Leaf].Photosynthesis
          VariableReference YValue: VariableName=[FineRoot].Live.Wt
        BiomassRemoval BiomassRemovalDefaults: HarvestFractionLiveToRemove=0; HarvestFractionDeadToRemove=0; HarvestFractionLiveToResidue=0; HarvestFractionDeadToResidue=0
        MultiplyFunction SenescenceRate
          ExponentialFunction SenescenceRate: A=0; B=1; C=1
            ProtectedDivideFunction: NumeratorErrVal=0; DenominatorErrVal=0
              SubtractFunction SoilTempDiv
                SoilTemperatureDepthFunction: Depth=100
                Constant RefTemp: FixedValue=20
              Constant C: FixedValue=10
          Constant B: FixedValue=0.01
        MultiplyFunction TotalDMDemand
          VariableReference Photosynthesis: VariableName=[Leaf].Photosynthesis
          Constant PartitionFraction: FixedValue=0.2
        MultiplyFunction TotalCarbonDemand
          VariableReference TotalDMDemand: VariableName=[FineRoot].TotalDMDemand
          VariableReference Cconc: VariableName=[FineRoot].Cconc
      Organ Fruit: Cconc=0.4; IsAboveGround=true
        Memo
          Check for biomass balance between organs

          Kiwifruit reserves: balancing vine growth and fruit productivity
        Constant InitialWt: FixedValue=0
        Respiration: same as Replacements.KiwiFruit.Stem.Respiration
        Constant SenescenceRate: FixedValue=0
        Constant DetachmentRate: FixedValue=0
        OrganNutrientDelta Carbon: MaxCDelta=0
          OrganNutrientSupplies Supplies: Fixation=0; Uptake=0
            NutrientPoolsState ReAllocation
            NutrientPoolsState ReTranslocation
          NutrientDemandFunctions DemandFunctions
            VariableReference Structural: VariableName=[Fruit].TCD
            Constant Storage: FixedValue=0; Units=g/day
            Constant Metabolic: FixedValue=0
            Constant QStructuralPriority: FixedValue=140
            Constant QStoragePriority: FixedValue=0
            Constant QMetabolicPriority: FixedValue=0
          NutrientProportionFunctions PoolFractions: same as Replacements.KiwiFruit.FineRoot.Carbon.PoolFractions
          NutrientSupplyFunctions SupplyFunctions: same as Replacements.KiwiFruit.Stem.Carbon.SupplyFunctions
        OrganNutrientDelta Nitrogen: MaxCDelta=0
          OrganNutrientSupplies Supplies: Fixation=0; Uptake=0
            NutrientPoolsState ReAllocation
            NutrientPoolsState ReTranslocation
          NutrientDemandFunctions DemandFunctions
            DeficitDemandFunction Structural
            Constant Storage: FixedValue=0; Units=g/day
            Constant Metabolic: FixedValue=0
            Constant QStructuralPriority: FixedValue=100
            Constant QMetabolicPriority: FixedValue=100
            Constant QStoragePriority: FixedValue=100
          NutrientSupplyFunctions SupplyFunctions: same as Replacements.KiwiFruit.Stem.Carbon.SupplyFunctions
          NutrientConcentrationFunctions ConcFunctions: same as Replacements.KiwiFruit.Trunk.Nitrogen.ConcFunctions
        BiomassRemoval BiomassRemovalDefaults: HarvestFractionLiveToRemove=0.95; HarvestFractionDeadToRemove=0; HarvestFractionLiveToResidue=0.05; HarvestFractionDeadToResidue=1
        VariableReference TotalCarbonDemand: VariableName=[Fruit].TCD
        MaximumFunction TCD
          DeltaFunction: StartStageName=EndFlowering
            MultiplyFunction Integral
              VariableReference Number: VariableName=[Fruit].FruitNumberPerM2
              VariableReference PotentialSingleBerryDW: VariableName=[Fruit].PotentialSingleBerryDW
              VariableReference CarbonConc: VariableName=[Fruit].Cconc
              LinearInterpolationFunction AfterMaxSize
                XYPairs: X=[0, 1, 5.99, 6, 7, 8.5, 9, 10, 11]; Y=[0, 0, 0, 1, 1, 0.9, 0.85, 0.85, 0.85]
                VariableReference XValue: VariableName=[KiwiFruit].Phenology.Stage
          Constant Zero: FixedValue=0
        PhaseLookup PotentialSingleBerryDW
          PhaseLookupValue NoFruit: Start=StartEndo; End=EndFlowering
            Constant Zero: FixedValue=0
          PhaseLookupValue FruitingPhase: Start=EndFlowering; End=HalfLeafFall
            AddFunction
              Constant InitialBerryWt: FixedValue=0.5
                Memo
                  A biophysical model of kiwifruit (Actinidia deliciosa) berry development

                  Appendix: Table (b) => initial berry weight
              MultiplyFunction Expolinear
                Memo
                  Modelling Fruit Development in ‘Hayward’ Kiwifruit

                  Abstract: Dry weight accumulation of kiwifruit during the growing season approximates a simple expolinear curve
                ExpressionFunction BetaGrowthFunction
                  Expression=[Fruit].PotentialSingleBerryDWParams.Ymax* (1 + ([Fruit].PotentialSingleBerryDWParams.te - [Fruit].FruitingPhaseAccTT) / ([Fruit].PotentialSingleBerryDWParams.te - [Fruit].PotentialSingleBerryDWParams.tm)) * ([Fruit].FruitingPhaseAccTT / [Fruit].PotentialSingleBerryDWParams.te) ^ ([Fruit].PotentialSingleBerryDWParams.te / ([Fruit].PotentialSingleBerryDWParams.te - [Fruit].PotentialSingleBerryDWParams.tm))
                LinearInterpolationFunction Decline
                  XYPairs: X=[0, 1000, 2000, 3000, 4000, 6000, 7000]; Y=[1, 1, 1, 1, 0.7, 0, 0]
                  VariableReference XValue: VariableName=[Fruit].FruitingPhaseAccTT
        Folder PotentialSingleBerryDWParams
          MultiplyFunction Ymax
            Constant Ymax: FixedValue=31
            OnEventFunctionGirdle GirdlingPartitioningResponse: SetEvent=[Girdling].Girdled; ReSetEvent=BareTree
              Constant PreEventValue: FixedValue=1
              LessThanFunction PostEventValue
                Constant Zero: FixedValue=0
                VariableReference GirdleHeal: VariableName=[Trunk].GirdleHeal
                Constant GirdleCoefficient: FixedValue=3
                Constant One: FixedValue=1
          Constant te: FixedValue=4450
            Memo
              te, the time at which Ymax is obtained
          Constant tm: FixedValue=2500
            Memo
              tm, the time at which the maximum growth RATE is obtained
        PhaseLookup SingleBerryDW
          PhaseLookupValue NoFruit: Start=StartEndo; End=EndFlowering
            Constant Zero: FixedValue=0
          PhaseLookupValue FruitingPhase: Start=EndFlowering; End=HalfLeafFall
            ProtectedDivideFunction: NumeratorErrVal=0; DenominatorErrVal=0
              VariableReference FruitWtPerM2: VariableName=[Fruit].Wt
              VariableReference FruitNumberPerM2: VariableName=[Fruit].FruitNumberPerM2
        PhaseLookup SingleBerryDM
          PhaseLookupValue NoFruit: Start=StartEndo; End=EndFlowering
            Constant Zero: FixedValue=0
          PhaseLookupValue FruitingPhase: Start=EndFlowering; End=HalfLeafFall
            AddFunction
              Constant DMStart: FixedValue=0.06
              ProtectedDivideFunction: NumeratorErrVal=0; DenominatorErrVal=0
                Constant Coef: FixedValue=0.13
                ExponentialFunction: A=1; B=1; C=-0.0018
                  SubtractFunction
                    VariableReference FruitingPhaseAccTT: VariableName=[Fruit].FruitingPhaseAccTT
                    Constant TT50: FixedValue=2000
        MultiplyFunction SingleBerryDMC
          VariableReference SingleBerryDM: VariableName=[Fruit].SingleBerryDM
          Constant Hundred: FixedValue=100
        PhaseLookup SingleBerryFWOld
          PhaseLookupValue NoFruit: Start=StartEndo; End=EndFlowering
            Constant Zero: FixedValue=0
          PhaseLookupValue FruitingPhase: Start=EndFlowering; End=HalfLeafFall
            MinimumFunction FreshWt
              Constant MaxFreshWt: FixedValue=200; Units=g
              ProtectedDivideFunction FW: NumeratorErrVal=0; DenominatorErrVal=0
                Constant Ymax: FixedValue=13780; Units=g/m2
                AddFunction
                  VariableReference N: VariableName=[Fruit].FruitNumberPerM2
                  Constant K: FixedValue=95.25; Units=fruit/m2
        PhaseLookup FruitNumberPerM2
          PhaseLookupValue NoFruit: Start=StartEndo; End=EndFlowering
            Constant Zero: FixedValue=0
          PhaseLookupValue FruitingPhase: Start=EndFlowering; End=HalfLeafFall
            ProtectedDivideFunction PerM2: NumeratorErrVal=0; DenominatorErrVal=0
              MultiplyFunction FruitsPerVine
                VariableReference CaneNum: VariableName=[Leaf].CaneNum
                VariableReference FlowersPerCane: VariableName=[Phenology].MaxFlowers
                Constant FruitSet: FixedValue=1
                Memo
                  Annette Richardson's Thesis.

                  page 206: 6.3.3 Fruit set, seed number and seed weight:

                  assuming that all the vines were exposed: Fruit set & fruit retention = 92%
                Constant RetainedAfterThinning: FixedValue=1
              MultiplyFunction Area
                Constant RowWidth: FixedValue=4; Units=M
                Constant RowLength: FixedValue=6; Units=M
        OnEventFunction MaxSingleBerryDMC: SetEvent=FruitMature; ReSetEvent=HalfLeafFall
          Constant PreEventValue: FixedValue=0
          VariableReference PostEventValue: VariableName=[Fruit].SingleBerryDMC
        HoldFunction MaxSingleBerryDW: WhenToHold=FruitMature
          VariableReference SingleBerryDW: VariableName=[Fruit].SingleBerryDW
        HoldFunction MaxSingleBerryFW: WhenToHold=FruitMature
          VariableReference SingleBerryFW: VariableName=[Fruit].SingleBerryFW
        MultiplyFunction YieldToPerHa
          VariableReference SingleBerryFW: VariableName=[Fruit].SingleBerryFW
          VariableReference FruitNumberPerM2: VariableName=[Fruit].FruitNumberPerM2
          Constant UnitConvert: FixedValue=0.01; Units=t/ha
        Constant ControlFruitSizeSTD: FixedValue=20
          Memo
            Kiwifruit fruit size distributions (Table.1 & Fig.1)
        MultiplyFunction Y
          Memo
            I n f l u e n c e of Fruit N u m b e r on Fruit Weight and Yield of K i w i f r u i t: Eq. 1

            Y (yield) before unit conversion: Kg/m2

            Y (yield) after unit conversion: t/ha
          Constant Ymax: FixedValue=13.48; Units=kg/m2
          Constant UnitConvert: FixedValue=10; Units=t/ha
          ProtectedDivideFunction: NumeratorErrVal=0; DenominatorErrVal=0
            VariableReference N: VariableName=[Fruit].FruitNumberPerM2
            AddFunction
              VariableReference N: VariableName=[Fruit].FruitNumberPerM2
              Constant K: FixedValue=95.25; Units=fruit/m2
        ProtectedDivideFunction SingleBerryFWEstimate: NumeratorErrVal=0; DenominatorErrVal=0
          MultiplyFunction
            VariableReference Y: VariableName=[Fruit].Y
            Constant UnitConvert: FixedValue=100
          VariableReference N: VariableName=[Fruit].FruitNumberPerM2
        LinearInterpolationFunction SpringWeights
          XYPairs: X=[0, 268, 296, 331, 360, 366]; Y=[0, 0, 1, 1, 0, 0]
          VariableReference XValue: VariableName=[KiwiFruit].Phenology.Stage
        LinearInterpolationFunction SummerWeights
          XYPairs: X=[0, 7, 8, 59, 60, 366]; Y=[0, 0, 1, 1, 0, 0]
          VariableReference XValue: VariableName=[KiwiFruit].Phenology.Stage
        LinearInterpolationFunction AutumnWeights
          XYPairs: X=[0, 50, 90, 137, 138, 366]; Y=[0, 0, 1, 1, 0, 0]
          VariableReference XValue: VariableName=[KiwiFruit].Phenology.Stage
        PhaseLookupValue MeanGrowthTemp: Start=StartFruitGrowth; End=HalfLeafFall
          ProtectedDivideFunction MeanGrowthPhaseTemp: NumeratorErrVal=0; DenominatorErrVal=0
            AccumulateFunctionGeneral AccGrowthDailyMeanT: AccumulateToday=false; AccumulateEventName=[Clock].DoReportCalculations; NameOfPlantToLink=KiwiFruit; StartStageName=StartFruitGrowth; EndStageName=FruitMaxSize; ReduceStageName=BareTree; FractionRemovedOnStage=1; FractionRemovedOnEvent=0; FractionRemovedOnDate=0; FractionRemovedOnCut=0; FractionRemovedOnHarvest=0; FractionRemovedOnGraze=0; FractionRemovedOnPrune=0
              VariableReference DailyMeanT: VariableName=[IWeather].MeanT
            AccumulateFunctionGeneral GrowthDays: AccumulateToday=false; AccumulateEventName=[Clock].DoReportCalculations; NameOfPlantToLink=KiwiFruit; StartStageName=StartFruitGrowth; EndStageName=FruitMaxSize; ReduceStageName=BareTree; FractionRemovedOnStage=1; FractionRemovedOnEvent=0; FractionRemovedOnDate=0; FractionRemovedOnCut=0; FractionRemovedOnHarvest=0; FractionRemovedOnGraze=0; FractionRemovedOnPrune=0
              Constant OneDay: FixedValue=1
        PhaseLookup SingleBerryFW
          PhaseLookupValue NoFruit: Start=StartEndo; End=EndFlowering
            Constant Zero: FixedValue=0
          PhaseLookupValue FruitingPhase: Start=EndFlowering; End=HalfLeafFall
            MinimumFunction FreshWt
              Constant MaxFreshWt: FixedValue=200; Units=g
              ProtectedDivideFunction PotentialFW: NumeratorErrVal=0; DenominatorErrVal=0
                VariableReference DW: VariableName=[Fruit].SingleBerryDW
                VariableReference DM: VariableName=[Fruit].SingleBerryDM
        PhaseLookup PotentialSingleBerryDWOld
          PhaseLookupValue NoFruit: Start=StartEndo; End=EndFlowering
            Constant Zero: FixedValue=0
          PhaseLookupValue FruitingPhase: Start=EndFlowering; End=HalfLeafFall
            AddFunction
              Constant InitialBerryWt: FixedValue=0.5
                Memo
                  A biophysical model of kiwifruit (Actinidia deliciosa) berry development

                  Appendix: Table (b) => initial berry weight
              BetaGrowthFunction: tm=1800; te=3200
                VariableReference XValue: VariableName=[Fruit].FruitingPhaseAccTT
                ProtectedDivideFunction Ymax: NumeratorErrVal=0; DenominatorErrVal=0
                  MultiplyFunction
                    Constant MaxDWPerM2: FixedValue=2800
                  AddFunction
                    VariableReference FruitsPerM2: VariableName=[Fruit].FruitNumberPerM2
                    Constant FruitNumTurningPoint: FixedValue=35
        AccumulateFunction FruitingPhaseAccTT: StartStageName=EndFlowering; EndStageName=FruitMature; ResetStageName=HalfLeafFall; FractionRemovedOnCut=0; FractionRemovedOnHarvest=1; FractionRemovedOnGraze=0; FractionRemovedOnPrune=0
          VariableReference HeatModelHourlyFruit: VariableName=[Phenology].HeatModelHourlyFruit
        SigmoidFunction (disabled)
          Memo
            Ymax: maximum dry matter content is set to 25%

            Ref: Kiwifruit, botany, production and uses/ section 16.2.2 composition/ page 24
          Constant Ymax: FixedValue=0.25
          AccumulateFunctionGeneral XValue: AccumulateToday=false; AccumulateEventName=[Clock].DoReportCalculations; NameOfPlantToLink=KiwiFruit; StartStageName=EndFlowering; EndStageName=FruitMature; ReduceStageName=BareTree; FractionRemovedOnStage=1; FractionRemovedOnEvent=0; FractionRemovedOnCut=0; FractionRemovedOnHarvest=1; FractionRemovedOnGraze=0; FractionRemovedOnPrune=0
            MultiplyFunction DMProgression
              VariableReference HeatModelHourlyFruit: VariableName=[Phenology].HeatModelHourlyFruit
              AddFunction
                Constant One: FixedValue=1
                MultiplyFunction PTQEffect
                  ProtectedDivideFunction PTQ: NumeratorErrVal=0; DenominatorErrVal=0
                    VariableReference DailyMeanRdn: VariableName=[IWeather].Radn
                    VariableReference HeatModelHourlyFruit: VariableName=[Phenology].HeatModelHourlyFruit
                  Constant: FixedValue=0
                MultiplyFunction MidGrowthEffect
                  VariableReference: VariableName=[Fruit].MeanGrowthTemp
                  Constant: FixedValue=0
          SubtractFunction Xo
            Constant DefaultXo: FixedValue=1200
            MultiplyFunction MidGrowthEffect
              VariableReference MeanGrowthTemp: VariableName=[Fruit].MeanGrowthTemp
              Constant: FixedValue=0
          SubtractFunction b
            Constant Defaultb: FixedValue=1550
            MultiplyFunction MidGrowthEffect
              VariableReference MeanGrowthTemp: VariableName=[Fruit].MeanGrowthTemp
              Constant: FixedValue=0
        ExpressionFunction (disabled)
          Expression=[Fruit].C1 * (1 - exp(-  [Fruit].C2  *  [Fruit].FruitingPhaseAccTT )) +  [Fruit].C3  * [Fruit].FruitingPhaseAccTT
        PhaseLookup Brix
          PhaseLookupValue Flowering: Start=StartFlowering; End=StartFruitGrowth
            Constant: FixedValue=0
          PhaseLookupValue Fruiting: Start=StartFruitGrowth; End=FruitMature
            DivideFunction
              MaximumFunction
                SubtractFunction
                  Constant: FixedValue=1.02
                  VariableReference WaterContent: VariableName=[Fruit].WaterContent
                Constant zero: FixedValue=0
              Constant: FixedValue=0.033
        SubtractFunction WaterContent
          Constant: FixedValue=1
          PhaseLookupValue AfterFlowering: Start=StartFruitGrowth; End=FruitMature
            VariableReference SingleBerryDM: VariableName=[Fruit].SingleBerryDM
      CompositeStates AboveGround
        Propertys=[[Leaf].Live, [Leaf].Dead, [Trunk].Live, [Trunk].Dead, [Stem].Live, [Stem].Dead, [Fruit].Live, [Fruit].Dead]
      CompositeStates AboveGroundDead: Propertys=[[Leaf].Dead, [Trunk].Dead, [Stem].Dead, [Fruit].Dead]
      CompositeStates BelowGround
        Propertys=[[FineRoot].Live, [FineRoot].Dead, [StorageRoot].Live, [StorageRoot].Dead]
      CompositeStates Total
        Propertys=[[Leaf].Live, [Leaf].Dead, [Trunk].Live, [Trunk].Dead, [Stem].Live, [Stem].Dead, [FineRoot].Live, [FineRoot].Dead, [StorageRoot].Live, [StorageRoot].Dead, [Fruit].Live, [Fruit].Dead]
      CompositeStates TotalLive
        Propertys=[[Leaf].Live, [Stem].Live, [Trunk].Live, [FineRoot].Live, [StorageRoot].Live, [Fruit].Live]
      CompositeStates TotalDead
        Propertys=[[Leaf].Dead, [Stem].Dead, [Trunk].Dead, [FineRoot].Dead, [StorageRoot].Dead, [Fruit].Dead]
      Folder Cultivars
        Cultivar Heyward_TP
        Cultivar Heyward_KK
        Cultivar Heyward_AKLD
        Cultivar Heyward
        Cultivar Gold
          Command:
            // Largest leaf area: 175 cm2 (Vigor-controlling rootstocks affect early shoot growth and leaf area development of kiwifruit: Fig 6)
            [Leaf].AreaLargestLeaf.FixedValue = 0.0175
            // Monitoring water and nutrient balance: Fig.120
            [Leaf].SpecificArea.SLA.FixedValue = 0.00785
            // The extinction coefficient value of 0.73 (Steve Green - Water and soil management of kiwifruit: Fig.31) was used
            [Leaf].Canopy.GreenExtinctionCoefficient.PotentialExtinctionCoeff.FixedValue = 0.73
            [Phenology].EndoDormancy.Target.HCEffect.FixedTarget.FixedValue = 1500
      Constant seedMortalityRate: FixedValue=0
      MultiplyFunction TranspirationPerTree
        VariableReference Transpiration_mm: VariableName=[Leaf].Canopy.Transpiration
        VariableReference RowWidth: VariableName=[KiwiFruit].RowWidth
        VariableReference InterRowSpacing: VariableName=[KiwiFruit].InterRowSpacing
      LinearInterpolationFunction MortalityRate
        XYPairs: X=[0.98, 1]; Y=[0, 0]
        VariableReference XValue: VariableName=[Leaf].Canopy.CoverGreen
      LinearInterpolationFunction RelativeAnnualDimension
        XYPairs: X=[0, 1, 6, 15, 20, 25, 30, -, -]; Y=[0.6, 0.6, 0.6, 1, 1, 1, 1, -, -]
        VariableReference XValue: VariableName=[Phenology].Age.Years
    Report: EventNames=[Clock].DoReport
      VariableNames:
        [KiwiFruit].Leaf.TotalCarbonDemand
        [KiwiFruit].Stem.TotalCarbonDemand
        [KiwiFruit].Trunk.TotalCarbonDemand
        [KiwiFruit].Fruit.TotalCarbonDemand
        [KiwiFruit].Fruit.TCD
        [KiwiFruit].StorageRoot.TotalCarbonDemand
        [KiwiFruit].FineRoot.TotalCarbonDemand
        [KiwiFruit].Leaf.Photosynthesis*0.4
        Sum([Soil].SoilWater.SWmm)
        [KiwiFruit].FineRoot.Network.Depth
        [KiwiFruit].StorageRoot.Respiration.MaintenanceRespirationFunction
        [KiwiFruit].Fruit.Brix
        [KiwiFruit].Trunk.TotalCarbonDemand.GirdlingPartitioningResponse
        [KiwiFruit].Trunk.GirdleHeal
        [KiwiFruit].StorageRoot.Live.Carbon.Storage
        [KiwiFruit].Trunk.Live.Carbon.Storage
        [KiwiFruit].StorageRoot.Live.Carbon
        [KiwiFruit].StorageRoot.Live.Wt
        [KiwiFruit].StorageRoot.Live
        [KiwiFruit].FineRoot.SenescenceRate.SenescenceRate.ProtectedDivideFunction.SoilTempDiv
        [KiwiFruit].FineRoot.SenescenceRate
        [KiwiFruit].FineRoot.Live.Wt
        [KiwiFruit].FineRoot.Dead.Wt
        [KiwiFruit].Leaf.LeafNumber
        [Clock].Today
        [Clock].Today.DayOfYear
        [IWeather].MeanT
        [IWeather].Radn
        [KiwiFruit].Phenology.HCSensitivityChill
        [KiwiFruit].Phenology.HCSensitivityHeat
        [KiwiFruit].Phenology.EndoDormancy.Target.HCEffect
        [KiwiFruit].Phenology.EcoDormancy.Target.HCEffect
        [KiwiFruit].Phenology.MeanEndoTemp
        [KiwiFruit].Phenology.Stage
        [KiwiFruit].Phenology.CurrentStageName
        [KiwiFruit].Phenology.BrokenBuds
        [KiwiFruit].Phenology.BudBurstDOY
        [KiwiFruit].Phenology.EndoDormancy.ProgressThroughPhase
        [KiwiFruit].Phenology.EcoDormancy.ProgressThroughPhase
        [KiwiFruit].Phenology.EarlyLeaf.ProgressThroughPhase
        [KiwiFruit].Phenology.Flowering.ProgressThroughPhase
        [KiwiFruit].Phenology.FloweringDOY
        [KiwiFruit].Phenology.AccumulatedChillingPreEndo
        [KiwiFruit].Phenology.AccumulatedChilling
        [KiwiFruit].Phenology.EndoDormancy.Target
        [KiwiFruit].Phenology.EcoDormancy.Target
        [KiwiFruit].Phenology.MaxBBP
        [Clock].Today.Year
        [KiwiFruit].Leaf.DeltaLAI
        [KiwiFruit].Leaf.Canopy.LAI
        [KiwiFruit].Leaf.Wt
        [KiwiFruit].Leaf.Live.Wt
        [KiwiFruit].Stem.Live.Wt
        [KiwiFruit].Phenology.ChillingAtHC
        [KiwiFruit].SowingData.Population
        [KiwiFruit].Phenology.ProportionBB
        [KiwiFruit].Phenology.MaxBBP
        [KiwiFruit].Phenology.MaxBB
        [KiwiFruit].Phenology.Flowers
        [KiwiFruit].Phenology.FullBloomDOY
        [KiwiFruit].Phenology.Photoperiod
        [KiwiFruit].Leaf.FN
        [KiwiFruit].Leaf.LeafAppearanceRate
        [KiwiFruit].Phenology.HeatModelHourlyFlwr
        [KiwiFruit].Leaf.SpecificArea.SLA
        [KiwiFruit].Leaf.Canopy.CoverTotal
        [KiwiFruit].Leaf.Canopy.Fw
        [KiwiFruit].Leaf.Transmitted_light
        [KiwiFruit].Fruit.FruitNumberPerM2
        [KiwiFruit].Fruit.FruitNumberPerM2.FruitingPhase.PerM2.FruitsPerVine
        [KiwiFruit].Fruit.Wt
        [KiwiFruit].Fruit.Live
        [KiwiFruit].Fruit.Live.Carbon.Storage
        [KiwiFruit].Trunk.Live.Carbon.Storage
        [KiwiFruit].Fruit.TotalCarbonDemand
        [KiwiFruit].Leaf.Canopy.RadiationIntercepted
        [KiwiFruit].Leaf.Canopy.CoverGreen
        [KiwiFruit].Phenology.FruitGrowth.ProgressThroughPhase
        [KiwiFruit].Phenology.HCSensitivityChill
        [KiwiFruit].Fruit.SingleBerryDW
        [KiwiFruit].Fruit.MaxSingleBerryDW
        [KiwiFruit].Fruit.PotentialSingleBerryDW
        [KiwiFruit].Fruit.SingleBerryDMC
        [KiwiFruit].Fruit.SingleBerryFW
        [KiwiFruit].Fruit.MaxSingleBerryFW
        [KiwiFruit].Fruit.YieldToPerHa
        [KiwiFruit].Fruit.Y
        [KiwiFruit].Phenology.FruitMaturity.ProgressThroughPhase
        [KiwiFruit].Stem.Wt
        [KiwiFruit].Stem.Live.Wt
        [KiwiFruit].FineRoot.Wt
        [KiwiFruit].StorageRoot.Wt
        [KiwiFruit].Trunk.Wt
    Report Stages
      VariableNames:
        [KiwiFruit].Phenology.MaxBBP
        [KiwiFruit].Phenology.FloweringDOY
        [KiwiFruit].Phenology.MaxFlowers
        [KiwiFruit].Phenology.FullBloomDOY
        [Clock].Today.Year
        [KiwiFruit].Phenology.CurrentStageName
        [KiwiFruit].Fruit.MaxSingleBerryDW
        [KiwiFruit].Fruit.MaxSingleBerryDMC
        [KiwiFruit].Fruit.MaxSingleBerryFW
    Manager ReportOnEvents
```csharp
using Models.Core;
using System;
using Models.PMF.Phen;

namespace Models
{
    [Serializable]
    public class Script : Model
    {
        //> Links to other Apsim models
        [Link(ByName = true)] Report stages; 
        
        public string StageName {get; set;}
        
        private void setAndOutput(PhaseChangedType change)
        {
           StageName = change.StageName;
    	   stages.DoOutput();
        }
        
        [EventSubscribe("PhaseChanged")]
        private void OnPhaseChanged(object sender, PhaseChangedType change)
        {
        	if (change.StageName == "StartFlowering") {setAndOutput(change);}
        	if (change.StageName == "EndFlowering") {setAndOutput(change);}
        	if (change.StageName == "FruitMature") {setAndOutput(change);}

        }

	}
}
```
    BiomassRemovalEvents OnPrune: NameOfPlantToRemoveFrom=KiwiFruit; RemovalType=3
      BiomassRemovalFractions:
        PlantName  OrganName    TypeString  LiveToRemove  DeadToRemove  LiveToResidue  DeadToResidue
        KiwiFruit  Trunk        Pruning     0             0             0              0
        KiwiFruit  Leaf         Pruning     0             0             1              1
        KiwiFruit  Stem         Pruning     0             0             0.7            1
        KiwiFruit  FineRoot     Pruning     0             0             0              0
        KiwiFruit  Fruit        Pruning     0.9           0             0.1            0
        -          StorageRoot  Pruning     0             0             0              0
    BiomassRemovalEvents OnHarvest: NameOfPlantToRemoveFrom=KiwiFruit; RemovalType=2; StageToSet=FruitMature
      BiomassRemovalFractions:
        PlantName  OrganName    TypeString  LiveToRemove  DeadToRemove  LiveToResidue  DeadToResidue
        KiwiFruit  Trunk        Harvesting  0             0             0              0
        KiwiFruit  Leaf         Harvesting  0             0             0              0
        KiwiFruit  Stem         Harvesting  0             0             0              0
        KiwiFruit  FineRoot     Harvesting  0             0             0              0
        KiwiFruit  StorageRoot  Harvesting  0             0             0              0
        KiwiFruit  Fruit        Harvesting  0.9           1             0.1            1
  Memo
    Mean observed BB% in the excel file was calculated from Fig.4:

    Effects of hydrogen cyanamide on budbreak and flowering in kiwifruit (Actinidia deliciosa ’Hayward')

    KK: (control) (35+43+18+32)/4 = 32%

    TP: (control) (46+44+40+45)/4 = 44%
  Memo
    Mean observed BB% in the excel file was calculated from Fig.4:

    Effects of hydrogen cyanamide on budbreak and flowering in kiwifruit (Actinidia deliciosa ’Hayward')

    KK: (HC) (48+45+35+48)/4 = 44%

    TP: (HC) (64+59+44+52)/4 = 55%
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